! PVSystem.dss
! Just like in an OpenDSS config
New PVsystem.PV6 irrad=1.0 Phases=1 Bus1=6.1 kV=2.4018 kVA=5.5986 Pmpp=4.6655 %cutin=0.001 %cutout=0.001
// New PVsystem.PV10 irrad=1.0 Phases=1 Bus1=10.1 kV=2.4018 kVA=2.8001 Pmpp=2.3335 %cutin=0.001 %cutout=0.001
