! Storage.dss
! Just like in an OpenDSS config
New Storage.Battery5 phases=1 Bus1=5.1 kV=2.4018 kVA=5.5986 kWrated=4.6655 kWhrated=18.662 %stored=62.5 %reserve=30 %EffCharge=95 %EffDischarge=95 %idlingkW=0 Vminpu=0.95 Vmaxpu=1.05 DispMode=External
// New Storage.Battery6 phases=1 Bus1=6.1 kV=2.4018 kVA=2.8001 kWrated=2.3335 kWhrated=9.3338 %stored=62.5 %reserve=30 %EffCharge=95 %EffDischarge=95 %idlingkW=0 Vminpu=0.95 Vmaxpu=1.05 DispMode=External
