! epri_ckt5_1ph: single-phase per-phase equivalent of test_systems\epri_test_circuits\ckt5\Master_ckt5.dss (unmodified original).
! Written by envs/multi_poi/root_level/convert_to_1ph.jl -- do not edit by hand.
! The original's capacitor banks (kvar / 3), not redirected by Master.dss.
New generator.28285C Phases=1 Bus1=28285.1 kV=7.1996 Model=1 kW=1e-06 kVAr=200
New generator.63707C Phases=1 Bus1=63707.1 kV=7.1996 Model=1 kW=1e-06 kVAr=100
New generator.74433C Phases=1 Bus1=74433.1 kV=7.1996 Model=1 kW=1e-06 kVAr=200
New generator.8081C Phases=1 Bus1=8081.1 kV=7.1996 Model=1 kW=1e-06 kVAr=150
