! epri_ckt7_1ph: single-phase per-phase equivalent of test_systems\epri_test_circuits\ckt7\Master_ckt7.dss (unmodified original).
! Written by envs/multi_poi/root_level/convert_to_1ph.jl -- do not edit by hand.
! The original's capacitor banks (kvar / 3), not redirected by Master.dss.
New generator.181945C Phases=1 Bus1=181945.1 kV=7.1996 Model=1 kW=1e-06 kVAr=400
New generator.181993C Phases=1 Bus1=181993.1 kV=7.1996 Model=1 kW=1e-06 kVAr=400
