! epri_j1_1ph: single-phase per-phase equivalent of test_systems\epri_test_circuits\epri_dpv\J1\Master_noPV.dss (unmodified original).
! Written by envs/multi_poi/root_level/convert_to_1ph.jl -- do not edit by hand.
! The original's capacitor banks (kvar / 3), not redirected by Master.dss.
New generator.b18941C Phases=1 Bus1=b18941.1 kV=7.1996 Model=1 kW=1e-06 kVAr=400
New generator.b4829C Phases=1 Bus1=b4829.1 kV=7.1996 Model=1 kW=1e-06 kVAr=200
New generator.b4862C Phases=1 Bus1=b4862.1 kV=7.1996 Model=1 kW=1e-06 kVAr=200
New generator.b4877C Phases=1 Bus1=b4877.1 kV=7.1996 Model=1 kW=1e-06 kVAr=200
New generator.b4909C Phases=1 Bus1=b4909.1 kV=7.1996 Model=1 kW=1e-06 kVAr=300
