! epri_m1_1ph: single-phase per-phase equivalent of test_systems\epri_test_circuits\epri_dpv\M1\Master_NoPV.dss (unmodified original).
! Written by envs/multi_poi/root_level/convert_to_1ph.jl -- do not edit by hand.
! The original's capacitor banks (kvar / 3), not redirected by Master.dss.
New generator.0x008c6578C Phases=1 Bus1=0x008c6578.1 kV=7.1996 Model=1 kW=1e-06 kVAr=400
New generator.0x008dbe00C Phases=1 Bus1=0x008dbe00.1 kV=7.1996 Model=1 kW=1e-06 kVAr=400
New generator.0x008ed880C Phases=1 Bus1=0x008ed880.1 kV=7.1996 Model=1 kW=1e-06 kVAr=400
