! epri_m1_1ph: single-phase per-phase equivalent of test_systems\epri_test_circuits\epri_dpv\M1\Master_NoPV.dss (unmodified original).
! Written by envs/multi_poi/root_level/convert_to_1ph.jl -- do not edit by hand.
! 49 batteries on load buses, sized in proportion to the bus load; fleet rating = 40 % of total load, 4 h.
New Storage.BESS_0x0089c940 Phases=1 Bus1=0x0089c940.1 kV=7.1996 kVA=16.522 kWrated=13.7683 kWhrated=55.0734 %stored=62.5 %reserve=30 %EffCharge=95 %EffDischarge=95 %idlingkW=0 Vminpu=0.95 Vmaxpu=1.05 DispMode=External
New Storage.BESS_0x0089dde0 Phases=1 Bus1=0x0089dde0.1 kV=7.1996 kVA=21.3516 kWrated=17.793 kWhrated=71.172 %stored=62.5 %reserve=30 %EffCharge=95 %EffDischarge=95 %idlingkW=0 Vminpu=0.95 Vmaxpu=1.05 DispMode=External
New Storage.BESS_0x0089e678 Phases=1 Bus1=0x0089e678.1 kV=7.1996 kVA=50.5223 kWrated=42.1019 kWhrated=168.408 %stored=62.5 %reserve=30 %EffCharge=95 %EffDischarge=95 %idlingkW=0 Vminpu=0.95 Vmaxpu=1.05 DispMode=External
New Storage.BESS_0x008c4bb0 Phases=1 Bus1=0x008c4bb0.1 kV=7.1996 kVA=14.0251 kWrated=11.6876 kWhrated=46.7504 %stored=62.5 %reserve=30 %EffCharge=95 %EffDischarge=95 %idlingkW=0 Vminpu=0.95 Vmaxpu=1.05 DispMode=External
New Storage.BESS_0x008c50d8 Phases=1 Bus1=0x008c50d8.1 kV=7.1996 kVA=16.6862 kWrated=13.9052 kWhrated=55.6207 %stored=62.5 %reserve=30 %EffCharge=95 %EffDischarge=95 %idlingkW=0 Vminpu=0.95 Vmaxpu=1.05 DispMode=External
New Storage.BESS_0x008c5970 Phases=1 Bus1=0x008c5970.1 kV=7.1996 kVA=14.4067 kWrated=12.0055 kWhrated=48.0222 %stored=62.5 %reserve=30 %EffCharge=95 %EffDischarge=95 %idlingkW=0 Vminpu=0.95 Vmaxpu=1.05 DispMode=External
New Storage.BESS_0x008c7338 Phases=1 Bus1=0x008c7338.1 kV=7.1996 kVA=8.97337 kWrated=7.47781 kWhrated=29.9112 %stored=62.5 %reserve=30 %EffCharge=95 %EffDischarge=95 %idlingkW=0 Vminpu=0.95 Vmaxpu=1.05 DispMode=External
New Storage.BESS_0x008c7860 Phases=1 Bus1=0x008c7860.1 kV=7.1996 kVA=24.0996 kWrated=20.083 kWhrated=80.3321 %stored=62.5 %reserve=30 %EffCharge=95 %EffDischarge=95 %idlingkW=0 Vminpu=0.95 Vmaxpu=1.05 DispMode=External
New Storage.BESS_0x008cce50 Phases=1 Bus1=0x008cce50.1 kV=7.1996 kVA=16.7249 kWrated=13.9374 kWhrated=55.7495 %stored=62.5 %reserve=30 %EffCharge=95 %EffDischarge=95 %idlingkW=0 Vminpu=0.95 Vmaxpu=1.05 DispMode=External
New Storage.BESS_0x008ce2f0 Phases=1 Bus1=0x008ce2f0.1 kV=7.1996 kVA=18.2317 kWrated=15.1931 kWhrated=60.7723 %stored=62.5 %reserve=30 %EffCharge=95 %EffDischarge=95 %idlingkW=0 Vminpu=0.95 Vmaxpu=1.05 DispMode=External
New Storage.BESS_0x008ce818 Phases=1 Bus1=0x008ce818.1 kV=7.1996 kVA=24.9931 kWrated=20.8276 kWhrated=83.3103 %stored=62.5 %reserve=30 %EffCharge=95 %EffDischarge=95 %idlingkW=0 Vminpu=0.95 Vmaxpu=1.05 DispMode=External
New Storage.BESS_0x008cf5d8 Phases=1 Bus1=0x008cf5d8.1 kV=7.1996 kVA=15.5963 kWrated=12.9969 kWhrated=51.9876 %stored=62.5 %reserve=30 %EffCharge=95 %EffDischarge=95 %idlingkW=0 Vminpu=0.95 Vmaxpu=1.05 DispMode=External
New Storage.BESS_0x008d01e0 Phases=1 Bus1=0x008d01e0.1 kV=7.1996 kVA=18.1882 kWrated=15.1568 kWhrated=60.6274 %stored=62.5 %reserve=30 %EffCharge=95 %EffDischarge=95 %idlingkW=0 Vminpu=0.95 Vmaxpu=1.05 DispMode=External
New Storage.BESS_0x008d14e8 Phases=1 Bus1=0x008d14e8.1 kV=7.1996 kVA=25.8576 kWrated=21.548 kWhrated=86.192 %stored=62.5 %reserve=30 %EffCharge=95 %EffDischarge=95 %idlingkW=0 Vminpu=0.95 Vmaxpu=1.05 DispMode=External
New Storage.BESS_0x008d1f38 Phases=1 Bus1=0x008d1f38.1 kV=7.1996 kVA=21.1149 kWrated=17.5958 kWhrated=70.3831 %stored=62.5 %reserve=30 %EffCharge=95 %EffDischarge=95 %idlingkW=0 Vminpu=0.95 Vmaxpu=1.05 DispMode=External
New Storage.BESS_0x008d2618 Phases=1 Bus1=0x008d2618.1 kV=7.1996 kVA=27.4514 kWrated=22.8761 kWhrated=91.5045 %stored=62.5 %reserve=30 %EffCharge=95 %EffDischarge=95 %idlingkW=0 Vminpu=0.95 Vmaxpu=1.05 DispMode=External
New Storage.BESS_0x008d33e0 Phases=1 Bus1=0x008d33e0.1 kV=7.1996 kVA=25.7852 kWrated=21.4876 kWhrated=85.9505 %stored=62.5 %reserve=30 %EffCharge=95 %EffDischarge=95 %idlingkW=0 Vminpu=0.95 Vmaxpu=1.05 DispMode=External
New Storage.BESS_0x008d3e30 Phases=1 Bus1=0x008d3e30.1 kV=7.1996 kVA=27.1906 kWrated=22.6588 kWhrated=90.6352 %stored=62.5 %reserve=30 %EffCharge=95 %EffDischarge=95 %idlingkW=0 Vminpu=0.95 Vmaxpu=1.05 DispMode=External
New Storage.BESS_0x008d41a0 Phases=1 Bus1=0x008d41a0.1 kV=7.1996 kVA=15.1601 kWrated=12.6334 kWhrated=50.5336 %stored=62.5 %reserve=30 %EffCharge=95 %EffDischarge=95 %idlingkW=0 Vminpu=0.95 Vmaxpu=1.05 DispMode=External
New Storage.BESS_0x008d4bf0 Phases=1 Bus1=0x008d4bf0.1 kV=7.1996 kVA=24.6421 kWrated=20.5351 kWhrated=82.1402 %stored=62.5 %reserve=30 %EffCharge=95 %EffDischarge=95 %idlingkW=0 Vminpu=0.95 Vmaxpu=1.05 DispMode=External
New Storage.BESS_0x008d5488 Phases=1 Bus1=0x008d5488.1 kV=7.1996 kVA=14.2907 kWrated=11.909 kWhrated=47.6358 %stored=62.5 %reserve=30 %EffCharge=95 %EffDischarge=95 %idlingkW=0 Vminpu=0.95 Vmaxpu=1.05 DispMode=External
New Storage.BESS_0x008d5d20 Phases=1 Bus1=0x008d5d20.1 kV=7.1996 kVA=25.563 kWrated=21.3025 kWhrated=85.21 %stored=62.5 %reserve=30 %EffCharge=95 %EffDischarge=95 %idlingkW=0 Vminpu=0.95 Vmaxpu=1.05 DispMode=External
New Storage.BESS_0x008d6ae0 Phases=1 Bus1=0x008d6ae0.1 kV=7.1996 kVA=21.2212 kWrated=17.6843 kWhrated=70.7373 %stored=62.5 %reserve=30 %EffCharge=95 %EffDischarge=95 %idlingkW=0 Vminpu=0.95 Vmaxpu=1.05 DispMode=External
New Storage.BESS_0x008d78a0 Phases=1 Bus1=0x008d78a0.1 kV=7.1996 kVA=25.1476 kWrated=20.9564 kWhrated=83.8255 %stored=62.5 %reserve=30 %EffCharge=95 %EffDischarge=95 %idlingkW=0 Vminpu=0.95 Vmaxpu=1.05 DispMode=External
New Storage.BESS_0x008d7c10 Phases=1 Bus1=0x008d7c10.1 kV=7.1996 kVA=23.4911 kWrated=19.5759 kWhrated=78.3037 %stored=62.5 %reserve=30 %EffCharge=95 %EffDischarge=95 %idlingkW=0 Vminpu=0.95 Vmaxpu=1.05 DispMode=External
New Storage.BESS_0x008d8660 Phases=1 Bus1=0x008d8660.1 kV=7.1996 kVA=22.1871 kWrated=18.4893 kWhrated=73.957 %stored=62.5 %reserve=30 %EffCharge=95 %EffDischarge=95 %idlingkW=0 Vminpu=0.95 Vmaxpu=1.05 DispMode=External
New Storage.BESS_0x008d89d0 Phases=1 Bus1=0x008d89d0.1 kV=7.1996 kVA=23.2158 kWrated=19.3465 kWhrated=77.386 %stored=62.5 %reserve=30 %EffCharge=95 %EffDischarge=95 %idlingkW=0 Vminpu=0.95 Vmaxpu=1.05 DispMode=External
New Storage.BESS_0x008d9678 Phases=1 Bus1=0x008d9678.1 kV=7.1996 kVA=19.0237 kWrated=15.8531 kWhrated=63.4124 %stored=62.5 %reserve=30 %EffCharge=95 %EffDischarge=95 %idlingkW=0 Vminpu=0.95 Vmaxpu=1.05 DispMode=External
New Storage.BESS_0x008d9830 Phases=1 Bus1=0x008d9830.1 kV=7.1996 kVA=11.9919 kWrated=9.99322 kWhrated=39.9729 %stored=62.5 %reserve=30 %EffCharge=95 %EffDischarge=95 %idlingkW=0 Vminpu=0.95 Vmaxpu=1.05 DispMode=External
New Storage.BESS_0x008d9ba0 Phases=1 Bus1=0x008d9ba0.1 kV=7.1996 kVA=12.6245 kWrated=10.5204 kWhrated=42.0818 %stored=62.5 %reserve=30 %EffCharge=95 %EffDischarge=95 %idlingkW=0 Vminpu=0.95 Vmaxpu=1.05 DispMode=External
New Storage.BESS_0x008da7a8 Phases=1 Bus1=0x008da7a8.1 kV=7.1996 kVA=14.9427 kWrated=12.4523 kWhrated=49.8091 %stored=62.5 %reserve=30 %EffCharge=95 %EffDischarge=95 %idlingkW=0 Vminpu=0.95 Vmaxpu=1.05 DispMode=External
New Storage.BESS_0x008db040 Phases=1 Bus1=0x008db040.1 kV=7.1996 kVA=13.5905 kWrated=11.3254 kWhrated=45.3015 %stored=62.5 %reserve=30 %EffCharge=95 %EffDischarge=95 %idlingkW=0 Vminpu=0.95 Vmaxpu=1.05 DispMode=External
New Storage.BESS_0x008db8d8 Phases=1 Bus1=0x008db8d8.1 kV=7.1996 kVA=17.0822 kWrated=14.2352 kWhrated=56.9408 %stored=62.5 %reserve=30 %EffCharge=95 %EffDischarge=95 %idlingkW=0 Vminpu=0.95 Vmaxpu=1.05 DispMode=External
New Storage.BESS_0x008dbc48 Phases=1 Bus1=0x008dbc48.1 kV=7.1996 kVA=9.38871 kWrated=7.82393 kWhrated=31.2957 %stored=62.5 %reserve=30 %EffCharge=95 %EffDischarge=95 %idlingkW=0 Vminpu=0.95 Vmaxpu=1.05 DispMode=External
New Storage.BESS_0x008dd618 Phases=1 Bus1=0x008dd618.1 kV=7.1996 kVA=18.222 kWrated=15.185 kWhrated=60.7401 %stored=62.5 %reserve=30 %EffCharge=95 %EffDischarge=95 %idlingkW=0 Vminpu=0.95 Vmaxpu=1.05 DispMode=External
New Storage.BESS_0x008de598 Phases=1 Bus1=0x008de598.1 kV=7.1996 kVA=29.5426 kWrated=24.6188 kWhrated=98.4752 %stored=62.5 %reserve=30 %EffCharge=95 %EffDischarge=95 %idlingkW=0 Vminpu=0.95 Vmaxpu=1.05 DispMode=External
New Storage.BESS_0x008dec78 Phases=1 Bus1=0x008dec78.1 kV=7.1996 kVA=20.7141 kWrated=17.2617 kWhrated=69.047 %stored=62.5 %reserve=30 %EffCharge=95 %EffDischarge=95 %idlingkW=0 Vminpu=0.95 Vmaxpu=1.05 DispMode=External
New Storage.BESS_0x008dff60 Phases=1 Bus1=0x008dff60.1 kV=7.1996 kVA=17.4589 kWrated=14.5491 kWhrated=58.1965 %stored=62.5 %reserve=30 %EffCharge=95 %EffDischarge=95 %idlingkW=0 Vminpu=0.95 Vmaxpu=1.05 DispMode=External
New Storage.BESS_0x008e2750 Phases=1 Bus1=0x008e2750.1 kV=7.1996 kVA=8.93473 kWrated=7.44561 kWhrated=29.7824 %stored=62.5 %reserve=30 %EffCharge=95 %EffDischarge=95 %idlingkW=0 Vminpu=0.95 Vmaxpu=1.05 DispMode=External
New Storage.BESS_0x008e2ac0 Phases=1 Bus1=0x008e2ac0.1 kV=7.1996 kVA=10.8472 kWrated=9.03937 kWhrated=36.1575 %stored=62.5 %reserve=30 %EffCharge=95 %EffDischarge=95 %idlingkW=0 Vminpu=0.95 Vmaxpu=1.05 DispMode=External
New Storage.BESS_0x008e49e0 Phases=1 Bus1=0x008e49e0.1 kV=7.1996 kVA=15.8652 kWrated=13.221 kWhrated=52.884 %stored=62.5 %reserve=30 %EffCharge=95 %EffDischarge=95 %idlingkW=0 Vminpu=0.95 Vmaxpu=1.05 DispMode=External
New Storage.BESS_0x008e5278 Phases=1 Bus1=0x008e5278.1 kV=7.1996 kVA=16.7731 kWrated=13.9776 kWhrated=55.9105 %stored=62.5 %reserve=30 %EffCharge=95 %EffDischarge=95 %idlingkW=0 Vminpu=0.95 Vmaxpu=1.05 DispMode=External
New Storage.BESS_0x008e6560 Phases=1 Bus1=0x008e6560.1 kV=7.1996 kVA=8.55802 kWrated=7.13169 kWhrated=28.5267 %stored=62.5 %reserve=30 %EffCharge=95 %EffDischarge=95 %idlingkW=0 Vminpu=0.95 Vmaxpu=1.05 DispMode=External
New Storage.BESS_0x008e7848 Phases=1 Bus1=0x008e7848.1 kV=7.1996 kVA=9.42735 kWrated=7.85612 kWhrated=31.4245 %stored=62.5 %reserve=30 %EffCharge=95 %EffDischarge=95 %idlingkW=0 Vminpu=0.95 Vmaxpu=1.05 DispMode=External
New Storage.BESS_0x008e7f28 Phases=1 Bus1=0x008e7f28.1 kV=7.1996 kVA=17.9178 kWrated=14.9315 kWhrated=59.7259 %stored=62.5 %reserve=30 %EffCharge=95 %EffDischarge=95 %idlingkW=0 Vminpu=0.95 Vmaxpu=1.05 DispMode=External
New Storage.BESS_0x008e8ce8 Phases=1 Bus1=0x008e8ce8.1 kV=7.1996 kVA=13.7015 kWrated=11.4179 kWhrated=45.6718 %stored=62.5 %reserve=30 %EffCharge=95 %EffDischarge=95 %idlingkW=0 Vminpu=0.95 Vmaxpu=1.05 DispMode=External
New Storage.BESS_0x008eb2b8 Phases=1 Bus1=0x008eb2b8.1 kV=7.1996 kVA=9.36939 kWrated=7.80783 kWhrated=31.2313 %stored=62.5 %reserve=30 %EffCharge=95 %EffDischarge=95 %idlingkW=0 Vminpu=0.95 Vmaxpu=1.05 DispMode=External
New Storage.BESS_0x008f2830 Phases=1 Bus1=0x008f2830.1 kV=7.1996 kVA=28.9485 kWrated=24.1238 kWhrated=96.4951 %stored=62.5 %reserve=30 %EffCharge=95 %EffDischarge=95 %idlingkW=0 Vminpu=0.95 Vmaxpu=1.05 DispMode=External
New Storage.BESS_0x008f3960 Phases=1 Bus1=0x008f3960.1 kV=7.1996 kVA=11.4992 kWrated=9.5827 kWhrated=38.3308 %stored=62.5 %reserve=30 %EffCharge=95 %EffDischarge=95 %idlingkW=0 Vminpu=0.95 Vmaxpu=1.05 DispMode=External
