New PVsystem.PV5 irrad=1.0 Phases=1 Bus1=5.1 kV=0.24 kVA=0.9972 Pmpp=0.831 %cutin=0.001 %cutout=0.001
New PVsystem.PV9 irrad=1.0 Phases=1 Bus1=9.1 kV=0.24 kVA=1.0944 Pmpp=0.912 %cutin=0.001 %cutout=0.001
