New Storage.Battery41 Phases=1 Bus1=41 kV=0.24 kVA=0.9972 kWrated=0.831 kWhrated=3.9888 %stored=62.5 %reserve=30 %EffCharge=95 %EffDischarge=95 %idlingkW=0 Vminpu=0.95 Vmaxpu=1.05 DispMode=External
New Storage.Battery44 Phases=1 Bus1=44 kV=0.24 kVA=1.0512 kWrated=0.876 kWhrated=4.2048 %stored=62.5 %reserve=30 %EffCharge=95 %EffDischarge=95 %idlingkW=0 Vminpu=0.95 Vmaxpu=1.05 DispMode=External
