New object=circuit.ieee729_1ph
Edit "Vsource.source" bus1=1 pu=1.03 R0=0 X0=0.00000001 phases=1 basekv=12.66 R1=0 X1=0.00000001

Redirect BranchData.dss
Redirect Loads.dss
Redirect PVSystem_21_100_0.dss
Redirect Storage_31_100_0.dss

Set VoltageBases = [21.92776]
Set mode = Daily
Set stepsize = 1h
Set number = 1
