! ieee9500_1ph: single-phase per-phase equivalent of the IEEE 9500-node test system
! (PNNL / GridAPPS-D CIMHub; original in ../ieee9500_source, BSD-style license there).
! Written by envs/multi_poi/root_level/convert_ieee9500_1ph.jl -- do not edit by hand.
! The original's capacitor banks (kvar / 3), not redirected by Master.dss.
New generator.r18242C Phases=1 Bus1=r18242.1 kV=7.2 Model=1 kW=1e-06 kVAr=300
New generator.r20185C Phases=1 Bus1=r20185.1 kV=7.2 Model=1 kW=1e-06 kVAr=300
New generator.r42246C Phases=1 Bus1=r42246.1 kV=7.2 Model=1 kW=1e-06 kVAr=400
New generator.r42247C Phases=1 Bus1=r42247.1 kV=7.2 Model=1 kW=1e-06 kVAr=300
