! epri_ckt24xf_1ph: single-phase per-phase equivalent of test_networks\sources\epri_test_circuits\ckt24\master_ckt24.dss (unmodified original).
! Written by problems/msopf/root_level/convert_to_1ph.jl -- do not edit by hand.
! The original's capacitor banks (kvar / 3), not redirected by Master.dss.
New generator.n284062C Phases=1 Bus1=n284062.1 kV=19.9186 Model=1 kW=1e-06 kVAr=400
New generator.n292388C Phases=1 Bus1=n292388.1 kV=19.9186 Model=1 kW=1e-06 kVAr=400
New generator.n300521C Phases=1 Bus1=n300521.1 kV=19.9186 Model=1 kW=1e-06 kVAr=300
