! epri_ckt7_1ph: single-phase per-phase equivalent of test_systems\epri_test_circuits\ckt7\Master_ckt7.dss (unmodified original).
! Written by envs/multi_poi/root_level/convert_to_1ph.jl -- do not edit by hand.
! 29 PV units on load buses, sized in proportion to the bus load; fleet Pmpp = 40 % of total load.
New PVsystem.PV_165448 irrad=1.0 Phases=1 Bus1=165448.1 kV=7.1996 kVA=6.15018 Pmpp=5.12515 %cutin=0.001 %cutout=0.001
New PVsystem.PV_165454 irrad=1.0 Phases=1 Bus1=165454.1 kV=7.1996 kVA=12.3989 Pmpp=10.3324 %cutin=0.001 %cutout=0.001
New PVsystem.PV_165462 irrad=1.0 Phases=1 Bus1=165462.1 kV=7.1996 kVA=82.6448 Pmpp=68.8706 %cutin=0.001 %cutout=0.001
New PVsystem.PV_165467 irrad=1.0 Phases=1 Bus1=165467.1 kV=7.1996 kVA=3.97349 Pmpp=3.31124 %cutin=0.001 %cutout=0.001
New PVsystem.PV_165477 irrad=1.0 Phases=1 Bus1=165477.1 kV=7.1996 kVA=123.965 Pmpp=103.304 %cutin=0.001 %cutout=0.001
New PVsystem.PV_165492 irrad=1.0 Phases=1 Bus1=165492.1 kV=7.1996 kVA=7.94699 Pmpp=6.62249 %cutin=0.001 %cutout=0.001
New PVsystem.PV_181893 irrad=1.0 Phases=1 Bus1=181893.1 kV=7.1996 kVA=49.5859 Pmpp=41.3216 %cutin=0.001 %cutout=0.001
New PVsystem.PV_181894 irrad=1.0 Phases=1 Bus1=181894.1 kV=7.1996 kVA=49.5859 Pmpp=41.3216 %cutin=0.001 %cutout=0.001
New PVsystem.PV_181898 irrad=1.0 Phases=1 Bus1=181898.1 kV=7.1996 kVA=11.9205 Pmpp=9.93373 %cutin=0.001 %cutout=0.001
New PVsystem.PV_181912 irrad=1.0 Phases=1 Bus1=181912.1 kV=7.1996 kVA=16.6221 Pmpp=13.8517 %cutin=0.001 %cutout=0.001
New PVsystem.PV_181913 irrad=1.0 Phases=1 Bus1=181913.1 kV=7.1996 kVA=12.4666 Pmpp=10.3888 %cutin=0.001 %cutout=0.001
New PVsystem.PV_181937 irrad=1.0 Phases=1 Bus1=181937.1 kV=7.1996 kVA=7.94699 Pmpp=6.62249 %cutin=0.001 %cutout=0.001
New PVsystem.PV_181950 irrad=1.0 Phases=1 Bus1=181950.1 kV=7.1996 kVA=11.9205 Pmpp=9.93373 %cutin=0.001 %cutout=0.001
New PVsystem.PV_181956 irrad=1.0 Phases=1 Bus1=181956.1 kV=7.1996 kVA=15.894 Pmpp=13.245 %cutin=0.001 %cutout=0.001
New PVsystem.PV_181957 irrad=1.0 Phases=1 Bus1=181957.1 kV=7.1996 kVA=4.26991 Pmpp=3.55826 %cutin=0.001 %cutout=0.001
New PVsystem.PV_181959 irrad=1.0 Phases=1 Bus1=181959.1 kV=7.1996 kVA=8.53982 Pmpp=7.11652 %cutin=0.001 %cutout=0.001
New PVsystem.PV_181960 irrad=1.0 Phases=1 Bus1=181960.1 kV=7.1996 kVA=17.0796 Pmpp=14.233 %cutin=0.001 %cutout=0.001
New PVsystem.PV_181975 irrad=1.0 Phases=1 Bus1=181975.1 kV=7.1996 kVA=4.15552 Pmpp=3.46294 %cutin=0.001 %cutout=0.001
New PVsystem.PV_181976 irrad=1.0 Phases=1 Bus1=181976.1 kV=7.1996 kVA=7.94699 Pmpp=6.62249 %cutin=0.001 %cutout=0.001
New PVsystem.PV_181991 irrad=1.0 Phases=1 Bus1=181991.1 kV=7.1996 kVA=330.574 Pmpp=275.478 %cutin=0.001 %cutout=0.001
New PVsystem.PV_182026 irrad=1.0 Phases=1 Bus1=182026.1 kV=7.1996 kVA=1.66221 Pmpp=1.38517 %cutin=0.001 %cutout=0.001
New PVsystem.PV_182153 irrad=1.0 Phases=1 Bus1=182153.1 kV=7.1996 kVA=8.53982 Pmpp=7.11652 %cutin=0.001 %cutout=0.001
New PVsystem.PV_182159 irrad=1.0 Phases=1 Bus1=182159.1 kV=7.1996 kVA=12.3989 Pmpp=10.3324 %cutin=0.001 %cutout=0.001
New PVsystem.PV_182162 irrad=1.0 Phases=1 Bus1=182162.1 kV=7.1996 kVA=24.7929 Pmpp=20.6608 %cutin=0.001 %cutout=0.001
New PVsystem.PV_189950 irrad=1.0 Phases=1 Bus1=189950.1 kV=7.1996 kVA=16.6221 Pmpp=13.8518 %cutin=0.001 %cutout=0.001
New PVsystem.PV_194056 irrad=1.0 Phases=1 Bus1=194056.1 kV=7.1996 kVA=15.894 Pmpp=13.245 %cutin=0.001 %cutout=0.001
New PVsystem.PV_194060 irrad=1.0 Phases=1 Bus1=194060.1 kV=7.1996 kVA=16.6221 Pmpp=13.8517 %cutin=0.001 %cutout=0.001
New PVsystem.PV_273626 irrad=1.0 Phases=1 Bus1=273626.1 kV=7.1996 kVA=1.66221 Pmpp=1.38517 %cutin=0.001 %cutout=0.001
New PVsystem.PV_315933 irrad=1.0 Phases=1 Bus1=315933.1 kV=7.1996 kVA=12.3989 Pmpp=10.3324 %cutin=0.001 %cutout=0.001
