! epri_k1xf_1ph: single-phase per-phase equivalent of test_networks\sources\epri_test_circuits\epri_dpv\K1\Master_NoPV.dss (unmodified original).
! Written by problems/msopf/root_level/convert_to_1ph.jl -- do not edit by hand.
! 64 PV units on load buses, sized in proportion to the bus load; fleet Pmpp = 40 % of total load.
New PVsystem.PV_10526702 irrad=1.0 Phases=1 Bus1=10526702.1 kV=7.621 kVA=3.54984 Pmpp=2.9582 %cutin=0.001 %cutout=0.001
New PVsystem.PV_10529608 irrad=1.0 Phases=1 Bus1=10529608.1 kV=7.621 kVA=0.476621 Pmpp=0.397184 %cutin=0.001 %cutout=0.001
New PVsystem.PV_10541616 irrad=1.0 Phases=1 Bus1=10541616.1 kV=7.621 kVA=2.55316 Pmpp=2.12763 %cutin=0.001 %cutout=0.001
New PVsystem.PV_10548927 irrad=1.0 Phases=1 Bus1=10548927.1 kV=7.621 kVA=1.30977 Pmpp=1.09147 %cutin=0.001 %cutout=0.001
New PVsystem.PV_10548931 irrad=1.0 Phases=1 Bus1=10548931.1 kV=7.621 kVA=9.14568 Pmpp=7.6214 %cutin=0.001 %cutout=0.001
New PVsystem.PV_10548941 irrad=1.0 Phases=1 Bus1=10548941.1 kV=7.621 kVA=5.89152 Pmpp=4.9096 %cutin=0.001 %cutout=0.001
New PVsystem.PV_10548945 irrad=1.0 Phases=1 Bus1=10548945.1 kV=7.621 kVA=9.50926 Pmpp=7.92438 %cutin=0.001 %cutout=0.001
New PVsystem.PV_10548948 irrad=1.0 Phases=1 Bus1=10548948.1 kV=7.621 kVA=0.00358161 Pmpp=0.00298467 %cutin=0.001 %cutout=0.001
New PVsystem.PV_10548950 irrad=1.0 Phases=1 Bus1=10548950.1 kV=7.621 kVA=5.62252 Pmpp=4.68543 %cutin=0.001 %cutout=0.001
New PVsystem.PV_10548953 irrad=1.0 Phases=1 Bus1=10548953.1 kV=7.621 kVA=9.51586 Pmpp=7.92989 %cutin=0.001 %cutout=0.001
New PVsystem.PV_10548962 irrad=1.0 Phases=1 Bus1=10548962.1 kV=7.621 kVA=19.4013 Pmpp=16.1677 %cutin=0.001 %cutout=0.001
New PVsystem.PV_10548965 irrad=1.0 Phases=1 Bus1=10548965.1 kV=7.621 kVA=18.241 Pmpp=15.2009 %cutin=0.001 %cutout=0.001
New PVsystem.PV_10548981 irrad=1.0 Phases=1 Bus1=10548981.1 kV=7.621 kVA=10.4627 Pmpp=8.71892 %cutin=0.001 %cutout=0.001
New PVsystem.PV_10548986 irrad=1.0 Phases=1 Bus1=10548986.1 kV=7.621 kVA=1.50505 Pmpp=1.2542 %cutin=0.001 %cutout=0.001
New PVsystem.PV_10549239 irrad=1.0 Phases=1 Bus1=10549239.1 kV=7.621 kVA=7.59771 Pmpp=6.33142 %cutin=0.001 %cutout=0.001
New PVsystem.PV_10549241 irrad=1.0 Phases=1 Bus1=10549241.1 kV=7.621 kVA=19.1265 Pmpp=15.9387 %cutin=0.001 %cutout=0.001
New PVsystem.PV_10549259 irrad=1.0 Phases=1 Bus1=10549259.1 kV=7.621 kVA=6.83864 Pmpp=5.69886 %cutin=0.001 %cutout=0.001
New PVsystem.PV_10549287 irrad=1.0 Phases=1 Bus1=10549287.1 kV=7.621 kVA=7.02476 Pmpp=5.85397 %cutin=0.001 %cutout=0.001
New PVsystem.PV_10549290 irrad=1.0 Phases=1 Bus1=10549290.1 kV=7.621 kVA=14.5746 Pmpp=12.1455 %cutin=0.001 %cutout=0.001
New PVsystem.PV_10549310 irrad=1.0 Phases=1 Bus1=10549310.1 kV=7.621 kVA=9.1171 Pmpp=7.59759 %cutin=0.001 %cutout=0.001
New PVsystem.PV_10556736 irrad=1.0 Phases=1 Bus1=10556736.1 kV=7.621 kVA=5.72129 Pmpp=4.76774 %cutin=0.001 %cutout=0.001
New PVsystem.PV_10558215 irrad=1.0 Phases=1 Bus1=10558215.1 kV=7.621 kVA=4.93604 Pmpp=4.11337 %cutin=0.001 %cutout=0.001
New PVsystem.PV_10558471 irrad=1.0 Phases=1 Bus1=10558471.1 kV=7.621 kVA=6.90831 Pmpp=5.75693 %cutin=0.001 %cutout=0.001
New PVsystem.PV_10558481 irrad=1.0 Phases=1 Bus1=10558481.1 kV=7.621 kVA=1.85461 Pmpp=1.54551 %cutin=0.001 %cutout=0.001
New PVsystem.PV_10558562 irrad=1.0 Phases=1 Bus1=10558562.1 kV=7.621 kVA=6.76896 Pmpp=5.6408 %cutin=0.001 %cutout=0.001
New PVsystem.PV_10558575 irrad=1.0 Phases=1 Bus1=10558575.1 kV=7.621 kVA=3.22638 Pmpp=2.68865 %cutin=0.001 %cutout=0.001
New PVsystem.PV_10558582 irrad=1.0 Phases=1 Bus1=10558582.1 kV=7.621 kVA=7.64393 Pmpp=6.36994 %cutin=0.001 %cutout=0.001
New PVsystem.PV_10559389 irrad=1.0 Phases=1 Bus1=10559389.1 kV=7.621 kVA=4.05807 Pmpp=3.38173 %cutin=0.001 %cutout=0.001
New PVsystem.PV_10559391 irrad=1.0 Phases=1 Bus1=10559391.1 kV=7.621 kVA=6.48776 Pmpp=5.40646 %cutin=0.001 %cutout=0.001
New PVsystem.PV_10559487 irrad=1.0 Phases=1 Bus1=10559487.1 kV=7.621 kVA=14.0364 Pmpp=11.697 %cutin=0.001 %cutout=0.001
New PVsystem.PV_10559507 irrad=1.0 Phases=1 Bus1=10559507.1 kV=7.621 kVA=17.1191 Pmpp=14.2659 %cutin=0.001 %cutout=0.001
New PVsystem.PV_10559588 irrad=1.0 Phases=1 Bus1=10559588.1 kV=7.621 kVA=10.9719 Pmpp=9.14321 %cutin=0.001 %cutout=0.001
New PVsystem.PV_10559589 irrad=1.0 Phases=1 Bus1=10559589.1 kV=7.621 kVA=8.74085 Pmpp=7.28404 %cutin=0.001 %cutout=0.001
New PVsystem.PV_10560401 irrad=1.0 Phases=1 Bus1=10560401.1 kV=7.621 kVA=6.63535 Pmpp=5.52946 %cutin=0.001 %cutout=0.001
New PVsystem.PV_10560402 irrad=1.0 Phases=1 Bus1=10560402.1 kV=7.621 kVA=10.2955 Pmpp=8.57959 %cutin=0.001 %cutout=0.001
New PVsystem.PV_10574854 irrad=1.0 Phases=1 Bus1=10574854.1 kV=7.621 kVA=4.1482 Pmpp=3.45683 %cutin=0.001 %cutout=0.001
New PVsystem.PV_10579830 irrad=1.0 Phases=1 Bus1=10579830.1 kV=7.621 kVA=2.08125 Pmpp=1.73437 %cutin=0.001 %cutout=0.001
New PVsystem.PV_10579978 irrad=1.0 Phases=1 Bus1=10579978.1 kV=7.621 kVA=5.83801 Pmpp=4.865 %cutin=0.001 %cutout=0.001
New PVsystem.PV_10580150 irrad=1.0 Phases=1 Bus1=10580150.1 kV=7.621 kVA=276.135 Pmpp=230.113 %cutin=0.001 %cutout=0.001
New PVsystem.PV_20028685 irrad=1.0 Phases=1 Bus1=20028685.1 kV=7.621 kVA=17.6613 Pmpp=14.7177 %cutin=0.001 %cutout=0.001
New PVsystem.PV_20344332 irrad=1.0 Phases=1 Bus1=20344332.1 kV=7.621 kVA=9.84104 Pmpp=8.20086 %cutin=0.001 %cutout=0.001
New PVsystem.PV_20344372 irrad=1.0 Phases=1 Bus1=20344372.1 kV=7.621 kVA=12.3904 Pmpp=10.3253 %cutin=0.001 %cutout=0.001
New PVsystem.PV_20456673 irrad=1.0 Phases=1 Bus1=20456673.1 kV=7.621 kVA=9.47112 Pmpp=7.8926 %cutin=0.001 %cutout=0.001
New PVsystem.PV_34054976 irrad=1.0 Phases=1 Bus1=34054976.1 kV=7.621 kVA=19.2064 Pmpp=16.0054 %cutin=0.001 %cutout=0.001
New PVsystem.PV_34054979 irrad=1.0 Phases=1 Bus1=34054979.1 kV=7.621 kVA=9.67313 Pmpp=8.06094 %cutin=0.001 %cutout=0.001
New PVsystem.PV_34054980 irrad=1.0 Phases=1 Bus1=34054980.1 kV=7.621 kVA=6.87447 Pmpp=5.72872 %cutin=0.001 %cutout=0.001
New PVsystem.PV_34084602 irrad=1.0 Phases=1 Bus1=34084602.1 kV=7.621 kVA=21.4436 Pmpp=17.8697 %cutin=0.001 %cutout=0.001
New PVsystem.PV_34085040 irrad=1.0 Phases=1 Bus1=34085040.1 kV=7.621 kVA=4.65414 Pmpp=3.87845 %cutin=0.001 %cutout=0.001
New PVsystem.PV_34085340 irrad=1.0 Phases=1 Bus1=34085340.1 kV=7.621 kVA=10.4702 Pmpp=8.72516 %cutin=0.001 %cutout=0.001
New PVsystem.PV_34086306 irrad=1.0 Phases=1 Bus1=34086306.1 kV=7.621 kVA=7.42357 Pmpp=6.18631 %cutin=0.001 %cutout=0.001
New PVsystem.PV_34086318 irrad=1.0 Phases=1 Bus1=34086318.1 kV=7.621 kVA=5.42125 Pmpp=4.51771 %cutin=0.001 %cutout=0.001
New PVsystem.PV_34086383 irrad=1.0 Phases=1 Bus1=34086383.1 kV=7.621 kVA=6.37594 Pmpp=5.31328 %cutin=0.001 %cutout=0.001
New PVsystem.PV_34086410 irrad=1.0 Phases=1 Bus1=34086410.1 kV=7.621 kVA=2.07761 Pmpp=1.73134 %cutin=0.001 %cutout=0.001
New PVsystem.PV_34086794 irrad=1.0 Phases=1 Bus1=34086794.1 kV=7.621 kVA=0.861201 Pmpp=0.717667 %cutin=0.001 %cutout=0.001
New PVsystem.PV_34086797 irrad=1.0 Phases=1 Bus1=34086797.1 kV=7.621 kVA=5.3373 Pmpp=4.44775 %cutin=0.001 %cutout=0.001
New PVsystem.PV_34086800 irrad=1.0 Phases=1 Bus1=34086800.1 kV=7.621 kVA=5.26449 Pmpp=4.38707 %cutin=0.001 %cutout=0.001
New PVsystem.PV_34086802 irrad=1.0 Phases=1 Bus1=34086802.1 kV=7.621 kVA=4.03292 Pmpp=3.36076 %cutin=0.001 %cutout=0.001
New PVsystem.PV_34092154 irrad=1.0 Phases=1 Bus1=34092154.1 kV=7.621 kVA=6.99128 Pmpp=5.82606 %cutin=0.001 %cutout=0.001
New PVsystem.PV_34092313 irrad=1.0 Phases=1 Bus1=34092313.1 kV=7.621 kVA=1.69671 Pmpp=1.41392 %cutin=0.001 %cutout=0.001
New PVsystem.PV_34095590 irrad=1.0 Phases=1 Bus1=34095590.1 kV=7.621 kVA=2.25335 Pmpp=1.87779 %cutin=0.001 %cutout=0.001
New PVsystem.PV_34095667 irrad=1.0 Phases=1 Bus1=34095667.1 kV=7.621 kVA=6.51537 Pmpp=5.42947 %cutin=0.001 %cutout=0.001
New PVsystem.PV_34097297 irrad=1.0 Phases=1 Bus1=34097297.1 kV=7.621 kVA=5.68903 Pmpp=4.74086 %cutin=0.001 %cutout=0.001
New PVsystem.PV_34097393 irrad=1.0 Phases=1 Bus1=34097393.1 kV=7.621 kVA=4.34862 Pmpp=3.62385 %cutin=0.001 %cutout=0.001
New PVsystem.PV_40154810 irrad=1.0 Phases=1 Bus1=40154810.1 kV=7.621 kVA=12.127 Pmpp=10.1058 %cutin=0.001 %cutout=0.001
