! epri_k1xf_1ph: single-phase per-phase equivalent of test_networks\sources\epri_test_circuits\epri_dpv\K1\Master_NoPV.dss (unmodified original).
! Written by problems/msopf/root_level/convert_to_1ph.jl -- do not edit by hand.
! 64 batteries on load buses, sized in proportion to the bus load; fleet rating = 40 % of total load, 4 h.
New Storage.BESS_10522508 Phases=1 Bus1=10522508.1 kV=7.621 kVA=8.85838 kWrated=7.38198 kWhrated=29.5279 %stored=62.5 %reserve=30 %EffCharge=95 %EffDischarge=95 %idlingkW=0 Vminpu=0.95 Vmaxpu=1.05 DispMode=External
New Storage.BESS_10529606 Phases=1 Bus1=10529606.1 kV=7.621 kVA=12.0468 kWrated=10.039 kWhrated=40.1559 %stored=62.5 %reserve=30 %EffCharge=95 %EffDischarge=95 %idlingkW=0 Vminpu=0.95 Vmaxpu=1.05 DispMode=External
New Storage.BESS_10548901 Phases=1 Bus1=10548901.1 kV=7.621 kVA=5.61856 kWrated=4.68213 kWhrated=18.7285 %stored=62.5 %reserve=30 %EffCharge=95 %EffDischarge=95 %idlingkW=0 Vminpu=0.95 Vmaxpu=1.05 DispMode=External
New Storage.BESS_10548927 Phases=1 Bus1=10548927.1 kV=7.621 kVA=2.33296 kWrated=1.94413 kWhrated=7.77652 %stored=62.5 %reserve=30 %EffCharge=95 %EffDischarge=95 %idlingkW=0 Vminpu=0.95 Vmaxpu=1.05 DispMode=External
New Storage.BESS_10548939 Phases=1 Bus1=10548939.1 kV=7.621 kVA=24.153 kWrated=20.1275 kWhrated=80.5099 %stored=62.5 %reserve=30 %EffCharge=95 %EffDischarge=95 %idlingkW=0 Vminpu=0.95 Vmaxpu=1.05 DispMode=External
New Storage.BESS_10548948 Phases=1 Bus1=10548948.1 kV=7.621 kVA=0.00637955 kWrated=0.00531629 kWhrated=0.0212652 %stored=62.5 %reserve=30 %EffCharge=95 %EffDischarge=95 %idlingkW=0 Vminpu=0.95 Vmaxpu=1.05 DispMode=External
New Storage.BESS_10548953 Phases=1 Bus1=10548953.1 kV=7.621 kVA=16.9496 kWrated=14.1247 kWhrated=56.4988 %stored=62.5 %reserve=30 %EffCharge=95 %EffDischarge=95 %idlingkW=0 Vminpu=0.95 Vmaxpu=1.05 DispMode=External
New Storage.BESS_10548954 Phases=1 Bus1=10548954.1 kV=7.621 kVA=2.55116 kWrated=2.12597 kWhrated=8.50387 %stored=62.5 %reserve=30 %EffCharge=95 %EffDischarge=95 %idlingkW=0 Vminpu=0.95 Vmaxpu=1.05 DispMode=External
New Storage.BESS_10548962 Phases=1 Bus1=10548962.1 kV=7.621 kVA=34.5575 kWrated=28.7979 kWhrated=115.192 %stored=62.5 %reserve=30 %EffCharge=95 %EffDischarge=95 %idlingkW=0 Vminpu=0.95 Vmaxpu=1.05 DispMode=External
New Storage.BESS_10548981 Phases=1 Bus1=10548981.1 kV=7.621 kVA=18.6362 kWrated=15.5301 kWhrated=62.1205 %stored=62.5 %reserve=30 %EffCharge=95 %EffDischarge=95 %idlingkW=0 Vminpu=0.95 Vmaxpu=1.05 DispMode=External
New Storage.BESS_10548983 Phases=1 Bus1=10548983.1 kV=7.621 kVA=8.13077 kWrated=6.77564 kWhrated=27.1026 %stored=62.5 %reserve=30 %EffCharge=95 %EffDischarge=95 %idlingkW=0 Vminpu=0.95 Vmaxpu=1.05 DispMode=External
New Storage.BESS_10548986 Phases=1 Bus1=10548986.1 kV=7.621 kVA=2.68079 kWrated=2.23399 kWhrated=8.93595 %stored=62.5 %reserve=30 %EffCharge=95 %EffDischarge=95 %idlingkW=0 Vminpu=0.95 Vmaxpu=1.05 DispMode=External
New Storage.BESS_10548989 Phases=1 Bus1=10548989.1 kV=7.621 kVA=13.9962 kWrated=11.6635 kWhrated=46.6539 %stored=62.5 %reserve=30 %EffCharge=95 %EffDischarge=95 %idlingkW=0 Vminpu=0.95 Vmaxpu=1.05 DispMode=External
New Storage.BESS_10548992 Phases=1 Bus1=10548992.1 kV=7.621 kVA=25.173 kWrated=20.9775 kWhrated=83.9102 %stored=62.5 %reserve=30 %EffCharge=95 %EffDischarge=95 %idlingkW=0 Vminpu=0.95 Vmaxpu=1.05 DispMode=External
New Storage.BESS_10549018 Phases=1 Bus1=10549018.1 kV=7.621 kVA=10.3354 kWrated=8.61281 kWhrated=34.4512 %stored=62.5 %reserve=30 %EffCharge=95 %EffDischarge=95 %idlingkW=0 Vminpu=0.95 Vmaxpu=1.05 DispMode=External
New Storage.BESS_10549226 Phases=1 Bus1=10549226.1 kV=7.621 kVA=13.0005 kWrated=10.8338 kWhrated=43.335 %stored=62.5 %reserve=30 %EffCharge=95 %EffDischarge=95 %idlingkW=0 Vminpu=0.95 Vmaxpu=1.05 DispMode=External
New Storage.BESS_10549241 Phases=1 Bus1=10549241.1 kV=7.621 kVA=34.068 kWrated=28.39 kWhrated=113.56 %stored=62.5 %reserve=30 %EffCharge=95 %EffDischarge=95 %idlingkW=0 Vminpu=0.95 Vmaxpu=1.05 DispMode=External
New Storage.BESS_10549250 Phases=1 Bus1=10549250.1 kV=7.621 kVA=16.192 kWrated=13.4934 kWhrated=53.9734 %stored=62.5 %reserve=30 %EffCharge=95 %EffDischarge=95 %idlingkW=0 Vminpu=0.95 Vmaxpu=1.05 DispMode=External
New Storage.BESS_10549269 Phases=1 Bus1=10549269.1 kV=7.621 kVA=7.39195 kWrated=6.15996 kWhrated=24.6398 %stored=62.5 %reserve=30 %EffCharge=95 %EffDischarge=95 %idlingkW=0 Vminpu=0.95 Vmaxpu=1.05 DispMode=External
New Storage.BESS_10549310 Phases=1 Bus1=10549310.1 kV=7.621 kVA=16.2394 kWrated=13.5328 kWhrated=54.1312 %stored=62.5 %reserve=30 %EffCharge=95 %EffDischarge=95 %idlingkW=0 Vminpu=0.95 Vmaxpu=1.05 DispMode=External
New Storage.BESS_10556735 Phases=1 Bus1=10556735.1 kV=7.621 kVA=5.11463 kWrated=4.26219 kWhrated=17.0488 %stored=62.5 %reserve=30 %EffCharge=95 %EffDischarge=95 %idlingkW=0 Vminpu=0.95 Vmaxpu=1.05 DispMode=External
New Storage.BESS_10558215 Phases=1 Bus1=10558215.1 kV=7.621 kVA=8.79207 kWrated=7.32672 kWhrated=29.3069 %stored=62.5 %reserve=30 %EffCharge=95 %EffDischarge=95 %idlingkW=0 Vminpu=0.95 Vmaxpu=1.05 DispMode=External
New Storage.BESS_10558481 Phases=1 Bus1=10558481.1 kV=7.621 kVA=3.30343 kWrated=2.75286 kWhrated=11.0114 %stored=62.5 %reserve=30 %EffCharge=95 %EffDischarge=95 %idlingkW=0 Vminpu=0.95 Vmaxpu=1.05 DispMode=External
New Storage.BESS_10558562 Phases=1 Bus1=10558562.1 kV=7.621 kVA=12.0569 kWrated=10.0474 kWhrated=40.1896 %stored=62.5 %reserve=30 %EffCharge=95 %EffDischarge=95 %idlingkW=0 Vminpu=0.95 Vmaxpu=1.05 DispMode=External
New Storage.BESS_10558573 Phases=1 Bus1=10558573.1 kV=7.621 kVA=32.6239 kWrated=27.1866 kWhrated=108.746 %stored=62.5 %reserve=30 %EffCharge=95 %EffDischarge=95 %idlingkW=0 Vminpu=0.95 Vmaxpu=1.05 DispMode=External
New Storage.BESS_10559386 Phases=1 Bus1=10559386.1 kV=7.621 kVA=23.9157 kWrated=19.9297 kWhrated=79.7189 %stored=62.5 %reserve=30 %EffCharge=95 %EffDischarge=95 %idlingkW=0 Vminpu=0.95 Vmaxpu=1.05 DispMode=External
New Storage.BESS_10559393 Phases=1 Bus1=10559393.1 kV=7.621 kVA=11.8981 kWrated=9.91504 kWhrated=39.6602 %stored=62.5 %reserve=30 %EffCharge=95 %EffDischarge=95 %idlingkW=0 Vminpu=0.95 Vmaxpu=1.05 DispMode=External
New Storage.BESS_10559487 Phases=1 Bus1=10559487.1 kV=7.621 kVA=25.0017 kWrated=20.8347 kWhrated=83.339 %stored=62.5 %reserve=30 %EffCharge=95 %EffDischarge=95 %idlingkW=0 Vminpu=0.95 Vmaxpu=1.05 DispMode=External
New Storage.BESS_10559574 Phases=1 Bus1=10559574.1 kV=7.621 kVA=7.19336 kWrated=5.99447 kWhrated=23.9779 %stored=62.5 %reserve=30 %EffCharge=95 %EffDischarge=95 %idlingkW=0 Vminpu=0.95 Vmaxpu=1.05 DispMode=External
New Storage.BESS_10560281 Phases=1 Bus1=10560281.1 kV=7.621 kVA=22.0624 kWrated=18.3853 kWhrated=73.5413 %stored=62.5 %reserve=30 %EffCharge=95 %EffDischarge=95 %idlingkW=0 Vminpu=0.95 Vmaxpu=1.05 DispMode=External
New Storage.BESS_10560402 Phases=1 Bus1=10560402.1 kV=7.621 kVA=18.3384 kWrated=15.282 kWhrated=61.1278 %stored=62.5 %reserve=30 %EffCharge=95 %EffDischarge=95 %idlingkW=0 Vminpu=0.95 Vmaxpu=1.05 DispMode=External
New Storage.BESS_10579234 Phases=1 Bus1=10579234.1 kV=7.621 kVA=12.0324 kWrated=10.027 kWhrated=40.108 %stored=62.5 %reserve=30 %EffCharge=95 %EffDischarge=95 %idlingkW=0 Vminpu=0.95 Vmaxpu=1.05 DispMode=External
New Storage.BESS_10579833 Phases=1 Bus1=10579833.1 kV=7.621 kVA=7.10776 kWrated=5.92313 kWhrated=23.6925 %stored=62.5 %reserve=30 %EffCharge=95 %EffDischarge=95 %idlingkW=0 Vminpu=0.95 Vmaxpu=1.05 DispMode=External
New Storage.BESS_10580378 Phases=1 Bus1=10580378.1 kV=7.621 kVA=4.55879 kWrated=3.79899 kWhrated=15.196 %stored=62.5 %reserve=30 %EffCharge=95 %EffDischarge=95 %idlingkW=0 Vminpu=0.95 Vmaxpu=1.05 DispMode=External
New Storage.BESS_20014992 Phases=1 Bus1=20014992.1 kV=7.621 kVA=9.77809 kWrated=8.14841 kWhrated=32.5936 %stored=62.5 %reserve=30 %EffCharge=95 %EffDischarge=95 %idlingkW=0 Vminpu=0.95 Vmaxpu=1.05 DispMode=External
New Storage.BESS_20456673 Phases=1 Bus1=20456673.1 kV=7.621 kVA=16.87 kWrated=14.0583 kWhrated=56.2332 %stored=62.5 %reserve=30 %EffCharge=95 %EffDischarge=95 %idlingkW=0 Vminpu=0.95 Vmaxpu=1.05 DispMode=External
New Storage.BESS_34057797 Phases=1 Bus1=34057797.1 kV=7.621 kVA=21.0459 kWrated=17.5383 kWhrated=70.1531 %stored=62.5 %reserve=30 %EffCharge=95 %EffDischarge=95 %idlingkW=0 Vminpu=0.95 Vmaxpu=1.05 DispMode=External
New Storage.BESS_34084666 Phases=1 Bus1=34084666.1 kV=7.621 kVA=8.87573 kWrated=7.39644 kWhrated=29.5858 %stored=62.5 %reserve=30 %EffCharge=95 %EffDischarge=95 %idlingkW=0 Vminpu=0.95 Vmaxpu=1.05 DispMode=External
New Storage.BESS_34084957 Phases=1 Bus1=34084957.1 kV=7.621 kVA=1.67708 kWrated=1.39756 kWhrated=5.59025 %stored=62.5 %reserve=30 %EffCharge=95 %EffDischarge=95 %idlingkW=0 Vminpu=0.95 Vmaxpu=1.05 DispMode=External
New Storage.BESS_34085047 Phases=1 Bus1=34085047.1 kV=7.621 kVA=9.14209 kWrated=7.61841 kWhrated=30.4736 %stored=62.5 %reserve=30 %EffCharge=95 %EffDischarge=95 %idlingkW=0 Vminpu=0.95 Vmaxpu=1.05 DispMode=External
New Storage.BESS_34085264 Phases=1 Bus1=34085264.1 kV=7.621 kVA=8.53264 kWrated=7.11053 kWhrated=28.4421 %stored=62.5 %reserve=30 %EffCharge=95 %EffDischarge=95 %idlingkW=0 Vminpu=0.95 Vmaxpu=1.05 DispMode=External
New Storage.BESS_34085321 Phases=1 Bus1=34085321.1 kV=7.621 kVA=5.25949 kWrated=4.38291 kWhrated=17.5316 %stored=62.5 %reserve=30 %EffCharge=95 %EffDischarge=95 %idlingkW=0 Vminpu=0.95 Vmaxpu=1.05 DispMode=External
New Storage.BESS_34085371 Phases=1 Bus1=34085371.1 kV=7.621 kVA=21.0982 kWrated=17.5818 kWhrated=70.3274 %stored=62.5 %reserve=30 %EffCharge=95 %EffDischarge=95 %idlingkW=0 Vminpu=0.95 Vmaxpu=1.05 DispMode=External
New Storage.BESS_34085442 Phases=1 Bus1=34085442.1 kV=7.621 kVA=20.0534 kWrated=16.7111 kWhrated=66.8446 %stored=62.5 %reserve=30 %EffCharge=95 %EffDischarge=95 %idlingkW=0 Vminpu=0.95 Vmaxpu=1.05 DispMode=External
New Storage.BESS_34085490 Phases=1 Bus1=34085490.1 kV=7.621 kVA=31.5058 kWrated=26.2549 kWhrated=105.019 %stored=62.5 %reserve=30 %EffCharge=95 %EffDischarge=95 %idlingkW=0 Vminpu=0.95 Vmaxpu=1.05 DispMode=External
New Storage.BESS_34086016 Phases=1 Bus1=34086016.1 kV=7.621 kVA=1.32165 kWrated=1.10138 kWhrated=4.40551 %stored=62.5 %reserve=30 %EffCharge=95 %EffDischarge=95 %idlingkW=0 Vminpu=0.95 Vmaxpu=1.05 DispMode=External
New Storage.BESS_34086300 Phases=1 Bus1=34086300.1 kV=7.621 kVA=10.9343 kWrated=9.11194 kWhrated=36.4478 %stored=62.5 %reserve=30 %EffCharge=95 %EffDischarge=95 %idlingkW=0 Vminpu=0.95 Vmaxpu=1.05 DispMode=External
New Storage.BESS_34086306 Phases=1 Bus1=34086306.1 kV=7.621 kVA=13.2228 kWrated=11.019 kWhrated=44.0762 %stored=62.5 %reserve=30 %EffCharge=95 %EffDischarge=95 %idlingkW=0 Vminpu=0.95 Vmaxpu=1.05 DispMode=External
New Storage.BESS_34086309 Phases=1 Bus1=34086309.1 kV=7.621 kVA=13.0839 kWrated=10.9033 kWhrated=43.6131 %stored=62.5 %reserve=30 %EffCharge=95 %EffDischarge=95 %idlingkW=0 Vminpu=0.95 Vmaxpu=1.05 DispMode=External
New Storage.BESS_34086796 Phases=1 Bus1=34086796.1 kV=7.621 kVA=1.86524 kWrated=1.55436 kWhrated=6.21745 %stored=62.5 %reserve=30 %EffCharge=95 %EffDischarge=95 %idlingkW=0 Vminpu=0.95 Vmaxpu=1.05 DispMode=External
New Storage.BESS_34090004 Phases=1 Bus1=34090004.1 kV=7.621 kVA=0.681115 kWrated=0.567595 kWhrated=2.27038 %stored=62.5 %reserve=30 %EffCharge=95 %EffDischarge=95 %idlingkW=0 Vminpu=0.95 Vmaxpu=1.05 DispMode=External
New Storage.BESS_34092154 Phases=1 Bus1=34092154.1 kV=7.621 kVA=12.4529 kWrated=10.3774 kWhrated=41.5095 %stored=62.5 %reserve=30 %EffCharge=95 %EffDischarge=95 %idlingkW=0 Vminpu=0.95 Vmaxpu=1.05 DispMode=External
New Storage.BESS_34092313 Phases=1 Bus1=34092313.1 kV=7.621 kVA=3.02217 kWrated=2.51848 kWhrated=10.0739 %stored=62.5 %reserve=30 %EffCharge=95 %EffDischarge=95 %idlingkW=0 Vminpu=0.95 Vmaxpu=1.05 DispMode=External
New Storage.BESS_34095281 Phases=1 Bus1=34095281.1 kV=7.621 kVA=14.6095 kWrated=12.1746 kWhrated=48.6984 %stored=62.5 %reserve=30 %EffCharge=95 %EffDischarge=95 %idlingkW=0 Vminpu=0.95 Vmaxpu=1.05 DispMode=External
New Storage.BESS_34095581 Phases=1 Bus1=34095581.1 kV=7.621 kVA=8.73753 kWrated=7.28128 kWhrated=29.1251 %stored=62.5 %reserve=30 %EffCharge=95 %EffDischarge=95 %idlingkW=0 Vminpu=0.95 Vmaxpu=1.05 DispMode=External
New Storage.BESS_34095590 Phases=1 Bus1=34095590.1 kV=7.621 kVA=4.01367 kWrated=3.34473 kWhrated=13.3789 %stored=62.5 %reserve=30 %EffCharge=95 %EffDischarge=95 %idlingkW=0 Vminpu=0.95 Vmaxpu=1.05 DispMode=External
New Storage.BESS_34095651 Phases=1 Bus1=34095651.1 kV=7.621 kVA=0.454558 kWrated=0.378798 kWhrated=1.51519 %stored=62.5 %reserve=30 %EffCharge=95 %EffDischarge=95 %idlingkW=0 Vminpu=0.95 Vmaxpu=1.05 DispMode=External
New Storage.BESS_34095658 Phases=1 Bus1=34095658.1 kV=7.621 kVA=7.98382 kWrated=6.65318 kWhrated=26.6127 %stored=62.5 %reserve=30 %EffCharge=95 %EffDischarge=95 %idlingkW=0 Vminpu=0.95 Vmaxpu=1.05 DispMode=External
New Storage.BESS_34095665 Phases=1 Bus1=34095665.1 kV=7.621 kVA=10.6451 kWrated=8.87091 kWhrated=35.4836 %stored=62.5 %reserve=30 %EffCharge=95 %EffDischarge=95 %idlingkW=0 Vminpu=0.95 Vmaxpu=1.05 DispMode=External
New Storage.BESS_34095667 Phases=1 Bus1=34095667.1 kV=7.621 kVA=11.6052 kWrated=9.67097 kWhrated=38.6839 %stored=62.5 %reserve=30 %EffCharge=95 %EffDischarge=95 %idlingkW=0 Vminpu=0.95 Vmaxpu=1.05 DispMode=External
New Storage.BESS_34096116 Phases=1 Bus1=34096116.1 kV=7.621 kVA=4.31139 kWrated=3.59282 kWhrated=14.3713 %stored=62.5 %reserve=30 %EffCharge=95 %EffDischarge=95 %idlingkW=0 Vminpu=0.95 Vmaxpu=1.05 DispMode=External
New Storage.BESS_34096668 Phases=1 Bus1=34096668.1 kV=7.621 kVA=5.59554 kWrated=4.66295 kWhrated=18.6518 %stored=62.5 %reserve=30 %EffCharge=95 %EffDischarge=95 %idlingkW=0 Vminpu=0.95 Vmaxpu=1.05 DispMode=External
New Storage.BESS_34097297 Phases=1 Bus1=34097297.1 kV=7.621 kVA=10.1333 kWrated=8.44442 kWhrated=33.7777 %stored=62.5 %reserve=30 %EffCharge=95 %EffDischarge=95 %idlingkW=0 Vminpu=0.95 Vmaxpu=1.05 DispMode=External
New Storage.BESS_34097393 Phases=1 Bus1=34097393.1 kV=7.621 kVA=7.74576 kWrated=6.4548 kWhrated=25.8192 %stored=62.5 %reserve=30 %EffCharge=95 %EffDischarge=95 %idlingkW=0 Vminpu=0.95 Vmaxpu=1.05 DispMode=External
