! epri_m1_1ph: single-phase per-phase equivalent of test_systems\epri_test_circuits\epri_dpv\M1\Master_NoPV.dss (unmodified original).
! Written by envs/multi_poi/root_level/convert_to_1ph.jl -- do not edit by hand.
! Per-phase equivalent, referred to 12.47 kV: a k-phase section has (3/k) x its positive-sequence
! impedance. Series R + jX only (c1=0 c0=0). Grouped by what each line is in the original.
! Substation transformers: a line with the leakage impedance (%R of both windings + j%X on its rating) in ohm at the distribution-side voltage, from the source bus (parallel units combined).
New Line.xfmr_m1_xfmr Phases=1 Bus1=sourcebus.1 Bus2=temp.1 r1=0.037024 x1=0.74048 c1=0 c0=0 length=1 units=none
! Lines of the original.
New Line.0x00899528_0x008d6c98 Phases=1 Bus1=0x00899528.1 Bus2=0x008d6c98.1 r1=0.455753 x1=0.136462 c1=0 c0=0 length=1 units=none
New Line.0x008996e0_0x008d9830 Phases=1 Bus1=0x008996e0.1 Bus2=0x008d9830.1 r1=0.0858718 x1=0.0257118 c1=0 c0=0 length=1 units=none
New Line.0x0089b890_0x008d3750 Phases=1 Bus1=0x0089b890.1 Bus2=0x008d3750.1 r1=0.00218935 x1=0.00218935 c1=0 c0=0 length=1 units=none
New Line.0x0089ba48_0x008e6fb0 Phases=1 Bus1=0x0089ba48.1 Bus2=0x008e6fb0.1 r1=0.0554772 x1=0.0166111 c1=0 c0=0 length=1 units=none
New Line.0x0089bc00_0x008efb78 Phases=1 Bus1=0x0089bc00.1 Bus2=0x008efb78.1 r1=0.00305092 x1=0.00305092 c1=0 c0=0 length=1 units=none
New Line.0x0089bf70_0x008c2648 Phases=1 Bus1=0x0089bf70.1 Bus2=0x008c2648.1 r1=0.0871072 x1=0.0260818 c1=0 c0=0 length=1 units=none
New Line.0x0089c260_0x008e49e0 Phases=1 Bus1=0x0089c260.1 Bus2=0x008e49e0.1 r1=0.0603805 x1=0.0180792 c1=0 c0=0 length=1 units=none
New Line.0x0089c940_0x0089f280 Phases=1 Bus1=0x0089c940.1 Bus2=0x0089f280.1 r1=0.1442 x1=0.0431767 c1=0 c0=0 length=1 units=none
New Line.0x0089caf8_0x008f11d8 Phases=1 Bus1=0x0089caf8.1 Bus2=0x008f11d8.1 r1=0.0021874 x1=0.0021874 c1=0 c0=0 length=1 units=none
New Line.0x0089d020_0x008c2b70 Phases=1 Bus1=0x0089d020.1 Bus2=0x008c2b70.1 r1=0.249053 x1=0.0745718 c1=0 c0=0 length=1 units=none
New Line.0x0089d548_0x008e9580 Phases=1 Bus1=0x0089d548.1 Bus2=0x008e9580.1 r1=0.00437715 x1=0.0068432 c1=0 c0=0 length=1 units=none
New Line.0x0089d700_0x0089e4c0 Phases=1 Bus1=0x0089d700.1 Bus2=0x0089e4c0.1 r1=0.153397 x1=0.0459303 c1=0 c0=0 length=1 units=none
New Line.0x0089da70_0x0089e678 Phases=1 Bus1=0x0089da70.1 Bus2=0x0089e678.1 r1=0.0246945 x1=0.0095513 c1=0 c0=0 length=1 units=none
New Line.0x0089dde0_0x0089d700 Phases=1 Bus1=0x0089d700.1 Bus2=0x0089dde0.1 r1=0.121725 x1=0.0364472 c1=0 c0=0 length=1 units=none
New Line.0x0089e308_0x008c63c0 Phases=1 Bus1=0x0089e308.1 Bus2=0x008c63c0.1 r1=0.0021874 x1=0.0021874 c1=0 c0=0 length=1 units=none
New Line.0x0089e4c0_0x008c5970 Phases=1 Bus1=0x0089e4c0.1 Bus2=0x008c5970.1 r1=0.312598 x1=0.0935985 c1=0 c0=0 length=1 units=none
New Line.0x0089e9e8_0x008f0780 Phases=1 Bus1=0x0089e9e8.1 Bus2=0x008f0780.1 r1=0.0021874 x1=0.0021874 c1=0 c0=0 length=1 units=none
New Line.0x0089eba0_0x008c9750 Phases=1 Bus1=0x0089eba0.1 Bus2=0x008c9750.1 r1=0.226623 x1=0.0678559 c1=0 c0=0 length=1 units=none
New Line.0x0089ed58_0x008ea188 Phases=1 Bus1=0x0089ed58.1 Bus2=0x008ea188.1 r1=0.425734 x1=0.127474 c1=0 c0=0 length=1 units=none
New Line.0x0089ef10_0x008b8ec8 Phases=1 Bus1=0x0089ef10.1 Bus2=0x008b8ec8.1 r1=0.0444542 x1=0.0438007 c1=0 c0=0 length=1 units=none
New Line.0x0089ef10_0x008e3f90 Phases=1 Bus1=0x0089ef10.1 Bus2=0x008e3f90.1 r1=0.00108493 x1=0.00106898 c1=0 c0=0 length=1 units=none
New Line.0x0089f0c8_0x008ca1a0 Phases=1 Bus1=0x0089f0c8.1 Bus2=0x008ca1a0.1 r1=0.0137249 x1=0.0179486 c1=0 c0=0 length=1 units=none
New Line.0x0089f0c8_0x008e61f0 Phases=1 Bus1=0x0089f0c8.1 Bus2=0x008e61f0.1 r1=0.0467313 x1=0.0611123 c1=0 c0=0 length=1 units=none
New Line.0x0089f280_0x0089eba0 Phases=1 Bus1=0x0089eba0.1 Bus2=0x0089f280.1 r1=0.158058 x1=0.047326 c1=0 c0=0 length=1 units=none
New Line.0x0089f5f0_0x0089ed58 Phases=1 Bus1=0x0089ed58.1 Bus2=0x0089f5f0.1 r1=0.00208761 x1=0.00208761 c1=0 c0=0 length=1 units=none
New Line.0x0089f960_0x008f0410 Phases=1 Bus1=0x0089f960.1 Bus2=0x008f0410.1 r1=0.00280001 x1=0.00280001 c1=0 c0=0 length=1 units=none
New Line.0x0089fb18_0x008e9fd0 Phases=1 Bus1=0x0089fb18.1 Bus2=0x008e9fd0.1 r1=0.00172032 x1=0.00169503 c1=0 c0=0 length=1 units=none
New Line.0x0089fe88_0x008f0af0 Phases=1 Bus1=0x0089fe88.1 Bus2=0x008f0af0.1 r1=0.0021874 x1=0.0021874 c1=0 c0=0 length=1 units=none
New Line.0x008b8108_0x008d71c0 Phases=1 Bus1=0x008b8108.1 Bus2=0x008d71c0.1 r1=0.0143384 x1=0.0224166 c1=0 c0=0 length=1 units=none
New Line.0x008b82c0_0x008f0258 Phases=1 Bus1=0x008b82c0.1 Bus2=0x008f0258.1 r1=0.000787389 x1=0.000787389 c1=0 c0=0 length=1 units=none
New Line.0x008b82c0_0x008f2150 Phases=1 Bus1=0x008b82c0.1 Bus2=0x008f2150.1 r1=0.00280001 x1=0.00280001 c1=0 c0=0 length=1 units=none
New Line.0x008b8630_0x008e9738 Phases=1 Bus1=0x008b8630.1 Bus2=0x008e9738.1 r1=0.000787504 x1=0.000787504 c1=0 c0=0 length=1 units=none
New Line.0x008b8630_0x008ed6c8 Phases=1 Bus1=0x008b8630.1 Bus2=0x008ed6c8.1 r1=0.00226182 x1=0.00226182 c1=0 c0=0 length=1 units=none
New Line.0x008b87e8_0x008cada8 Phases=1 Bus1=0x008b87e8.1 Bus2=0x008cada8.1 r1=0.0603335 x1=0.0180651 c1=0 c0=0 length=1 units=none
New Line.0x008b89a0_0x008d3fe8 Phases=1 Bus1=0x008b89a0.1 Bus2=0x008d3fe8.1 r1=0.0543454 x1=0.0535464 c1=0 c0=0 length=1 units=none
New Line.0x008b8b58_0x008d52d0 Phases=1 Bus1=0x008b8b58.1 Bus2=0x008d52d0.1 r1=0.000791064 x1=0.000791064 c1=0 c0=0 length=1 units=none
New Line.0x008b8b58_0x008e1c98 Phases=1 Bus1=0x008b8b58.1 Bus2=0x008e1c98.1 r1=0.00276832 x1=0.00276832 c1=0 c0=0 length=1 units=none
New Line.0x008b8d10_0x008eb470 Phases=1 Bus1=0x008b8d10.1 Bus2=0x008eb470.1 r1=0.0835437 x1=0.0250148 c1=0 c0=0 length=1 units=none
New Line.0x008c2490_0x0089bf70 Phases=1 Bus1=0x0089bf70.1 Bus2=0x008c2490.1 r1=0.0586091 x1=0.0175488 c1=0 c0=0 length=1 units=none
New Line.0x008c2648_0x008c3558 Phases=1 Bus1=0x008c2648.1 Bus2=0x008c3558.1 r1=0.0296232 x1=0.00886983 c1=0 c0=0 length=1 units=none
New Line.0x008c2800_0x008c87d8 Phases=1 Bus1=0x008c2800.1 Bus2=0x008c87d8.1 r1=0.00881439 x1=0.0086848 c1=0 c0=0 length=1 units=none
New Line.0x008c2b70_0x008c2490 Phases=1 Bus1=0x008c2490.1 Bus2=0x008c2b70.1 r1=0.108438 x1=0.0324688 c1=0 c0=0 length=1 units=none
New Line.0x008c31e8_0x008cf420 Phases=1 Bus1=0x008c31e8.1 Bus2=0x008cf420.1 r1=0.00208761 x1=0.00208761 c1=0 c0=0 length=1 units=none
New Line.0x008c3710_0x008cbd20 Phases=1 Bus1=0x008c3710.1 Bus2=0x008cbd20.1 r1=0.00208761 x1=0.00208761 c1=0 c0=0 length=1 units=none
New Line.0x008c3c38_0x008cd1c0 Phases=1 Bus1=0x008c3c38.1 Bus2=0x008cd1c0.1 r1=0.00208761 x1=0.00208761 c1=0 c0=0 length=1 units=none
New Line.0x008c3fa8_0x008da280 Phases=1 Bus1=0x008c3fa8.1 Bus2=0x008da280.1 r1=0.0021874 x1=0.0021874 c1=0 c0=0 length=1 units=none
New Line.0x008c4160_0x008f1a70 Phases=1 Bus1=0x008c4160.1 Bus2=0x008f1a70.1 r1=0.0021874 x1=0.0021874 c1=0 c0=0 length=1 units=none
New Line.0x008c4bb0_0x008c5290 Phases=1 Bus1=0x008c4bb0.1 Bus2=0x008c5290.1 r1=0.0840004 x1=0.0251515 c1=0 c0=0 length=1 units=none
New Line.0x008c4d68_0x008df6c8 Phases=1 Bus1=0x008c4d68.1 Bus2=0x008df6c8.1 r1=0.165984 x1=0.049699 c1=0 c0=0 length=1 units=none
New Line.0x008c50d8_0x008c49f8 Phases=1 Bus1=0x008c49f8.1 Bus2=0x008c50d8.1 r1=0.316322 x1=0.0947136 c1=0 c0=0 length=1 units=none
New Line.0x008c5290_0x008f18b8 Phases=1 Bus1=0x008c5290.1 Bus2=0x008f18b8.1 r1=0.061077 x1=0.0182878 c1=0 c0=0 length=1 units=none
New Line.0x008c57b8_0x008d0a78 Phases=1 Bus1=0x008c57b8.1 Bus2=0x008d0a78.1 r1=0.00220497 x1=0.00220497 c1=0 c0=0 length=1 units=none
New Line.0x008c5970_0x008ca358 Phases=1 Bus1=0x008c5970.1 Bus2=0x008ca358.1 r1=0.408683 x1=0.122369 c1=0 c0=0 length=1 units=none
New Line.0x008c6050_0x008c68e8 Phases=1 Bus1=0x008c6050.1 Bus2=0x008c68e8.1 r1=0.216508 x1=0.0648272 c1=0 c0=0 length=1 units=none
New Line.0x008c63c0_0x008f2830 Phases=1 Bus1=0x008c63c0.1 Bus2=0x008f2830.1 r1=0.364017 x1=0.108995 c1=0 c0=0 length=1 units=none
New Line.0x008c6578_0x008c4318 Phases=1 Bus1=0x008c4318.1 Bus2=0x008c6578.1 r1=0.00690623 x1=0.0107971 c1=0 c0=0 length=1 units=none
New Line.0x008c68e8_0x008f3280 Phases=1 Bus1=0x008c68e8.1 Bus2=0x008f3280.1 r1=0.18085 x1=0.0541505 c1=0 c0=0 length=1 units=none
New Line.0x008c6c58_0x008e0640 Phases=1 Bus1=0x008c6c58.1 Bus2=0x008e0640.1 r1=0.00209921 x1=0.00209921 c1=0 c0=0 length=1 units=none
New Line.0x008c6e10_0x008f1390 Phases=1 Bus1=0x008c6e10.1 Bus2=0x008f1390.1 r1=0.0021874 x1=0.0021874 c1=0 c0=0 length=1 units=none
New Line.0x008c6fc8_0x008e1ae0 Phases=1 Bus1=0x008c6fc8.1 Bus2=0x008e1ae0.1 r1=0.298547 x1=0.0893912 c1=0 c0=0 length=1 units=none
New Line.0x008c7180_0x008f2f10 Phases=1 Bus1=0x008c7180.1 Bus2=0x008f2f10.1 r1=0.00315013 x1=0.00315013 c1=0 c0=0 length=1 units=none
New Line.0x008c7180_0x008f30c8 Phases=1 Bus1=0x008c7180.1 Bus2=0x008f30c8.1 r1=0.00315013 x1=0.00315013 c1=0 c0=0 length=1 units=none
New Line.0x008c7338_0x008f3960 Phases=1 Bus1=0x008c7338.1 Bus2=0x008f3960.1 r1=0.0637369 x1=0.0190842 c1=0 c0=0 length=1 units=none
New Line.0x008c76a8_0x008df510 Phases=1 Bus1=0x008c76a8.1 Bus2=0x008df510.1 r1=0.0373841 x1=0.0170963 c1=0 c0=0 length=1 units=none
New Line.0x008c7860_0x008cabf0 Phases=1 Bus1=0x008c7860.1 Bus2=0x008cabf0.1 r1=0.0812328 x1=0.0243228 c1=0 c0=0 length=1 units=none
New Line.0x008c7a18_0x008ce660 Phases=1 Bus1=0x008c7a18.1 Bus2=0x008ce660.1 r1=0.251345 x1=0.0752581 c1=0 c0=0 length=1 units=none
New Line.0x008c82b0_0x008cda58 Phases=1 Bus1=0x008c82b0.1 Bus2=0x008cda58.1 r1=0.00405319 x1=0.00633673 c1=0 c0=0 length=1 units=none
New Line.0x008c82b0_0x008d84a8 Phases=1 Bus1=0x008c82b0.1 Bus2=0x008d84a8.1 r1=0.00163577 x1=0.00255735 c1=0 c0=0 length=1 units=none
New Line.0x008c8468_0x008c7a18 Phases=1 Bus1=0x008c7a18.1 Bus2=0x008c8468.1 r1=0.151679 x1=0.0454161 c1=0 c0=0 length=1 units=none
New Line.0x008c8620_0x008d1178 Phases=1 Bus1=0x008c8620.1 Bus2=0x008d1178.1 r1=0.00220497 x1=0.00220497 c1=0 c0=0 length=1 units=none
New Line.0x008c87d8_0x008dd2a8 Phases=1 Bus1=0x008c87d8.1 Bus2=0x008dd2a8.1 r1=0.00107537 x1=0.00105956 c1=0 c0=0 length=1 units=none
New Line.0x008c87d8_0x008f1de0 Phases=1 Bus1=0x008c87d8.1 Bus2=0x008f1de0.1 r1=0.00280001 x1=0.00280001 c1=0 c0=0 length=1 units=none
New Line.0x008c8990_0x008c8468 Phases=1 Bus1=0x008c8468.1 Bus2=0x008c8990.1 r1=0.152177 x1=0.0455651 c1=0 c0=0 length=1 units=none
New Line.0x008c8b48_0x008ce2f0 Phases=1 Bus1=0x008c8b48.1 Bus2=0x008ce2f0.1 r1=0.170183 x1=0.0509564 c1=0 c0=0 length=1 units=none
New Line.0x008c8d00_0x008d27d0 Phases=1 Bus1=0x008c8d00.1 Bus2=0x008d27d0.1 r1=0.000787389 x1=0.000787389 c1=0 c0=0 length=1 units=none
New Line.0x008c8d00_0x008e4148 Phases=1 Bus1=0x008c8d00.1 Bus2=0x008e4148.1 r1=0.00274398 x1=0.00274398 c1=0 c0=0 length=1 units=none
New Line.0x008c8eb8_0x008dff60 Phases=1 Bus1=0x008c8eb8.1 Bus2=0x008dff60.1 r1=1.17411 x1=0.351555 c1=0 c0=0 length=1 units=none
New Line.0x008c9070_0x008de908 Phases=1 Bus1=0x008c9070.1 Bus2=0x008de908.1 r1=0.0428602 x1=0.0128333 c1=0 c0=0 length=1 units=none
New Line.0x008c9228_0x008dd460 Phases=1 Bus1=0x008c9228.1 Bus2=0x008dd460.1 r1=0.0367557 x1=0.0362153 c1=0 c0=0 length=1 units=none
New Line.0x008c93e0_0x008d7008 Phases=1 Bus1=0x008c93e0.1 Bus2=0x008d7008.1 r1=0.584448 x1=0.174996 c1=0 c0=0 length=1 units=none
New Line.0x008c9598_0x008c8d00 Phases=1 Bus1=0x008c8d00.1 Bus2=0x008c9598.1 r1=0.00274398 x1=0.00274398 c1=0 c0=0 length=1 units=none
New Line.0x008c9598_0x008ccc98 Phases=1 Bus1=0x008c9598.1 Bus2=0x008ccc98.1 r1=0.000787389 x1=0.000787389 c1=0 c0=0 length=1 units=none
New Line.0x008c9908_0x008ee368 Phases=1 Bus1=0x008c9908.1 Bus2=0x008ee368.1 r1=0.0035874 x1=0.0035874 c1=0 c0=0 length=1 units=none
New Line.0x008ca1a0_0x008d7a58 Phases=1 Bus1=0x008ca1a0.1 Bus2=0x008d7a58.1 r1=0.00119054 x1=0.00155691 c1=0 c0=0 length=1 units=none
New Line.0x008ca358_0x008ef808 Phases=1 Bus1=0x008ca358.1 Bus2=0x008ef808.1 r1=0.07148 x1=0.0214026 c1=0 c0=0 length=1 units=none
New Line.0x008ca510_0x008cdf80 Phases=1 Bus1=0x008ca510.1 Bus2=0x008cdf80.1 r1=0.00245024 x1=0.00245024 c1=0 c0=0 length=1 units=none
New Line.0x008ca6c8_0x008c9070 Phases=1 Bus1=0x008c9070.1 Bus2=0x008ca6c8.1 r1=0.218851 x1=0.0655287 c1=0 c0=0 length=1 units=none
New Line.0x008caa38_0x008d3070 Phases=1 Bus1=0x008caa38.1 Bus2=0x008d3070.1 r1=0.162423 x1=0.0486329 c1=0 c0=0 length=1 units=none
New Line.0x008cada8_0x008dc858 Phases=1 Bus1=0x008cada8.1 Bus2=0x008dc858.1 r1=0.182317 x1=0.0545896 c1=0 c0=0 length=1 units=none
New Line.0x008cb118_0x0089c940 Phases=1 Bus1=0x0089c940.1 Bus2=0x008cb118.1 r1=0.0492496 x1=0.0147464 c1=0 c0=0 length=1 units=none
New Line.0x008cb2d0_0x008d6248 Phases=1 Bus1=0x008cb2d0.1 Bus2=0x008d6248.1 r1=0.0600024 x1=0.017966 c1=0 c0=0 length=1 units=none
New Line.0x008cb488_0x008c8990 Phases=1 Bus1=0x008c8990.1 Bus2=0x008cb488.1 r1=0.220887 x1=0.0661384 c1=0 c0=0 length=1 units=none
New Line.0x008cb9b0_0x008cc770 Phases=1 Bus1=0x008cb9b0.1 Bus2=0x008cc770.1 r1=0.151933 x1=0.0454919 c1=0 c0=0 length=1 units=none
New Line.0x008cbb68_0x008ee890 Phases=1 Bus1=0x008cbb68.1 Bus2=0x008ee890.1 r1=0.0021874 x1=0.0021874 c1=0 c0=0 length=1 units=none
New Line.0x008cbd20_0x0089d020 Phases=1 Bus1=0x0089d020.1 Bus2=0x008cbd20.1 r1=0.308567 x1=0.0923915 c1=0 c0=0 length=1 units=none
New Line.0x008cc090_0x008cd530 Phases=1 Bus1=0x008cc090.1 Bus2=0x008cd530.1 r1=0.305828 x1=0.0915716 c1=0 c0=0 length=1 units=none
New Line.0x008cc770_0x008cf0b0 Phases=1 Bus1=0x008cc770.1 Bus2=0x008cf0b0.1 r1=0.0891286 x1=0.026687 c1=0 c0=0 length=1 units=none
New Line.0x008ccae0_0x008e5cc8 Phases=1 Bus1=0x008ccae0.1 Bus2=0x008e5cc8.1 r1=0.177073 x1=0.0530194 c1=0 c0=0 length=1 units=none
New Line.0x008ccc98_0x008c7f40 Phases=1 Bus1=0x008c7f40.1 Bus2=0x008ccc98.1 r1=0.00315013 x1=0.00315013 c1=0 c0=0 length=1 units=none
New Line.0x008ccc98_0x008d6e50 Phases=1 Bus1=0x008ccc98.1 Bus2=0x008d6e50.1 r1=0.00315002 x1=0.00315002 c1=0 c0=0 length=1 units=none
New Line.0x008cce50_0x008d3e30 Phases=1 Bus1=0x008cce50.1 Bus2=0x008d3e30.1 r1=0.122459 x1=0.0366668 c1=0 c0=0 length=1 units=none
New Line.0x008cd1c0_0x008dcbc8 Phases=1 Bus1=0x008cd1c0.1 Bus2=0x008dcbc8.1 r1=0.070107 x1=0.0209915 c1=0 c0=0 length=1 units=none
New Line.0x008cd378_0x008ce9d0 Phases=1 Bus1=0x008cd378.1 Bus2=0x008ce9d0.1 r1=0.00208761 x1=0.00208761 c1=0 c0=0 length=1 units=none
New Line.0x008cd530_0x008cdc10 Phases=1 Bus1=0x008cd530.1 Bus2=0x008cdc10.1 r1=0.103386 x1=0.0309559 c1=0 c0=0 length=1 units=none
New Line.0x008cd6e8_0x008f0ca8 Phases=1 Bus1=0x008cd6e8.1 Bus2=0x008f0ca8.1 r1=0.151412 x1=0.0453359 c1=0 c0=0 length=1 units=none
New Line.0x008cd8a0_0x008ea6b0 Phases=1 Bus1=0x008cd8a0.1 Bus2=0x008ea6b0.1 r1=0.0461353 x1=0.0138139 c1=0 c0=0 length=1 units=none
New Line.0x008cda58_0x008d59b0 Phases=1 Bus1=0x008cda58.1 Bus2=0x008d59b0.1 r1=0.00347834 x1=0.005438 c1=0 c0=0 length=1 units=none
New Line.0x008cda58_0x008e57a0 Phases=1 Bus1=0x008cda58.1 Bus2=0x008e57a0.1 r1=0.00359218 x1=0.00561599 c1=0 c0=0 length=1 units=none
New Line.0x008cdc10_0x008c80f8 Phases=1 Bus1=0x008c80f8.1 Bus2=0x008cdc10.1 r1=0.0620298 x1=0.018573 c1=0 c0=0 length=1 units=none
New Line.0x008cddc8_0x008d22a8 Phases=1 Bus1=0x008cddc8.1 Bus2=0x008d22a8.1 r1=0.00220497 x1=0.00220497 c1=0 c0=0 length=1 units=none
New Line.0x008cdf80_0x008d2eb0 Phases=1 Bus1=0x008cdf80.1 Bus2=0x008d2eb0.1 r1=0.000787504 x1=0.000787504 c1=0 c0=0 length=1 units=none
New Line.0x008cdf80_0x008d6928 Phases=1 Bus1=0x008cdf80.1 Bus2=0x008d6928.1 r1=0.00274398 x1=0.00274398 c1=0 c0=0 length=1 units=none
New Line.0x008ce138_0x0089e150 Phases=1 Bus1=0x0089e150.1 Bus2=0x008ce138.1 r1=0.130899 x1=0.039194 c1=0 c0=0 length=1 units=none
New Line.0x008ce2f0_0x008cd6e8 Phases=1 Bus1=0x008cd6e8.1 Bus2=0x008ce2f0.1 r1=0.208822 x1=0.0625258 c1=0 c0=0 length=1 units=none
New Line.0x008ce4a8_0x0089c260 Phases=1 Bus1=0x0089c260.1 Bus2=0x008ce4a8.1 r1=0.122333 x1=0.036629 c1=0 c0=0 length=1 units=none
New Line.0x008ce818_0x008dd7d0 Phases=1 Bus1=0x008ce818.1 Bus2=0x008dd7d0.1 r1=0.460913 x1=0.138007 c1=0 c0=0 length=1 units=none
New Line.0x008ce9d0_0x0089dde0 Phases=1 Bus1=0x0089dde0.1 Bus2=0x008ce9d0.1 r1=0.213207 x1=0.0638388 c1=0 c0=0 length=1 units=none
New Line.0x008ced40_0x008ceef8 Phases=1 Bus1=0x008ced40.1 Bus2=0x008ceef8.1 r1=0.20033 x1=0.0599832 c1=0 c0=0 length=1 units=none
New Line.0x008ceef8_0x008d7c10 Phases=1 Bus1=0x008ceef8.1 Bus2=0x008d7c10.1 r1=0.168035 x1=0.0503133 c1=0 c0=0 length=1 units=none
New Line.0x008cf0b0_0x008c7d88 Phases=1 Bus1=0x008c7d88.1 Bus2=0x008cf0b0.1 r1=0.0537839 x1=0.0161041 c1=0 c0=0 length=1 units=none
New Line.0x008cf420_0x008e1248 Phases=1 Bus1=0x008cf420.1 Bus2=0x008e1248.1 r1=0.575544 x1=0.17233 c1=0 c0=0 length=1 units=none
New Line.0x008cf5d8_0x008dc4e8 Phases=1 Bus1=0x008cf5d8.1 Bus2=0x008dc4e8.1 r1=0.280534 x1=0.0839979 c1=0 c0=0 length=1 units=none
New Line.0x008cf790_0x008c50d8 Phases=1 Bus1=0x008c50d8.1 Bus2=0x008cf790.1 r1=0.238092 x1=0.0712899 c1=0 c0=0 length=1 units=none
New Line.0x008cf948_0x008cfb00 Phases=1 Bus1=0x008cf948.1 Bus2=0x008cfb00.1 r1=0.00315013 x1=0.00315013 c1=0 c0=0 length=1 units=none
New Line.0x008cf948_0x008d46c8 Phases=1 Bus1=0x008cf948.1 Bus2=0x008d46c8.1 r1=0.00315013 x1=0.00315013 c1=0 c0=0 length=1 units=none
New Line.0x008cfcb8_0x008e09b0 Phases=1 Bus1=0x008cfcb8.1 Bus2=0x008e09b0.1 r1=0.00209921 x1=0.00209921 c1=0 c0=0 length=1 units=none
New Line.0x008cfe70_0x008cf790 Phases=1 Bus1=0x008cf790.1 Bus2=0x008cfe70.1 r1=0.132293 x1=0.0396113 c1=0 c0=0 length=1 units=none
New Line.0x008d0028_0x008c9228 Phases=1 Bus1=0x008c9228.1 Bus2=0x008d0028.1 r1=0.00280001 x1=0.00280001 c1=0 c0=0 length=1 units=none
New Line.0x008d0028_0x008d1d80 Phases=1 Bus1=0x008d0028.1 Bus2=0x008d1d80.1 r1=0.000787389 x1=0.000787389 c1=0 c0=0 length=1 units=none
New Line.0x008d01e0_0x008da7a8 Phases=1 Bus1=0x008d01e0.1 Bus2=0x008da7a8.1 r1=0.123618 x1=0.0370138 c1=0 c0=0 length=1 units=none
New Line.0x008d0398_0x008c7338 Phases=1 Bus1=0x008c7338.1 Bus2=0x008d0398.1 r1=0.241233 x1=0.0722302 c1=0 c0=0 length=1 units=none
New Line.0x008d0708_0x008d5640 Phases=1 Bus1=0x008d0708.1 Bus2=0x008d5640.1 r1=0.506777 x1=0.15174 c1=0 c0=0 length=1 units=none
New Line.0x008d08c0_0x008da438 Phases=1 Bus1=0x008d08c0.1 Bus2=0x008da438.1 r1=0.181089 x1=0.0542219 c1=0 c0=0 length=1 units=none
New Line.0x008d0a78_0x008d0de8 Phases=1 Bus1=0x008d0a78.1 Bus2=0x008d0de8.1 r1=0.365345 x1=0.109392 c1=0 c0=0 length=1 units=none
New Line.0x008d0de8_0x008cce50 Phases=1 Bus1=0x008cce50.1 Bus2=0x008d0de8.1 r1=0.68471 x1=0.205017 c1=0 c0=0 length=1 units=none
New Line.0x008d0fa0_0x008c82b0 Phases=1 Bus1=0x008c82b0.1 Bus2=0x008d0fa0.1 r1=0.0206632 x1=0.0323046 c1=0 c0=0 length=1 units=none
New Line.0x008d0fa0_0x008d7530 Phases=1 Bus1=0x008d0fa0.1 Bus2=0x008d7530.1 r1=0.0052742 x1=0.00157921 c1=0 c0=0 length=1 units=none
New Line.0x008d1178_0x008ced40 Phases=1 Bus1=0x008ced40.1 Bus2=0x008d1178.1 r1=1.2622 x1=0.377929 c1=0 c0=0 length=1 units=none
New Line.0x008d1330_0x008dd618 Phases=1 Bus1=0x008d1330.1 Bus2=0x008dd618.1 r1=0.437456 x1=0.130984 c1=0 c0=0 length=1 units=none
New Line.0x008d14e8_0x008d0550 Phases=1 Bus1=0x008d0550.1 Bus2=0x008d14e8.1 r1=0.0701199 x1=0.0209954 c1=0 c0=0 length=1 units=none
New Line.0x008d16a0_0x008c33a0 Phases=1 Bus1=0x008c33a0.1 Bus2=0x008d16a0.1 r1=0.0106013 x1=0.0106013 c1=0 c0=0 length=1 units=none
New Line.0x008d1858_0x008d9f10 Phases=1 Bus1=0x008d1858.1 Bus2=0x008d9f10.1 r1=0.130545 x1=0.0390879 c1=0 c0=0 length=1 units=none
New Line.0x008d1a10_0x008d4880 Phases=1 Bus1=0x008d1a10.1 Bus2=0x008d4880.1 r1=0.669592 x1=0.20049 c1=0 c0=0 length=1 units=none
New Line.0x008d1bc8_0x008d6ae0 Phases=1 Bus1=0x008d1bc8.1 Bus2=0x008d6ae0.1 r1=0.127918 x1=0.0383013 c1=0 c0=0 length=1 units=none
New Line.0x008d1d80_0x008c5b28 Phases=1 Bus1=0x008c5b28.1 Bus2=0x008d1d80.1 r1=0.00315013 x1=0.00315013 c1=0 c0=0 length=1 units=none
New Line.0x008d1d80_0x008cb7f8 Phases=1 Bus1=0x008cb7f8.1 Bus2=0x008d1d80.1 r1=0.00315002 x1=0.00315002 c1=0 c0=0 length=1 units=none
New Line.0x008d1f38_0x008c4688 Phases=1 Bus1=0x008c4688.1 Bus2=0x008d1f38.1 r1=0.434896 x1=0.130217 c1=0 c0=0 length=1 units=none
New Line.0x008d22a8_0x008e44b8 Phases=1 Bus1=0x008d22a8.1 Bus2=0x008e44b8.1 r1=1.17889 x1=0.352985 c1=0 c0=0 length=1 units=none
New Line.0x008d2460_0x008d5ed8 Phases=1 Bus1=0x008d2460.1 Bus2=0x008d5ed8.1 r1=0.139737 x1=0.0418401 c1=0 c0=0 length=1 units=none
New Line.0x008d2618_0x008cc5b8 Phases=1 Bus1=0x008cc5b8.1 Bus2=0x008d2618.1 r1=0.359927 x1=0.10777 c1=0 c0=0 length=1 units=none
New Line.0x008d27d0_0x008c6208 Phases=1 Bus1=0x008c6208.1 Bus2=0x008d27d0.1 r1=0.00315013 x1=0.00315013 c1=0 c0=0 length=1 units=none
New Line.0x008d27d0_0x008c9e30 Phases=1 Bus1=0x008c9e30.1 Bus2=0x008d27d0.1 r1=0.00315013 x1=0.00315013 c1=0 c0=0 length=1 units=none
New Line.0x008d2b40_0x008d3ac0 Phases=1 Bus1=0x008d2b40.1 Bus2=0x008d3ac0.1 r1=0.319517 x1=0.0956703 c1=0 c0=0 length=1 units=none
New Line.0x008d2cf8_0x008d0028 Phases=1 Bus1=0x008d0028.1 Bus2=0x008d2cf8.1 r1=0.00274398 x1=0.00274398 c1=0 c0=0 length=1 units=none
New Line.0x008d2cf8_0x008dab18 Phases=1 Bus1=0x008d2cf8.1 Bus2=0x008dab18.1 r1=0.000787389 x1=0.000787389 c1=0 c0=0 length=1 units=none
New Line.0x008d2eb0_0x008cc400 Phases=1 Bus1=0x008cc400.1 Bus2=0x008d2eb0.1 r1=0.00315013 x1=0.00315013 c1=0 c0=0 length=1 units=none
New Line.0x008d2eb0_0x008cc928 Phases=1 Bus1=0x008cc928.1 Bus2=0x008d2eb0.1 r1=0.00315013 x1=0.00315013 c1=0 c0=0 length=1 units=none
New Line.0x008d3228_0x008eaa20 Phases=1 Bus1=0x008d3228.1 Bus2=0x008eaa20.1 r1=0.132816 x1=0.039768 c1=0 c0=0 length=1 units=none
New Line.0x008d33e0_0x008d3598 Phases=1 Bus1=0x008d33e0.1 Bus2=0x008d3598.1 r1=0.494639 x1=0.148106 c1=0 c0=0 length=1 units=none
New Line.0x008d3598_0x008dd988 Phases=1 Bus1=0x008d3598.1 Bus2=0x008dd988.1 r1=0.250837 x1=0.0751059 c1=0 c0=0 length=1 units=none
New Line.0x008d3750_0x008efee8 Phases=1 Bus1=0x008d3750.1 Bus2=0x008efee8.1 r1=0.00350002 x1=0.00350002 c1=0 c0=0 length=1 units=none
New Line.0x008d3908_0x0089f960 Phases=1 Bus1=0x0089f960.1 Bus2=0x008d3908.1 r1=0.0075477 x1=0.00743673 c1=0 c0=0 length=1 units=none
New Line.0x008d3ac0_0x008f3b18 Phases=1 Bus1=0x008d3ac0.1 Bus2=0x008f3b18.1 r1=0.0683701 x1=0.0204715 c1=0 c0=0 length=1 units=none
New Line.0x008d3c78_0x008ce4a8 Phases=1 Bus1=0x008ce4a8.1 Bus2=0x008d3c78.1 r1=0.00208761 x1=0.00208761 c1=0 c0=0 length=1 units=none
New Line.0x008d3e30_0x008d14e8 Phases=1 Bus1=0x008d14e8.1 Bus2=0x008d3e30.1 r1=0.325231 x1=0.0973812 c1=0 c0=0 length=1 units=none
New Line.0x008d3fe8_0x008c9598 Phases=1 Bus1=0x008c9598.1 Bus2=0x008d3fe8.1 r1=0.00280001 x1=0.00280001 c1=0 c0=0 length=1 units=none
New Line.0x008d3fe8_0x008e4670 Phases=1 Bus1=0x008d3fe8.1 Bus2=0x008e4670.1 r1=0.00102083 x1=0.00100582 c1=0 c0=0 length=1 units=none
New Line.0x008d41a0_0x008ea340 Phases=1 Bus1=0x008d41a0.1 Bus2=0x008ea340.1 r1=0.119559 x1=0.0357986 c1=0 c0=0 length=1 units=none
New Line.0x008d4358_0x008d1bc8 Phases=1 Bus1=0x008d1bc8.1 Bus2=0x008d4358.1 r1=0.210825 x1=0.0631255 c1=0 c0=0 length=1 units=none
New Line.0x008d4510_0x008d33e0 Phases=1 Bus1=0x008d33e0.1 Bus2=0x008d4510.1 r1=0.21725 x1=0.0650494 c1=0 c0=0 length=1 units=none
New Line.0x008d4880_0x008d4f60 Phases=1 Bus1=0x008d4880.1 Bus2=0x008d4f60.1 r1=0.269421 x1=0.0806704 c1=0 c0=0 length=1 units=none
New Line.0x008d4a38_0x008b82c0 Phases=1 Bus1=0x008b82c0.1 Bus2=0x008d4a38.1 r1=0.00274398 x1=0.00274398 c1=0 c0=0 length=1 units=none
New Line.0x008d4a38_0x008eaf48 Phases=1 Bus1=0x008d4a38.1 Bus2=0x008eaf48.1 r1=0.000787389 x1=0.000787389 c1=0 c0=0 length=1 units=none
New Line.0x008d4bf0_0x008d5488 Phases=1 Bus1=0x008d4bf0.1 Bus2=0x008d5488.1 r1=0.459031 x1=0.137444 c1=0 c0=0 length=1 units=none
New Line.0x008d4f60_0x008d5d20 Phases=1 Bus1=0x008d4f60.1 Bus2=0x008d5d20.1 r1=0.619868 x1=0.185602 c1=0 c0=0 length=1 units=none
New Line.0x008d5118_0x008c5ce0 Phases=1 Bus1=0x008c5ce0.1 Bus2=0x008d5118.1 r1=0.131687 x1=0.0394298 c1=0 c0=0 length=1 units=none
New Line.0x008d52d0_0x008c5e98 Phases=1 Bus1=0x008c5e98.1 Bus2=0x008d52d0.1 r1=0.00304357 x1=0.00304357 c1=0 c0=0 length=1 units=none
New Line.0x008d52d0_0x008e5430 Phases=1 Bus1=0x008d52d0.1 Bus2=0x008e5430.1 r1=0.0030438 x1=0.0030438 c1=0 c0=0 length=1 units=none
New Line.0x008d5488_0x008d6400 Phases=1 Bus1=0x008d5488.1 Bus2=0x008d6400.1 r1=0.451395 x1=0.135157 c1=0 c0=0 length=1 units=none
New Line.0x008d57f8_0x008caa38 Phases=1 Bus1=0x008caa38.1 Bus2=0x008d57f8.1 r1=0.0360145 x1=0.0107835 c1=0 c0=0 length=1 units=none
New Line.0x008d59b0_0x008efd30 Phases=1 Bus1=0x008d59b0.1 Bus2=0x008efd30.1 r1=0.0301637 x1=0.0471577 c1=0 c0=0 length=1 units=none
New Line.0x008d5d20_0x008c2ee0 Phases=1 Bus1=0x008c2ee0.1 Bus2=0x008d5d20.1 r1=0.0515289 x1=0.0154289 c1=0 c0=0 length=1 units=none
New Line.0x008d5ed8_0x0089ccb0 Phases=1 Bus1=0x0089ccb0.1 Bus2=0x008d5ed8.1 r1=0.0578909 x1=0.0173338 c1=0 c0=0 length=1 units=none
New Line.0x008d6090_0x008dae88 Phases=1 Bus1=0x008d6090.1 Bus2=0x008dae88.1 r1=0.000787504 x1=0.000787504 c1=0 c0=0 length=1 units=none
New Line.0x008d6090_0x008e2378 Phases=1 Bus1=0x008d6090.1 Bus2=0x008e2378.1 r1=0.00274398 x1=0.00274398 c1=0 c0=0 length=1 units=none
New Line.0x008d6248_0x008d57f8 Phases=1 Bus1=0x008d57f8.1 Bus2=0x008d6248.1 r1=0.220398 x1=0.065992 c1=0 c0=0 length=1 units=none
New Line.0x008d6400_0x008de750 Phases=1 Bus1=0x008d6400.1 Bus2=0x008de750.1 r1=0.269576 x1=0.0807169 c1=0 c0=0 length=1 units=none
New Line.0x008d65b8_0x008e7bb8 Phases=1 Bus1=0x008d65b8.1 Bus2=0x008e7bb8.1 r1=0.00664241 x1=0.00868653 c1=0 c0=0 length=1 units=none
New Line.0x008d6928_0x008c7180 Phases=1 Bus1=0x008c7180.1 Bus2=0x008d6928.1 r1=0.00353148 x1=0.00353148 c1=0 c0=0 length=1 units=none
New Line.0x008d6928_0x008cf948 Phases=1 Bus1=0x008cf948.1 Bus2=0x008d6928.1 r1=0.000787504 x1=0.000787504 c1=0 c0=0 length=1 units=none
New Line.0x008d6ae0_0x0089f7a8 Phases=1 Bus1=0x0089f7a8.1 Bus2=0x008d6ae0.1 r1=0.0553377 x1=0.0165693 c1=0 c0=0 length=1 units=none
New Line.0x008d6c98_0x008dcd80 Phases=1 Bus1=0x008d6c98.1 Bus2=0x008dcd80.1 r1=0.43274 x1=0.129571 c1=0 c0=0 length=1 units=none
New Line.0x008d7008_0x0089d1d8 Phases=1 Bus1=0x0089d1d8.1 Bus2=0x008d7008.1 r1=0.0331006 x1=0.00991102 c1=0 c0=0 length=1 units=none
New Line.0x008d7378_0x008e1400 Phases=1 Bus1=0x008d7378.1 Bus2=0x008e1400.1 r1=0.00209921 x1=0.00209921 c1=0 c0=0 length=1 units=none
New Line.0x008d76e8_0x008d1330 Phases=1 Bus1=0x008d1330.1 Bus2=0x008d76e8.1 r1=0.282058 x1=0.0844541 c1=0 c0=0 length=1 units=none
New Line.0x008d78a0_0x008d8d40 Phases=1 Bus1=0x008d78a0.1 Bus2=0x008d8d40.1 r1=0.677007 x1=0.20271 c1=0 c0=0 length=1 units=none
New Line.0x008d7a58_0x008e2908 Phases=1 Bus1=0x008d7a58.1 Bus2=0x008e2908.1 r1=0.00296818 x1=0.00388161 c1=0 c0=0 length=1 units=none
New Line.0x008d7c10_0x008d78a0 Phases=1 Bus1=0x008d78a0.1 Bus2=0x008d7c10.1 r1=0.331743 x1=0.0993309 c1=0 c0=0 length=1 units=none
New Line.0x008d7dc8_0x008eda38 Phases=1 Bus1=0x008d7dc8.1 Bus2=0x008eda38.1 r1=0.139116 x1=0.0416543 c1=0 c0=0 length=1 units=none
New Line.0x008d8138_0x008d89d0 Phases=1 Bus1=0x008d8138.1 Bus2=0x008d89d0.1 r1=0.387728 x1=0.116094 c1=0 c0=0 length=1 units=none
New Line.0x008d82f0_0x00899528 Phases=1 Bus1=0x00899528.1 Bus2=0x008d82f0.1 r1=0.702489 x1=0.21034 c1=0 c0=0 length=1 units=none
New Line.0x008d84a8_0x008c2d28 Phases=1 Bus1=0x008c2d28.1 Bus2=0x008d84a8.1 r1=0.00527081 x1=0.00824034 c1=0 c0=0 length=1 units=none
New Line.0x008d8660_0x008d4358 Phases=1 Bus1=0x008d4358.1 Bus2=0x008d8660.1 r1=0.240064 x1=0.0718803 c1=0 c0=0 length=1 units=none
New Line.0x008d8818_0x008d3750 Phases=1 Bus1=0x008d3750.1 Bus2=0x008d8818.1 r1=0.00273353 x1=0.00273353 c1=0 c0=0 length=1 units=none
New Line.0x008d89d0_0x008d1858 Phases=1 Bus1=0x008d1858.1 Bus2=0x008d89d0.1 r1=0.207986 x1=0.0622755 c1=0 c0=0 length=1 units=none
New Line.0x008d8b88_0x008e3c20 Phases=1 Bus1=0x008d8b88.1 Bus2=0x008e3c20.1 r1=0.0021874 x1=0.0021874 c1=0 c0=0 length=1 units=none
New Line.0x008d8d40_0x008c93e0 Phases=1 Bus1=0x008c93e0.1 Bus2=0x008d8d40.1 r1=0.443967 x1=0.132933 c1=0 c0=0 length=1 units=none
New Line.0x008d9678_0x008ce818 Phases=1 Bus1=0x008ce818.1 Bus2=0x008d9678.1 r1=0.423107 x1=0.126687 c1=0 c0=0 length=1 units=none
New Line.0x008d9830_0x008d9ba0 Phases=1 Bus1=0x008d9830.1 Bus2=0x008d9ba0.1 r1=0.0637034 x1=0.0190742 c1=0 c0=0 length=1 units=none
New Line.0x008d99e8_0x008e07f8 Phases=1 Bus1=0x008d99e8.1 Bus2=0x008e07f8.1 r1=0.115768 x1=0.0346635 c1=0 c0=0 length=1 units=none
New Line.0x008d9ba0_0x008db568 Phases=1 Bus1=0x008d9ba0.1 Bus2=0x008db568.1 r1=0.195656 x1=0.0585837 c1=0 c0=0 length=1 units=none
New Line.0x008d9d58_0x008cc090 Phases=1 Bus1=0x008cc090.1 Bus2=0x008d9d58.1 r1=0.635971 x1=0.190423 c1=0 c0=0 length=1 units=none
New Line.0x008d9f10_0x008dec78 Phases=1 Bus1=0x008d9f10.1 Bus2=0x008dec78.1 r1=0.0289455 x1=0.00866689 c1=0 c0=0 length=1 units=none
New Line.0x008da280_0x008cb9b0 Phases=1 Bus1=0x008cb9b0.1 Bus2=0x008da280.1 r1=0.424776 x1=0.127187 c1=0 c0=0 length=1 units=none
New Line.0x008da438_0x008da960 Phases=1 Bus1=0x008da438.1 Bus2=0x008da960.1 r1=0.0420733 x1=0.0125977 c1=0 c0=0 length=1 units=none
New Line.0x008da5f0_0x008e87c0 Phases=1 Bus1=0x008da5f0.1 Bus2=0x008e87c0.1 r1=0.0619201 x1=0.0185402 c1=0 c0=0 length=1 units=none
New Line.0x008da7a8_0x008ce138 Phases=1 Bus1=0x008ce138.1 Bus2=0x008da7a8.1 r1=0.179998 x1=0.0538952 c1=0 c0=0 length=1 units=none
New Line.0x008da960_0x008dacd0 Phases=1 Bus1=0x008da960.1 Bus2=0x008dacd0.1 r1=0.145898 x1=0.0436849 c1=0 c0=0 length=1 units=none
New Line.0x008dab18_0x008d5b68 Phases=1 Bus1=0x008d5b68.1 Bus2=0x008dab18.1 r1=0.00315013 x1=0.00315013 c1=0 c0=0 length=1 units=none
New Line.0x008dab18_0x008defe8 Phases=1 Bus1=0x008dab18.1 Bus2=0x008defe8.1 r1=0.00315013 x1=0.00315013 c1=0 c0=0 length=1 units=none
New Line.0x008dacd0_0x008e0488 Phases=1 Bus1=0x008dacd0.1 Bus2=0x008e0488.1 r1=0.153171 x1=0.0458627 c1=0 c0=0 length=1 units=none
New Line.0x008dae88_0x008c6aa0 Phases=1 Bus1=0x008c6aa0.1 Bus2=0x008dae88.1 r1=0.00315002 x1=0.00315002 c1=0 c0=0 length=1 units=none
New Line.0x008dae88_0x008e6df8 Phases=1 Bus1=0x008dae88.1 Bus2=0x008e6df8.1 r1=0.00315002 x1=0.00315002 c1=0 c0=0 length=1 units=none
New Line.0x008db040_0x008c2120 Phases=1 Bus1=0x008c2120.1 Bus2=0x008db040.1 r1=0.160943 x1=0.0481898 c1=0 c0=0 length=1 units=none
New Line.0x008db1f8_0x008de228 Phases=1 Bus1=0x008db1f8.1 Bus2=0x008de228.1 r1=0.11559 x1=0.0346101 c1=0 c0=0 length=1 units=none
New Line.0x008db3b0_0x008e7d70 Phases=1 Bus1=0x008db3b0.1 Bus2=0x008e7d70.1 r1=0.00122992 x1=0.00192284 c1=0 c0=0 length=1 units=none
New Line.0x008db568_0x008db040 Phases=1 Bus1=0x008db040.1 Bus2=0x008db568.1 r1=0.160129 x1=0.0479462 c1=0 c0=0 length=1 units=none
New Line.0x008db720_0x008db1f8 Phases=1 Bus1=0x008db1f8.1 Bus2=0x008db720.1 r1=0.116436 x1=0.0348633 c1=0 c0=0 length=1 units=none
New Line.0x008db8d8_0x008d9678 Phases=1 Bus1=0x008d9678.1 Bus2=0x008db8d8.1 r1=0.676235 x1=0.202479 c1=0 c0=0 length=1 units=none
New Line.0x008dba90_0x008e4828 Phases=1 Bus1=0x008dba90.1 Bus2=0x008e4828.1 r1=0.0021874 x1=0.0021874 c1=0 c0=0 length=1 units=none
New Line.0x008dbc48_0x008dbfb8 Phases=1 Bus1=0x008dbc48.1 Bus2=0x008dbfb8.1 r1=0.07901 x1=0.0236573 c1=0 c0=0 length=1 units=none
New Line.0x008dbe00_0x008d4da8 Phases=1 Bus1=0x008d4da8.1 Bus2=0x008dbe00.1 r1=0.000325164 x1=0.000425229 c1=0 c0=0 length=1 units=none
New Line.0x008dbfb8_0x008db720 Phases=1 Bus1=0x008db720.1 Bus2=0x008dbfb8.1 r1=0.516221 x1=0.154567 c1=0 c0=0 length=1 units=none
New Line.0x008dc178_0x0089c5d0 Phases=1 Bus1=0x0089c5d0.1 Bus2=0x008dc178.1 r1=0.00315002 x1=0.00315002 c1=0 c0=0 length=1 units=none
New Line.0x008dc178_0x008dc6a0 Phases=1 Bus1=0x008dc178.1 Bus2=0x008dc6a0.1 r1=0.00315013 x1=0.00315013 c1=0 c0=0 length=1 units=none
New Line.0x008dc330_0x008d4bf0 Phases=1 Bus1=0x008d4bf0.1 Bus2=0x008dc330.1 r1=0.069352 x1=0.0207655 c1=0 c0=0 length=1 units=none
New Line.0x008dc4e8_0x008d2460 Phases=1 Bus1=0x008d2460.1 Bus2=0x008dc4e8.1 r1=0.135826 x1=0.0406693 c1=0 c0=0 length=1 units=none
New Line.0x008dc858_0x008d0708 Phases=1 Bus1=0x008d0708.1 Bus2=0x008dc858.1 r1=0.111414 x1=0.0333598 c1=0 c0=0 length=1 units=none
New Line.0x008dca10_0x008d1a10 Phases=1 Bus1=0x008d1a10.1 Bus2=0x008dca10.1 r1=0.00220497 x1=0.00220497 c1=0 c0=0 length=1 units=none
New Line.0x008dcbc8_0x008dd0f0 Phases=1 Bus1=0x008dcbc8.1 Bus2=0x008dd0f0.1 r1=0.0912048 x1=0.0273087 c1=0 c0=0 length=1 units=none
New Line.0x008dcf38_0x008cb118 Phases=1 Bus1=0x008cb118.1 Bus2=0x008dcf38.1 r1=0.117857 x1=0.035289 c1=0 c0=0 length=1 units=none
New Line.0x008dd0f0_0x008c3a80 Phases=1 Bus1=0x008c3a80.1 Bus2=0x008dd0f0.1 r1=0.0402453 x1=0.0120503 c1=0 c0=0 length=1 units=none
New Line.0x008dd618_0x008d1f38 Phases=1 Bus1=0x008d1f38.1 Bus2=0x008dd618.1 r1=0.245408 x1=0.0734805 c1=0 c0=0 length=1 units=none
New Line.0x008dd7d0_0x008d2618 Phases=1 Bus1=0x008d2618.1 Bus2=0x008dd7d0.1 r1=0.453654 x1=0.135834 c1=0 c0=0 length=1 units=none
New Line.0x008dd988_0x008de598 Phases=1 Bus1=0x008dd988.1 Bus2=0x008de598.1 r1=0.0652957 x1=0.0195509 c1=0 c0=0 length=1 units=none
New Line.0x008ddb40_0x008e8ce8 Phases=1 Bus1=0x008ddb40.1 Bus2=0x008e8ce8.1 r1=0.0283766 x1=0.00849657 c1=0 c0=0 length=1 units=none
New Line.0x008ddcf8_0x008ddb40 Phases=1 Bus1=0x008ddb40.1 Bus2=0x008ddcf8.1 r1=0.130152 x1=0.0389702 c1=0 c0=0 length=1 units=none
New Line.0x008de070_0x008e1770 Phases=1 Bus1=0x008de070.1 Bus2=0x008e1770.1 r1=0.00209921 x1=0.00209921 c1=0 c0=0 length=1 units=none
New Line.0x008de228_0x008c4bb0 Phases=1 Bus1=0x008c4bb0.1 Bus2=0x008de228.1 r1=0.0800515 x1=0.0239691 c1=0 c0=0 length=1 units=none
New Line.0x008de3e0_0x008d76e8 Phases=1 Bus1=0x008d76e8.1 Bus2=0x008de3e0.1 r1=0.12787 x1=0.0382871 c1=0 c0=0 length=1 units=none
New Line.0x008de598_0x008cd8a0 Phases=1 Bus1=0x008cd8a0.1 Bus2=0x008de598.1 r1=0.504834 x1=0.151158 c1=0 c0=0 length=1 units=none
New Line.0x008de908_0x008d6770 Phases=1 Bus1=0x008d6770.1 Bus2=0x008de908.1 r1=0.258884 x1=0.0775154 c1=0 c0=0 length=1 units=none
New Line.0x008deac0_0x008ddcf8 Phases=1 Bus1=0x008ddcf8.1 Bus2=0x008deac0.1 r1=0.0612033 x1=0.0183256 c1=0 c0=0 length=1 units=none
New Line.0x008dec78_0x008e8298 Phases=1 Bus1=0x008dec78.1 Bus2=0x008e8298.1 r1=0.0289488 x1=0.0086679 c1=0 c0=0 length=1 units=none
New Line.0x008dee30_0x008e8450 Phases=1 Bus1=0x008dee30.1 Bus2=0x008e8450.1 r1=0.0698835 x1=0.0209246 c1=0 c0=0 length=1 units=none
New Line.0x008df1a0_0x008dee30 Phases=1 Bus1=0x008dee30.1 Bus2=0x008df1a0.1 r1=0.105404 x1=0.0315603 c1=0 c0=0 length=1 units=none
New Line.0x008df6c8_0x008f3438 Phases=1 Bus1=0x008df6c8.1 Bus2=0x008f3438.1 r1=0.0287802 x1=0.00861742 c1=0 c0=0 length=1 units=none
New Line.0x008dfa38_0x008d0fa0 Phases=1 Bus1=0x008d0fa0.1 Bus2=0x008dfa38.1 r1=0.00499513 x1=0.00780935 c1=0 c0=0 length=1 units=none
New Line.0x008dfbf0_0x008d0398 Phases=1 Bus1=0x008d0398.1 Bus2=0x008dfbf0.1 r1=0.0613936 x1=0.0183825 c1=0 c0=0 length=1 units=none
New Line.0x008dfda8_0x0089c418 Phases=1 Bus1=0x0089c418.1 Bus2=0x008dfda8.1 r1=0.0101481 x1=0.00303857 c1=0 c0=0 length=1 units=none
New Line.0x008dfda8_0x008dfa38 Phases=1 Bus1=0x008dfa38.1 Bus2=0x008dfda8.1 r1=0.00664765 x1=0.0103929 c1=0 c0=0 length=1 units=none
New Line.0x008dff60_0x008e4d50 Phases=1 Bus1=0x008dff60.1 Bus2=0x008e4d50.1 r1=0.0637616 x1=0.0190916 c1=0 c0=0 length=1 units=none
New Line.0x008e0640_0x008e9e18 Phases=1 Bus1=0x008e0640.1 Bus2=0x008e9e18.1 r1=0.269263 x1=0.0806232 c1=0 c0=0 length=1 units=none
New Line.0x008e07f8_0x008d4510 Phases=1 Bus1=0x008d4510.1 Bus2=0x008e07f8.1 r1=0.204221 x1=0.0611483 c1=0 c0=0 length=1 units=none
New Line.0x008e09b0_0x008e93c8 Phases=1 Bus1=0x008e09b0.1 Bus2=0x008e93c8.1 r1=0.0954371 x1=0.0285759 c1=0 c0=0 length=1 units=none
New Line.0x008e0b68_0x008ee520 Phases=1 Bus1=0x008e0b68.1 Bus2=0x008ee520.1 r1=0.875369 x1=0.262104 c1=0 c0=0 length=1 units=none
New Line.0x008e0d20_0x008dfbf0 Phases=1 Bus1=0x008dfbf0.1 Bus2=0x008e0d20.1 r1=0.230801 x1=0.0691066 c1=0 c0=0 length=1 units=none
New Line.0x008e0ed8_0x008b87e8 Phases=1 Bus1=0x008b87e8.1 Bus2=0x008e0ed8.1 r1=0.0021874 x1=0.0021874 c1=0 c0=0 length=1 units=none
New Line.0x008e1090_0x008eb998 Phases=1 Bus1=0x008e1090.1 Bus2=0x008eb998.1 r1=0.524042 x1=0.156909 c1=0 c0=0 length=1 units=none
New Line.0x008e1248_0x008deac0 Phases=1 Bus1=0x008deac0.1 Bus2=0x008e1248.1 r1=0.139018 x1=0.0416249 c1=0 c0=0 length=1 units=none
New Line.0x008e1400_0x008df1a0 Phases=1 Bus1=0x008df1a0.1 Bus2=0x008e1400.1 r1=0.109179 x1=0.0326907 c1=0 c0=0 length=1 units=none
New Line.0x008e1770_0x008f1548 Phases=1 Bus1=0x008e1770.1 Bus2=0x008f1548.1 r1=0.304643 x1=0.0912166 c1=0 c0=0 length=1 units=none
New Line.0x008e1928_0x008c6fc8 Phases=1 Bus1=0x008c6fc8.1 Bus2=0x008e1928.1 r1=0.262239 x1=0.07852 c1=0 c0=0 length=1 units=none
New Line.0x008e1ae0_0x008c8eb8 Phases=1 Bus1=0x008c8eb8.1 Bus2=0x008e1ae0.1 r1=0.030784 x1=0.0092174 c1=0 c0=0 length=1 units=none
New Line.0x008e1c98_0x008e3a68 Phases=1 Bus1=0x008e1c98.1 Bus2=0x008e3a68.1 r1=0.000791064 x1=0.000791064 c1=0 c0=0 length=1 units=none
New Line.0x008e1c98_0x008ee1b0 Phases=1 Bus1=0x008e1c98.1 Bus2=0x008ee1b0.1 r1=0.00280001 x1=0.00280001 c1=0 c0=0 length=1 units=none
New Line.0x008e1e50_0x008b8478 Phases=1 Bus1=0x008b8478.1 Bus2=0x008e1e50.1 r1=0.00383463 x1=0.00383463 c1=0 c0=0 length=1 units=none
New Line.0x008e1e50_0x008b8b58 Phases=1 Bus1=0x008b8b58.1 Bus2=0x008e1e50.1 r1=0.00276809 x1=0.00276809 c1=0 c0=0 length=1 units=none
New Line.0x008e1e50_0x008e9210 Phases=1 Bus1=0x008e1e50.1 Bus2=0x008e9210.1 r1=0.000791064 x1=0.000791064 c1=0 c0=0 length=1 units=none
New Line.0x008e21c0_0x0089e830 Phases=1 Bus1=0x0089e830.1 Bus2=0x008e21c0.1 r1=0.00315002 x1=0.00315002 c1=0 c0=0 length=1 units=none
New Line.0x008e21c0_0x008c5448 Phases=1 Bus1=0x008c5448.1 Bus2=0x008e21c0.1 r1=0.00315002 x1=0.00315002 c1=0 c0=0 length=1 units=none
New Line.0x008e2378_0x008b8630 Phases=1 Bus1=0x008b8630.1 Bus2=0x008e2378.1 r1=0.00274398 x1=0.00274398 c1=0 c0=0 length=1 units=none
New Line.0x008e2378_0x008e21c0 Phases=1 Bus1=0x008e21c0.1 Bus2=0x008e2378.1 r1=0.000787504 x1=0.000787504 c1=0 c0=0 length=1 units=none
New Line.0x008e2598_0x008996e0 Phases=1 Bus1=0x008996e0.1 Bus2=0x008e2598.1 r1=1.10667 x1=0.331361 c1=0 c0=0 length=1 units=none
New Line.0x008e2750_0x008e2ac0 Phases=1 Bus1=0x008e2750.1 Bus2=0x008e2ac0.1 r1=0.0858751 x1=0.0257129 c1=0 c0=0 length=1 units=none
New Line.0x008e2908_0x008dbe00 Phases=1 Bus1=0x008dbe00.1 Bus2=0x008e2908.1 r1=0.00113739 x1=0.00148741 c1=0 c0=0 length=1 units=none
New Line.0x008e2908_0x008f3cd0 Phases=1 Bus1=0x008e2908.1 Bus2=0x008f3cd0.1 r1=0.00113739 x1=0.00148741 c1=0 c0=0 length=1 units=none
New Line.0x008e2ac0_0x008d7dc8 Phases=1 Bus1=0x008d7dc8.1 Bus2=0x008e2ac0.1 r1=0.166696 x1=0.0499123 c1=0 c0=0 length=1 units=none
New Line.0x008e2c78_0x008b8d10 Phases=1 Bus1=0x008b8d10.1 Bus2=0x008e2c78.1 r1=0.913551 x1=0.273537 c1=0 c0=0 length=1 units=none
New Line.0x008e2fe8_0x008e3510 Phases=1 Bus1=0x008e2fe8.1 Bus2=0x008e3510.1 r1=0.12867 x1=0.0385265 c1=0 c0=0 length=1 units=none
New Line.0x008e31a0_0x008ef498 Phases=1 Bus1=0x008e31a0.1 Bus2=0x008ef498.1 r1=0.00305092 x1=0.00305092 c1=0 c0=0 length=1 units=none
New Line.0x008e3358_0x008c8b48 Phases=1 Bus1=0x008c8b48.1 Bus2=0x008e3358.1 r1=0.869346 x1=0.260301 c1=0 c0=0 length=1 units=none
New Line.0x008e3510_0x008e68d0 Phases=1 Bus1=0x008e3510.1 Bus2=0x008e68d0.1 r1=0.106673 x1=0.0319402 c1=0 c0=0 length=1 units=none
New Line.0x008e36c8_0x008e7a00 Phases=1 Bus1=0x008e36c8.1 Bus2=0x008e7a00.1 r1=0.0918155 x1=0.0274915 c1=0 c0=0 length=1 units=none
New Line.0x008e38b0_0x008e7320 Phases=1 Bus1=0x008e38b0.1 Bus2=0x008e7320.1 r1=0.0437036 x1=0.0130858 c1=0 c0=0 length=1 units=none
New Line.0x008e3a68_0x008c9ac0 Phases=1 Bus1=0x008c9ac0.1 Bus2=0x008e3a68.1 r1=0.0030438 x1=0.0030438 c1=0 c0=0 length=1 units=none
New Line.0x008e3a68_0x008da0c8 Phases=1 Bus1=0x008da0c8.1 Bus2=0x008e3a68.1 r1=0.00304368 x1=0.00304368 c1=0 c0=0 length=1 units=none
New Line.0x008e3c20_0x008e7f28 Phases=1 Bus1=0x008e3c20.1 Bus2=0x008e7f28.1 r1=0.307447 x1=0.0920561 c1=0 c0=0 length=1 units=none
New Line.0x008e3dd8_0x008e1090 Phases=1 Bus1=0x008e1090.1 Bus2=0x008e3dd8.1 r1=0.00209921 x1=0.00209921 c1=0 c0=0 length=1 units=none
New Line.0x008e4148_0x008d3908 Phases=1 Bus1=0x008d3908.1 Bus2=0x008e4148.1 r1=0.00280001 x1=0.00280001 c1=0 c0=0 length=1 units=none
New Line.0x008e4148_0x008dc178 Phases=1 Bus1=0x008dc178.1 Bus2=0x008e4148.1 r1=0.000787389 x1=0.000787389 c1=0 c0=0 length=1 units=none
New Line.0x008e4300_0x008e2750 Phases=1 Bus1=0x008e2750.1 Bus2=0x008e4300.1 r1=0.0552168 x1=0.0165331 c1=0 c0=0 length=1 units=none
New Line.0x008e44b8_0x008db8d8 Phases=1 Bus1=0x008db8d8.1 Bus2=0x008e44b8.1 r1=0.53164 x1=0.159184 c1=0 c0=0 length=1 units=none
New Line.0x008e4828_0x008cb488 Phases=1 Bus1=0x008cb488.1 Bus2=0x008e4828.1 r1=0.386482 x1=0.115721 c1=0 c0=0 length=1 units=none
New Line.0x008e49e0_0x008dcf38 Phases=1 Bus1=0x008dcf38.1 Bus2=0x008e49e0.1 r1=0.0169651 x1=0.00507972 c1=0 c0=0 length=1 units=none
New Line.0x008e4b98_0x008ee6d8 Phases=1 Bus1=0x008e4b98.1 Bus2=0x008ee6d8.1 r1=0.0538845 x1=0.0530922 c1=0 c0=0 length=1 units=none
New Line.0x008e4d50_0x008c6050 Phases=1 Bus1=0x008c6050.1 Bus2=0x008e4d50.1 r1=0.0378698 x1=0.011339 c1=0 c0=0 length=1 units=none
New Line.0x008e4f08_0x008e8b30 Phases=1 Bus1=0x008e4f08.1 Bus2=0x008e8b30.1 r1=0.232576 x1=0.0696382 c1=0 c0=0 length=1 units=none
New Line.0x008e5278_0x008e74d8 Phases=1 Bus1=0x008e5278.1 Bus2=0x008e74d8.1 r1=0.447688 x1=0.134047 c1=0 c0=0 length=1 units=none
New Line.0x008e55e8_0x008ef2e0 Phases=1 Bus1=0x008e55e8.1 Bus2=0x008ef2e0.1 r1=0.00219593 x1=0.00219593 c1=0 c0=0 length=1 units=none
New Line.0x008e57a0_0x008ef650 Phases=1 Bus1=0x008e57a0.1 Bus2=0x008ef650.1 r1=0.00102876 x1=0.00160835 c1=0 c0=0 length=1 units=none
New Line.0x008e5958_0x008e4f08 Phases=1 Bus1=0x008e4f08.1 Bus2=0x008e5958.1 r1=0.0021874 x1=0.0021874 c1=0 c0=0 length=1 units=none
New Line.0x008e5b10_0x008c4f20 Phases=1 Bus1=0x008c4f20.1 Bus2=0x008e5b10.1 r1=0.00315013 x1=0.00315013 c1=0 c0=0 length=1 units=none
New Line.0x008e5b10_0x008cb640 Phases=1 Bus1=0x008cb640.1 Bus2=0x008e5b10.1 r1=0.00315002 x1=0.00315002 c1=0 c0=0 length=1 units=none
New Line.0x008e5cc8_0x008da5f0 Phases=1 Bus1=0x008da5f0.1 Bus2=0x008e5cc8.1 r1=0.0133199 x1=0.00398825 c1=0 c0=0 length=1 units=none
New Line.0x008e5e80_0x008d2b40 Phases=1 Bus1=0x008d2b40.1 Bus2=0x008e5e80.1 r1=0.00220497 x1=0.00220497 c1=0 c0=0 length=1 units=none
New Line.0x008e6038_0x008dfda8 Phases=1 Bus1=0x008dfda8.1 Bus2=0x008e6038.1 r1=0.0135468 x1=0.021179 c1=0 c0=0 length=1 units=none
New Line.0x008e61f0_0x008d65b8 Phases=1 Bus1=0x008d65b8.1 Bus2=0x008e61f0.1 r1=0.0250934 x1=0.0328156 c1=0 c0=0 length=1 units=none
New Line.0x008e63a8_0x008e55e8 Phases=1 Bus1=0x008e55e8.1 Bus2=0x008e63a8.1 r1=0.00380638 x1=0.00380638 c1=0 c0=0 length=1 units=none
New Line.0x008e6560_0x008e6a88 Phases=1 Bus1=0x008e6560.1 Bus2=0x008e6a88.1 r1=0.0870023 x1=0.0260503 c1=0 c0=0 length=1 units=none
New Line.0x008e6718_0x0089df98 Phases=1 Bus1=0x0089df98.1 Bus2=0x008e6718.1 r1=0.00170002 x1=0.00167503 c1=0 c0=0 length=1 units=none
New Line.0x008e6718_0x008ca510 Phases=1 Bus1=0x008ca510.1 Bus2=0x008e6718.1 r1=0.0213067 x1=0.00824096 c1=0 c0=0 length=1 units=none
New Line.0x008e68d0_0x0089d390 Phases=1 Bus1=0x0089d390.1 Bus2=0x008e68d0.1 r1=0.0417497 x1=0.0125007 c1=0 c0=0 length=1 units=none
New Line.0x008e6a88_0x008e7168 Phases=1 Bus1=0x008e6a88.1 Bus2=0x008e7168.1 r1=0.102882 x1=0.030805 c1=0 c0=0 length=1 units=none
New Line.0x008e7168_0x008ea4f8 Phases=1 Bus1=0x008e7168.1 Bus2=0x008ea4f8.1 r1=0.0845841 x1=0.0253263 c1=0 c0=0 length=1 units=none
New Line.0x008e7320_0x008e7848 Phases=1 Bus1=0x008e7320.1 Bus2=0x008e7848.1 r1=0.0403804 x1=0.0120908 c1=0 c0=0 length=1 units=none
New Line.0x008e74d8_0x008f2308 Phases=1 Bus1=0x008e74d8.1 Bus2=0x008f2308.1 r1=0.0678578 x1=0.0203181 c1=0 c0=0 length=1 units=none
New Line.0x008e7690_0x008ddeb0 Phases=1 Bus1=0x008ddeb0.1 Bus2=0x008e7690.1 r1=0.276193 x1=0.0826982 c1=0 c0=0 length=1 units=none
New Line.0x008e7848_0x008e4300 Phases=1 Bus1=0x008e4300.1 Bus2=0x008e7848.1 r1=0.0404028 x1=0.0120975 c1=0 c0=0 length=1 units=none
New Line.0x008e7a00_0x008e2e30 Phases=1 Bus1=0x008e2e30.1 Bus2=0x008e7a00.1 r1=0.00605274 x1=0.00181232 c1=0 c0=0 length=1 units=none
New Line.0x008e7d70_0x008e9aa8 Phases=1 Bus1=0x008e7d70.1 Bus2=0x008e9aa8.1 r1=0.0206362 x1=0.0322624 c1=0 c0=0 length=1 units=none
New Line.0x008e7f28_0x008c7860 Phases=1 Bus1=0x008c7860.1 Bus2=0x008e7f28.1 r1=0.336095 x1=0.100634 c1=0 c0=0 length=1 units=none
New Line.0x008e8450_0x008c4d68 Phases=1 Bus1=0x008c4d68.1 Bus2=0x008e8450.1 r1=0.0846187 x1=0.0253366 c1=0 c0=0 length=1 units=none
New Line.0x008e8608_0x008e2c78 Phases=1 Bus1=0x008e2c78.1 Bus2=0x008e8608.1 r1=0.0021874 x1=0.0021874 c1=0 c0=0 length=1 units=none
New Line.0x008e87c0_0x008e8978 Phases=1 Bus1=0x008e87c0.1 Bus2=0x008e8978.1 r1=0.0196073 x1=0.00587086 c1=0 c0=0 length=1 units=none
New Line.0x008e8978_0x0089d8b8 Phases=1 Bus1=0x0089d8b8.1 Bus2=0x008e8978.1 r1=0.102009 x1=0.0305436 c1=0 c0=0 length=1 units=none
New Line.0x008e8b30_0x008ca6c8 Phases=1 Bus1=0x008ca6c8.1 Bus2=0x008e8b30.1 r1=0.352519 x1=0.105552 c1=0 c0=0 length=1 units=none
New Line.0x008e8ce8_0x008e6560 Phases=1 Bus1=0x008e6560.1 Bus2=0x008e8ce8.1 r1=0.0937028 x1=0.0280566 c1=0 c0=0 length=1 units=none
New Line.0x008e9210_0x008e2008 Phases=1 Bus1=0x008e2008.1 Bus2=0x008e9210.1 r1=0.00384864 x1=0.00384864 c1=0 c0=0 length=1 units=none
New Line.0x008e9210_0x008e6c40 Phases=1 Bus1=0x008e6c40.1 Bus2=0x008e9210.1 r1=0.00304368 x1=0.00304368 c1=0 c0=0 length=1 units=none
New Line.0x008e93c8_0x008ea868 Phases=1 Bus1=0x008e93c8.1 Bus2=0x008ea868.1 r1=0.234986 x1=0.0703599 c1=0 c0=0 length=1 units=none
New Line.0x008e9580_0x008b8108 Phases=1 Bus1=0x008b8108.1 Bus2=0x008e9580.1 r1=0.00287965 x1=0.00450202 c1=0 c0=0 length=1 units=none
New Line.0x008e9580_0x008edff8 Phases=1 Bus1=0x008e9580.1 Bus2=0x008edff8.1 r1=0.00498051 x1=0.00778649 c1=0 c0=0 length=1 units=none
New Line.0x008e9738_0x008c6730 Phases=1 Bus1=0x008c6730.1 Bus2=0x008e9738.1 r1=0.00315002 x1=0.00315002 c1=0 c0=0 length=1 units=none
New Line.0x008e9738_0x008c74f0 Phases=1 Bus1=0x008c74f0.1 Bus2=0x008e9738.1 r1=0.00315002 x1=0.00315002 c1=0 c0=0 length=1 units=none
New Line.0x008e9aa8_0x008e6038 Phases=1 Bus1=0x008e6038.1 Bus2=0x008e9aa8.1 r1=0.0231559 x1=0.0362017 c1=0 c0=0 length=1 units=none
New Line.0x008e9aa8_0x008e9c60 Phases=1 Bus1=0x008e9aa8.1 Bus2=0x008e9c60.1 r1=0.0363076 x1=0.0166039 c1=0 c0=0 length=1 units=none
New Line.0x008e9e18_0x008dbc48 Phases=1 Bus1=0x008dbc48.1 Bus2=0x008e9e18.1 r1=0.0887142 x1=0.0265629 c1=0 c0=0 length=1 units=none
New Line.0x008e9fd0_0x008d2988 Phases=1 Bus1=0x008d2988.1 Bus2=0x008e9fd0.1 r1=0.0114841 x1=0.00343857 c1=0 c0=0 length=1 units=none
New Line.0x008e9fd0_0x008df358 Phases=1 Bus1=0x008df358.1 Bus2=0x008e9fd0.1 r1=0.00412335 x1=0.00412335 c1=0 c0=0 length=1 units=none
New Line.0x008e9fd0_0x008edf60 Phases=1 Bus1=0x008e9fd0.1 Bus2=0x008edf60.1 r1=0.0288656 x1=0.0284412 c1=0 c0=0 length=1 units=none
New Line.0x008ea188_0x008ccae0 Phases=1 Bus1=0x008ccae0.1 Bus2=0x008ea188.1 r1=0.0787243 x1=0.0235717 c1=0 c0=0 length=1 units=none
New Line.0x008ea4f8_0x008c3030 Phases=1 Bus1=0x008c3030.1 Bus2=0x008ea4f8.1 r1=0.0321387 x1=0.00962302 c1=0 c0=0 length=1 units=none
New Line.0x008ea6b0_0x008c44d0 Phases=1 Bus1=0x008c44d0.1 Bus2=0x008ea6b0.1 r1=0.0928801 x1=0.0278103 c1=0 c0=0 length=1 units=none
New Line.0x008ea868_0x008eabd8 Phases=1 Bus1=0x008ea868.1 Bus2=0x008eabd8.1 r1=0.0983794 x1=0.0294569 c1=0 c0=0 length=1 units=none
New Line.0x008eaa20_0x008d41a0 Phases=1 Bus1=0x008d41a0.1 Bus2=0x008eaa20.1 r1=0.173362 x1=0.0519082 c1=0 c0=0 length=1 units=none
New Line.0x008eabd8_0x008eb100 Phases=1 Bus1=0x008eabd8.1 Bus2=0x008eb100.1 r1=0.0983692 x1=0.0294538 c1=0 c0=0 length=1 units=none
New Line.0x008ead90_0x008e0d20 Phases=1 Bus1=0x008e0d20.1 Bus2=0x008ead90.1 r1=0.00209921 x1=0.00209921 c1=0 c0=0 length=1 units=none
New Line.0x008eaf48_0x008c4840 Phases=1 Bus1=0x008c4840.1 Bus2=0x008eaf48.1 r1=0.00315013 x1=0.00315013 c1=0 c0=0 length=1 units=none
New Line.0x008eaf48_0x008e98f0 Phases=1 Bus1=0x008e98f0.1 Bus2=0x008eaf48.1 r1=0.00315013 x1=0.00315013 c1=0 c0=0 length=1 units=none
New Line.0x008eb100_0x008d0c30 Phases=1 Bus1=0x008d0c30.1 Bus2=0x008eb100.1 r1=0.234029 x1=0.0700732 c1=0 c0=0 length=1 units=none
New Line.0x008eb2b8_0x008ed358 Phases=1 Bus1=0x008eb2b8.1 Bus2=0x008ed358.1 r1=0.102071 x1=0.0305623 c1=0 c0=0 length=1 units=none
New Line.0x008eb470_0x008d5118 Phases=1 Bus1=0x008d5118.1 Bus2=0x008eb470.1 r1=0.13554 x1=0.0405835 c1=0 c0=0 length=1 units=none
New Line.0x008eb628_0x008d4a38 Phases=1 Bus1=0x008d4a38.1 Bus2=0x008eb628.1 r1=0.00274398 x1=0.00274398 c1=0 c0=0 length=1 units=none
New Line.0x008eb628_0x008edda8 Phases=1 Bus1=0x008eb628.1 Bus2=0x008edda8.1 r1=0.000787389 x1=0.000787389 c1=0 c0=0 length=1 units=none
New Line.0x008eb7e0_0x008dc330 Phases=1 Bus1=0x008dc330.1 Bus2=0x008eb7e0.1 r1=0.684821 x1=0.20505 c1=0 c0=0 length=1 units=none
New Line.0x008eb998_0x008eb2b8 Phases=1 Bus1=0x008eb2b8.1 Bus2=0x008eb998.1 r1=0.0590319 x1=0.0176754 c1=0 c0=0 length=1 units=none
New Line.0x008ed358_0x008e2fe8 Phases=1 Bus1=0x008e2fe8.1 Bus2=0x008ed358.1 r1=0.143058 x1=0.0428347 c1=0 c0=0 length=1 units=none
New Line.0x008ed510_0x008d9d58 Phases=1 Bus1=0x008d9d58.1 Bus2=0x008ed510.1 r1=0.0021874 x1=0.0021874 c1=0 c0=0 length=1 units=none
New Line.0x008ed6c8_0x008c38c8 Phases=1 Bus1=0x008c38c8.1 Bus2=0x008ed6c8.1 r1=0.00818844 x1=0.00806805 c1=0 c0=0 length=1 units=none
New Line.0x008eda38_0x0089fcd0 Phases=1 Bus1=0x0089fcd0.1 Bus2=0x008eda38.1 r1=0.0307699 x1=0.00921318 c1=0 c0=0 length=1 units=none
New Line.0x008edbf0_0x008d3228 Phases=1 Bus1=0x008d3228.1 Bus2=0x008edbf0.1 r1=1.26486 x1=0.378726 c1=0 c0=0 length=1 units=none
New Line.0x008edda8_0x008df880 Phases=1 Bus1=0x008df880.1 Bus2=0x008edda8.1 r1=0.00315013 x1=0.00315013 c1=0 c0=0 length=1 units=none
New Line.0x008edda8_0x008e15b8 Phases=1 Bus1=0x008e15b8.1 Bus2=0x008edda8.1 r1=0.00315002 x1=0.00315002 c1=0 c0=0 length=1 units=none
New Line.0x008edf60_0x008d6090 Phases=1 Bus1=0x008d6090.1 Bus2=0x008edf60.1 r1=0.00246253 x1=0.00246253 c1=0 c0=0 length=1 units=none
New Line.0x008edf60_0x008f05c8 Phases=1 Bus1=0x008edf60.1 Bus2=0x008f05c8.1 r1=0.00101868 x1=0.0010037 c1=0 c0=0 length=1 units=none
New Line.0x008edff8_0x008db3b0 Phases=1 Bus1=0x008db3b0.1 Bus2=0x008edff8.1 r1=0.00261704 x1=0.00409146 c1=0 c0=0 length=1 units=none
New Line.0x008ee1b0_0x0089c788 Phases=1 Bus1=0x0089c788.1 Bus2=0x008ee1b0.1 r1=0.0530543 x1=0.0522743 c1=0 c0=0 length=1 units=none
New Line.0x008ee368_0x008d8660 Phases=1 Bus1=0x008d8660.1 Bus2=0x008ee368.1 r1=0.154261 x1=0.046189 c1=0 c0=0 length=1 units=none
New Line.0x008ee520_0x008d99e8 Phases=1 Bus1=0x008d99e8.1 Bus2=0x008ee520.1 r1=0.410322 x1=0.122859 c1=0 c0=0 length=1 units=none
New Line.0x008ee6d8_0x008e0118 Phases=1 Bus1=0x008e0118.1 Bus2=0x008ee6d8.1 r1=0.00131171 x1=0.00129243 c1=0 c0=0 length=1 units=none
New Line.0x008ee6d8_0x008e1e50 Phases=1 Bus1=0x008e1e50.1 Bus2=0x008ee6d8.1 r1=0.00280001 x1=0.00280001 c1=0 c0=0 length=1 units=none
New Line.0x008ee890_0x008d08c0 Phases=1 Bus1=0x008d08c0.1 Bus2=0x008ee890.1 r1=0.933111 x1=0.279393 c1=0 c0=0 length=1 units=none
New Line.0x008eea48_0x008cd008 Phases=1 Bus1=0x008cd008.1 Bus2=0x008eea48.1 r1=0.00315013 x1=0.00315013 c1=0 c0=0 length=1 units=none
New Line.0x008eea48_0x008e80e0 Phases=1 Bus1=0x008e80e0.1 Bus2=0x008eea48.1 r1=0.00315002 x1=0.00315002 c1=0 c0=0 length=1 units=none
New Line.0x008eec00_0x0089ef10 Phases=1 Bus1=0x0089ef10.1 Bus2=0x008eec00.1 r1=0.00280001 x1=0.00280001 c1=0 c0=0 length=1 units=none
New Line.0x008eedb8_0x008ef2e0 Phases=1 Bus1=0x008eedb8.1 Bus2=0x008ef2e0.1 r1=0.00274642 x1=0.00274642 c1=0 c0=0 length=1 units=none
New Line.0x008eedb8_0x008ef9c0 Phases=1 Bus1=0x008eedb8.1 Bus2=0x008ef9c0.1 r1=0.00311041 x1=0.00311041 c1=0 c0=0 length=1 units=none
New Line.0x008eef70_0x008cfe70 Phases=1 Bus1=0x008cfe70.1 Bus2=0x008eef70.1 r1=1.491 x1=0.446438 c1=0 c0=0 length=1 units=none
New Line.0x008ef128_0x008c6578 Phases=1 Bus1=0x008c6578.1 Bus2=0x008ef128.1 r1=0.000457014 x1=0.000714491 c1=0 c0=0 length=1 units=none
New Line.0x008ef128_0x008c76a8 Phases=1 Bus1=0x008c76a8.1 Bus2=0x008ef128.1 r1=0.0379553 x1=0.0173575 c1=0 c0=0 length=1 units=none
New Line.0x008ef2e0_0x008e50c0 Phases=1 Bus1=0x008e50c0.1 Bus2=0x008ef2e0.1 r1=0.0049673 x1=0.0049673 c1=0 c0=0 length=1 units=none
New Line.0x008ef498_0x008d01e0 Phases=1 Bus1=0x008d01e0.1 Bus2=0x008ef498.1 r1=1.81373 x1=0.543069 c1=0 c0=0 length=1 units=none
New Line.0x008ef650_0x0089dc28 Phases=1 Bus1=0x0089dc28.1 Bus2=0x008ef650.1 r1=0.00741105 x1=0.0115864 c1=0 c0=0 length=1 units=none
New Line.0x008ef650_0x008ef128 Phases=1 Bus1=0x008ef128.1 Bus2=0x008ef650.1 r1=0.00249473 x1=0.00390024 c1=0 c0=0 length=1 units=none
New Line.0x008ef9c0_0x008f24c0 Phases=1 Bus1=0x008ef9c0.1 Bus2=0x008f24c0.1 r1=0.0511359 x1=0.0503841 c1=0 c0=0 length=1 units=none
New Line.0x008efb78_0x008cf5d8 Phases=1 Bus1=0x008cf5d8.1 Bus2=0x008efb78.1 r1=1.12312 x1=0.336287 c1=0 c0=0 length=1 units=none
New Line.0x008efd30_0x008caf60 Phases=1 Bus1=0x008caf60.1 Bus2=0x008efd30.1 r1=0.01307 x1=0.0204335 c1=0 c0=0 length=1 units=none
New Line.0x008efd30_0x008cf268 Phases=1 Bus1=0x008cf268.1 Bus2=0x008efd30.1 r1=0.0108641 x1=0.0169848 c1=0 c0=0 length=1 units=none
New Line.0x008efee8_0x008cb2d0 Phases=1 Bus1=0x008cb2d0.1 Bus2=0x008efee8.1 r1=0.0306253 x1=0.00916987 c1=0 c0=0 length=1 units=none
New Line.0x008f00a0_0x008eef70 Phases=1 Bus1=0x008eef70.1 Bus2=0x008f00a0.1 r1=0.00305092 x1=0.00305092 c1=0 c0=0 length=1 units=none
New Line.0x008f0258_0x008c9fe8 Phases=1 Bus1=0x008c9fe8.1 Bus2=0x008f0258.1 r1=0.00315013 x1=0.00315013 c1=0 c0=0 length=1 units=none
New Line.0x008f0258_0x008ca880 Phases=1 Bus1=0x008ca880.1 Bus2=0x008f0258.1 r1=0.00315002 x1=0.00315002 c1=0 c0=0 length=1 units=none
New Line.0x008f0410_0x008f1f98 Phases=1 Bus1=0x008f0410.1 Bus2=0x008f1f98.1 r1=0.000787389 x1=0.000787389 c1=0 c0=0 length=1 units=none
New Line.0x008f0410_0x008f29e8 Phases=1 Bus1=0x008f0410.1 Bus2=0x008f29e8.1 r1=0.00274398 x1=0.00274398 c1=0 c0=0 length=1 units=none
New Line.0x008f0780_0x008d8138 Phases=1 Bus1=0x008d8138.1 Bus2=0x008f0780.1 r1=0.275467 x1=0.0824808 c1=0 c0=0 length=1 units=none
New Line.0x008f0938_0x008c29b8 Phases=1 Bus1=0x008c29b8.1 Bus2=0x008f0938.1 r1=0.00315013 x1=0.00315013 c1=0 c0=0 length=1 units=none
New Line.0x008f0938_0x008cc248 Phases=1 Bus1=0x008cc248.1 Bus2=0x008f0938.1 r1=0.00315013 x1=0.00315013 c1=0 c0=0 length=1 units=none
New Line.0x008f0af0_0x008d82f0 Phases=1 Bus1=0x008d82f0.1 Bus2=0x008f0af0.1 r1=0.424434 x1=0.127085 c1=0 c0=0 length=1 units=none
New Line.0x008f1020_0x008d8818 Phases=1 Bus1=0x008d8818.1 Bus2=0x008f1020.1 r1=0.00493677 x1=0.00493677 c1=0 c0=0 length=1 units=none
New Line.0x008f11d8_0x008e1928 Phases=1 Bus1=0x008e1928.1 Bus2=0x008f11d8.1 r1=0.12652 x1=0.0378827 c1=0 c0=0 length=1 units=none
New Line.0x008f1390_0x008eb7e0 Phases=1 Bus1=0x008eb7e0.1 Bus2=0x008f1390.1 r1=0.25565 x1=0.076547 c1=0 c0=0 length=1 units=none
New Line.0x008f1548_0x008e38b0 Phases=1 Bus1=0x008e38b0.1 Bus2=0x008f1548.1 r1=0.121716 x1=0.0364442 c1=0 c0=0 length=1 units=none
New Line.0x008f1a70_0x008e0b68 Phases=1 Bus1=0x008e0b68.1 Bus2=0x008f1a70.1 r1=0.118033 x1=0.0353417 c1=0 c0=0 length=1 units=none
New Line.0x008f1c28_0x008e6718 Phases=1 Bus1=0x008e6718.1 Bus2=0x008f1c28.1 r1=0.0328675 x1=0.0323843 c1=0 c0=0 length=1 units=none
New Line.0x008f1de0_0x008d2cf8 Phases=1 Bus1=0x008d2cf8.1 Bus2=0x008f1de0.1 r1=0.00274398 x1=0.00274398 c1=0 c0=0 length=1 units=none
New Line.0x008f1de0_0x008e5b10 Phases=1 Bus1=0x008e5b10.1 Bus2=0x008f1de0.1 r1=0.000787389 x1=0.000787389 c1=0 c0=0 length=1 units=none
New Line.0x008f1f98_0x008e8ea0 Phases=1 Bus1=0x008e8ea0.1 Bus2=0x008f1f98.1 r1=0.00315002 x1=0.00315002 c1=0 c0=0 length=1 units=none
New Line.0x008f2150_0x008ed880 Phases=1 Bus1=0x008ed880.1 Bus2=0x008f2150.1 r1=0.0102415 x1=0.00396121 c1=0 c0=0 length=1 units=none
New Line.0x008f24c0_0x008d20f0 Phases=1 Bus1=0x008d20f0.1 Bus2=0x008f24c0.1 r1=0.00109738 x1=0.00108125 c1=0 c0=0 length=1 units=none
New Line.0x008f24c0_0x008eb628 Phases=1 Bus1=0x008eb628.1 Bus2=0x008f24c0.1 r1=0.00280001 x1=0.00280001 c1=0 c0=0 length=1 units=none
New Line.0x008f2678_0x008e3358 Phases=1 Bus1=0x008e3358.1 Bus2=0x008f2678.1 r1=0.0021874 x1=0.0021874 c1=0 c0=0 length=1 units=none
New Line.0x008f2830_0x008de3e0 Phases=1 Bus1=0x008de3e0.1 Bus2=0x008f2830.1 r1=0.241697 x1=0.0723694 c1=0 c0=0 length=1 units=none
New Line.0x008f29e8_0x008eec00 Phases=1 Bus1=0x008eec00.1 Bus2=0x008f29e8.1 r1=0.00274398 x1=0.00274398 c1=0 c0=0 length=1 units=none
New Line.0x008f29e8_0x008f0938 Phases=1 Bus1=0x008f0938.1 Bus2=0x008f29e8.1 r1=0.000787389 x1=0.000787389 c1=0 c0=0 length=1 units=none
New Line.0x008f2ba0_0x008edbf0 Phases=1 Bus1=0x008edbf0.1 Bus2=0x008f2ba0.1 r1=0.0021874 x1=0.0021874 c1=0 c0=0 length=1 units=none
New Line.0x008f2d58_0x008e2598 Phases=1 Bus1=0x008e2598.1 Bus2=0x008f2d58.1 r1=0.0021874 x1=0.0021874 c1=0 c0=0 length=1 units=none
New Line.0x008f3280_0x008f37a8 Phases=1 Bus1=0x008f3280.1 Bus2=0x008f37a8.1 r1=0.115892 x1=0.0347006 c1=0 c0=0 length=1 units=none
New Line.0x008f35f0_0x008d8818 Phases=1 Bus1=0x008d8818.1 Bus2=0x008f35f0.1 r1=0.00218937 x1=0.00218937 c1=0 c0=0 length=1 units=none
New Line.0x008f37a8_0x008e5278 Phases=1 Bus1=0x008e5278.1 Bus2=0x008f37a8.1 r1=0.576905 x1=0.172738 c1=0 c0=0 length=1 units=none
New Line.0x008f3960_0x008ceb88 Phases=1 Bus1=0x008ceb88.1 Bus2=0x008f3960.1 r1=0.143801 x1=0.0430571 c1=0 c0=0 length=1 units=none
! Closed switches in the original. A switch is not in the model: a short line of 1e-3 + j1e-3 ohm.
New Line.0x0089dc28_0x0089da70 Phases=1 Bus1=0x0089da70.1 Bus2=0x0089dc28.1 r1=0.001 x1=0.001 c1=0 c0=0 length=1 units=none
New Line.0x008b89a0_0x0089c788 Phases=1 Bus1=0x0089c788.1 Bus2=0x008b89a0.1 r1=0.001 x1=0.001 c1=0 c0=0 length=1 units=none
New Line.0x008b8ec8_0x008c2800 Phases=1 Bus1=0x008b8ec8.1 Bus2=0x008c2800.1 r1=0.001 x1=0.001 c1=0 c0=0 length=1 units=none
New Line.0x008c31e8_0x008cc400 Phases=1 Bus1=0x008c31e8.1 Bus2=0x008cc400.1 r1=0.001 x1=0.001 c1=0 c0=0 length=1 units=none
New Line.0x008c3c38_0x008cc928 Phases=1 Bus1=0x008c3c38.1 Bus2=0x008cc928.1 r1=0.001 x1=0.001 c1=0 c0=0 length=1 units=none
New Line.0x008c5b28_0x008cbb68 Phases=1 Bus1=0x008c5b28.1 Bus2=0x008cbb68.1 r1=0.001 x1=0.001 c1=0 c0=0 length=1 units=none
New Line.0x008c6208_0x0089e308 Phases=1 Bus1=0x0089e308.1 Bus2=0x008c6208.1 r1=0.001 x1=0.001 c1=0 c0=0 length=1 units=none
New Line.0x008c6e10_0x0089c5d0 Phases=1 Bus1=0x0089c5d0.1 Bus2=0x008c6e10.1 r1=0.001 x1=0.001 c1=0 c0=0 length=1 units=none
New Line.0x008c7f40_0x0089e9e8 Phases=1 Bus1=0x0089e9e8.1 Bus2=0x008c7f40.1 r1=0.001 x1=0.001 c1=0 c0=0 length=1 units=none
New Line.0x008c9908_0x008defe8 Phases=1 Bus1=0x008c9908.1 Bus2=0x008defe8.1 r1=0.001 x1=0.001 c1=0 c0=0 length=1 units=none
New Line.0x008c9e30_0x008c4160 Phases=1 Bus1=0x008c4160.1 Bus2=0x008c9e30.1 r1=0.001 x1=0.001 c1=0 c0=0 length=1 units=none
New Line.0x008cfb00_0x008cd378 Phases=1 Bus1=0x008cd378.1 Bus2=0x008cfb00.1 r1=0.001 x1=0.001 c1=0 c0=0 length=1 units=none
New Line.0x008cfcb8_0x008c6aa0 Phases=1 Bus1=0x008c6aa0.1 Bus2=0x008cfcb8.1 r1=0.001 x1=0.001 c1=0 c0=0 length=1 units=none
New Line.0x008d16a0_0x008c2d28 Phases=1 Bus1=0x008c2d28.1 Bus2=0x008d16a0.1 r1=0.001 x1=0.001 c1=0 c0=0 length=1 units=none
New Line.0x008d46c8_0x008c3710 Phases=1 Bus1=0x008c3710.1 Bus2=0x008d46c8.1 r1=0.001 x1=0.001 c1=0 c0=0 length=1 units=none
New Line.0x008d6e50_0x0089caf8 Phases=1 Bus1=0x0089caf8.1 Bus2=0x008d6e50.1 r1=0.001 x1=0.001 c1=0 c0=0 length=1 units=none
New Line.0x008d7378_0x008c5448 Phases=1 Bus1=0x008c5448.1 Bus2=0x008d7378.1 r1=0.001 x1=0.001 c1=0 c0=0 length=1 units=none
New Line.0x008d7530_0x0089ba48 Phases=1 Bus1=0x0089ba48.1 Bus2=0x008d7530.1 r1=0.001 x1=0.001 c1=0 c0=0 length=1 units=none
New Line.0x008da0c8_0x008c8620 Phases=1 Bus1=0x008c8620.1 Bus2=0x008da0c8.1 r1=0.001 x1=0.001 c1=0 c0=0 length=1 units=none
New Line.0x008dc6a0_0x0089fe88 Phases=1 Bus1=0x0089fe88.1 Bus2=0x008dc6a0.1 r1=0.001 x1=0.001 c1=0 c0=0 length=1 units=none
New Line.0x008dca10_0x008c9ac0 Phases=1 Bus1=0x008c9ac0.1 Bus2=0x008dca10.1 r1=0.001 x1=0.001 c1=0 c0=0 length=1 units=none
New Line.0x008de070_0x008c74f0 Phases=1 Bus1=0x008c74f0.1 Bus2=0x008de070.1 r1=0.001 x1=0.001 c1=0 c0=0 length=1 units=none
New Line.0x008df358_0x0089d548 Phases=1 Bus1=0x0089d548.1 Bus2=0x008df358.1 r1=0.001 x1=0.001 c1=0 c0=0 length=1 units=none
New Line.0x008df880_0x008c3fa8 Phases=1 Bus1=0x008c3fa8.1 Bus2=0x008df880.1 r1=0.001 x1=0.001 c1=0 c0=0 length=1 units=none
New Line.0x008e0ed8_0x008c9fe8 Phases=1 Bus1=0x008c9fe8.1 Bus2=0x008e0ed8.1 r1=0.001 x1=0.001 c1=0 c0=0 length=1 units=none
New Line.0x008e15b8_0x008d8b88 Phases=1 Bus1=0x008d8b88.1 Bus2=0x008e15b8.1 r1=0.001 x1=0.001 c1=0 c0=0 length=1 units=none
New Line.0x008e31a0_0x008cc248 Phases=1 Bus1=0x008cc248.1 Bus2=0x008e31a0.1 r1=0.001 x1=0.001 c1=0 c0=0 length=1 units=none
New Line.0x008e36c8_0x0089c418 Phases=1 Bus1=0x0089c418.1 Bus2=0x008e36c8.1 r1=0.001 x1=0.001 c1=0 c0=0 length=1 units=none
New Line.0x008e3dd8_0x0089e830 Phases=1 Bus1=0x0089e830.1 Bus2=0x008e3dd8.1 r1=0.001 x1=0.001 c1=0 c0=0 length=1 units=none
New Line.0x008e4b98_0x0089df98 Phases=1 Bus1=0x0089df98.1 Bus2=0x008e4b98.1 r1=0.001 x1=0.001 c1=0 c0=0 length=1 units=none
New Line.0x008e5430_0x008c57b8 Phases=1 Bus1=0x008c57b8.1 Bus2=0x008e5430.1 r1=0.001 x1=0.001 c1=0 c0=0 length=1 units=none
New Line.0x008e5958_0x008ca880 Phases=1 Bus1=0x008ca880.1 Bus2=0x008e5958.1 r1=0.001 x1=0.001 c1=0 c0=0 length=1 units=none
New Line.0x008e5e80_0x008c5e98 Phases=1 Bus1=0x008c5e98.1 Bus2=0x008e5e80.1 r1=0.001 x1=0.001 c1=0 c0=0 length=1 units=none
New Line.0x008e6c40_0x008cddc8 Phases=1 Bus1=0x008cddc8.1 Bus2=0x008e6c40.1 r1=0.001 x1=0.001 c1=0 c0=0 length=1 units=none
New Line.0x008e6df8_0x008c6c58 Phases=1 Bus1=0x008c6c58.1 Bus2=0x008e6df8.1 r1=0.001 x1=0.001 c1=0 c0=0 length=1 units=none
New Line.0x008e7690_0x008d2988 Phases=1 Bus1=0x008d2988.1 Bus2=0x008e7690.1 r1=0.001 x1=0.001 c1=0 c0=0 length=1 units=none
New Line.0x008e7bb8_0x0089fb18 Phases=1 Bus1=0x0089fb18.1 Bus2=0x008e7bb8.1 r1=0.001 x1=0.001 c1=0 c0=0 length=1 units=none
New Line.0x008e80e0_0x0089b890 Phases=1 Bus1=0x0089b890.1 Bus2=0x008e80e0.1 r1=0.001 x1=0.001 c1=0 c0=0 length=1 units=none
New Line.0x008e8608_0x008d5b68 Phases=1 Bus1=0x008d5b68.1 Bus2=0x008e8608.1 r1=0.001 x1=0.001 c1=0 c0=0 length=1 units=none
New Line.0x008e8ea0_0x0089bc00 Phases=1 Bus1=0x0089bc00.1 Bus2=0x008e8ea0.1 r1=0.001 x1=0.001 c1=0 c0=0 length=1 units=none
New Line.0x008e98f0_0x008dba90 Phases=1 Bus1=0x008dba90.1 Bus2=0x008e98f0.1 r1=0.001 x1=0.001 c1=0 c0=0 length=1 units=none
New Line.0x008ead90_0x008c6730 Phases=1 Bus1=0x008c6730.1 Bus2=0x008ead90.1 r1=0.001 x1=0.001 c1=0 c0=0 length=1 units=none
New Line.0x008ed510_0x008c4840 Phases=1 Bus1=0x008c4840.1 Bus2=0x008ed510.1 r1=0.001 x1=0.001 c1=0 c0=0 length=1 units=none
New Line.0x008f00a0_0x008cd008 Phases=1 Bus1=0x008cd008.1 Bus2=0x008f00a0.1 r1=0.001 x1=0.001 c1=0 c0=0 length=1 units=none
New Line.0x008f1020_0x0089bdb8 Phases=1 Bus1=0x0089bdb8.1 Bus2=0x008f1020.1 r1=0.001 x1=0.001 c1=0 c0=0 length=1 units=none
New Line.0x008f1c28_0x008c38c8 Phases=1 Bus1=0x008c38c8.1 Bus2=0x008f1c28.1 r1=0.001 x1=0.001 c1=0 c0=0 length=1 units=none
New Line.0x008f2678_0x008c4f20 Phases=1 Bus1=0x008c4f20.1 Bus2=0x008f2678.1 r1=0.001 x1=0.001 c1=0 c0=0 length=1 units=none
New Line.0x008f2ba0_0x008cb7f8 Phases=1 Bus1=0x008cb7f8.1 Bus2=0x008f2ba0.1 r1=0.001 x1=0.001 c1=0 c0=0 length=1 units=none
New Line.0x008f2d58_0x008cb640 Phases=1 Bus1=0x008cb640.1 Bus2=0x008f2d58.1 r1=0.001 x1=0.001 c1=0 c0=0 length=1 units=none
New Line.0x008f2f10_0x0089f5f0 Phases=1 Bus1=0x0089f5f0.1 Bus2=0x008f2f10.1 r1=0.001 x1=0.001 c1=0 c0=0 length=1 units=none
New Line.0x008f30c8_0x008d3c78 Phases=1 Bus1=0x008d3c78.1 Bus2=0x008f30c8.1 r1=0.001 x1=0.001 c1=0 c0=0 length=1 units=none
New Line.0x008f35f0_0x008c29b8 Phases=1 Bus1=0x008c29b8.1 Bus2=0x008f35f0.1 r1=0.001 x1=0.001 c1=0 c0=0 length=1 units=none
New Line.temp Phases=1 Bus1=temp.1 Bus2=temp2.1 r1=0.001 x1=0.001 c1=0 c0=0 length=1 units=none
New Line.temp1 Phases=1 Bus1=aggld.1 Bus2=temp2.1 r1=0.001 x1=0.001 c1=0 c0=0 length=1 units=none
New Line.temp2 Phases=1 Bus1=0x0089f0c8.1 Bus2=temp2.1 r1=0.001 x1=0.001 c1=0 c0=0 length=1 units=none
! Lines of the original below 1e-4 ohm (bus bars, jumpers): 1e-3 + j1e-3 ohm, to keep the admittance matrix well scaled.
New Line.0x008b8b58_0x008e63a8 Phases=1 Bus1=0x008b8b58.1 Bus2=0x008e63a8.1 r1=0.001 x1=0.001 c1=0 c0=0 length=1 units=none
