! epri_m1_1ph: single-phase per-phase equivalent of test_systems\epri_test_circuits\epri_dpv\M1\Master_NoPV.dss (unmodified original).
! Written by envs/multi_poi/root_level/convert_to_1ph.jl -- do not edit by hand.
! Each customer load summed onto the MV bus of its service transformer, divided by 3.
New load.L_0x00899528 Bus=0x00899528.1 Phases=1 Model=1 kV=7.1996 kW=20.1233 kVAr=9.17 Vminpu=0.95 Vmaxpu=1.05 Daily=LoadShapeLoadDefault
New load.L_0x008996e0 Bus=0x008996e0.1 Phases=1 Model=1 kV=7.1996 kW=8.00667 kVAr=3.64667 Vminpu=0.95 Vmaxpu=1.05 Daily=LoadShapeLoadDefault
New load.L_0x0089bf70 Bus=0x0089bf70.1 Phases=1 Model=1 kV=7.1996 kW=11.1033 kVAr=5.06 Vminpu=0.95 Vmaxpu=1.05 Daily=LoadShapeLoadDefault
New load.L_0x0089c260 Bus=0x0089c260.1 Phases=1 Model=1 kV=7.1996 kW=11.04 kVAr=5.03 Vminpu=0.95 Vmaxpu=1.05 Daily=LoadShapeLoadDefault
New load.L_0x0089c940 Bus=0x0089c940.1 Phases=1 Model=1 kV=7.1996 kW=11.4033 kVAr=5.19667 Vminpu=0.95 Vmaxpu=1.05 Daily=LoadShapeLoadDefault
New load.L_0x0089d020 Bus=0x0089d020.1 Phases=1 Model=1 kV=7.1996 kW=6.77333 kVAr=3.08667 Vminpu=0.95 Vmaxpu=1.05 Daily=LoadShapeLoadDefault
New load.L_0x0089d700 Bus=0x0089d700.1 Phases=1 Model=1 kV=7.1996 kW=7.37667 kVAr=3.36 Vminpu=0.95 Vmaxpu=1.05 Daily=LoadShapeLoadDefault
New load.L_0x0089dde0 Bus=0x0089dde0.1 Phases=1 Model=1 kV=7.1996 kW=14.7367 kVAr=6.71333 Vminpu=0.95 Vmaxpu=1.05 Daily=LoadShapeLoadDefault
New load.L_0x0089e4c0 Bus=0x0089e4c0.1 Phases=1 Model=1 kV=7.1996 kW=4.18 kVAr=1.90333 Vminpu=0.95 Vmaxpu=1.05 Daily=LoadShapeLoadDefault
New load.L_0x0089e678 Bus=0x0089e678.1 Phases=1 Model=1 kV=7.1996 kW=34.87 kVAr=15.89 Vminpu=0.95 Vmaxpu=1.05 Daily=LoadShapeLoadDefault
New load.L_0x0089eba0 Bus=0x0089eba0.1 Phases=1 Model=1 kV=7.1996 kW=17.85 kVAr=8.13252 Vminpu=0.95 Vmaxpu=1.05 Daily=LoadShapeLoadDefault
New load.L_0x0089f280 Bus=0x0089f280.1 Phases=1 Model=1 kV=7.1996 kW=15.2233 kVAr=6.93667 Vminpu=0.95 Vmaxpu=1.05 Daily=LoadShapeLoadDefault
New load.L_0x008b8d10 Bus=0x008b8d10.1 Phases=1 Model=1 kV=7.1996 kW=9.45667 kVAr=4.31 Vminpu=0.95 Vmaxpu=1.05 Daily=LoadShapeLoadDefault
New load.L_0x008c2490 Bus=0x008c2490.1 Phases=1 Model=1 kV=7.1996 kW=13.41 kVAr=6.11 Vminpu=0.95 Vmaxpu=1.05 Daily=LoadShapeLoadDefault
New load.L_0x008c2648 Bus=0x008c2648.1 Phases=1 Model=1 kV=7.1996 kW=9.77667 kVAr=4.45333 Vminpu=0.95 Vmaxpu=1.05 Daily=LoadShapeLoadDefault
New load.L_0x008c2b70 Bus=0x008c2b70.1 Phases=1 Model=1 kV=7.1996 kW=17.09 kVAr=7.78667 Vminpu=0.95 Vmaxpu=1.05 Daily=LoadShapeLoadDefault
New load.L_0x008c4bb0 Bus=0x008c4bb0.1 Phases=1 Model=1 kV=7.1996 kW=9.68 kVAr=4.40956 Vminpu=0.95 Vmaxpu=1.05 Daily=LoadShapeLoadDefault
New load.L_0x008c4d68 Bus=0x008c4d68.1 Phases=1 Model=1 kV=7.1996 kW=3.84333 kVAr=1.75 Vminpu=0.95 Vmaxpu=1.05 Daily=LoadShapeLoadDefault
New load.L_0x008c50d8 Bus=0x008c50d8.1 Phases=1 Model=1 kV=7.1996 kW=11.5167 kVAr=5.24667 Vminpu=0.95 Vmaxpu=1.05 Daily=LoadShapeLoadDefault
New load.L_0x008c5290 Bus=0x008c5290.1 Phases=1 Model=1 kV=7.1996 kW=6.25667 kVAr=2.85 Vminpu=0.95 Vmaxpu=1.05 Daily=LoadShapeLoadDefault
New load.L_0x008c5970 Bus=0x008c5970.1 Phases=1 Model=1 kV=7.1996 kW=9.94333 kVAr=4.53 Vminpu=0.95 Vmaxpu=1.05 Daily=LoadShapeLoadDefault
New load.L_0x008c6fc8 Bus=0x008c6fc8.1 Phases=1 Model=1 kV=7.1996 kW=18.3033 kVAr=8.34 Vminpu=0.95 Vmaxpu=1.05 Daily=LoadShapeLoadDefault
New load.L_0x008c7338 Bus=0x008c7338.1 Phases=1 Model=1 kV=7.1996 kW=6.19333 kVAr=2.82333 Vminpu=0.95 Vmaxpu=1.05 Daily=LoadShapeLoadDefault
New load.L_0x008c7860 Bus=0x008c7860.1 Phases=1 Model=1 kV=7.1996 kW=16.6333 kVAr=7.58 Vminpu=0.95 Vmaxpu=1.05 Daily=LoadShapeLoadDefault
New load.L_0x008c7a18 Bus=0x008c7a18.1 Phases=1 Model=1 kV=7.1996 kW=18.1267 kVAr=8.26 Vminpu=0.95 Vmaxpu=1.05 Daily=LoadShapeLoadDefault
New load.L_0x008c8990 Bus=0x008c8990.1 Phases=1 Model=1 kV=7.1996 kW=14.42 kVAr=6.57 Vminpu=0.95 Vmaxpu=1.05 Daily=LoadShapeLoadDefault
New load.L_0x008c8b48 Bus=0x008c8b48.1 Phases=1 Model=1 kV=7.1996 kW=16.13 kVAr=7.35 Vminpu=0.95 Vmaxpu=1.05 Daily=LoadShapeLoadDefault
New load.L_0x008c8eb8 Bus=0x008c8eb8.1 Phases=1 Model=1 kV=7.1996 kW=17.9633 kVAr=8.18333 Vminpu=0.95 Vmaxpu=1.05 Daily=LoadShapeLoadDefault
New load.L_0x008c9070 Bus=0x008c9070.1 Phases=1 Model=1 kV=7.1996 kW=17.3567 kVAr=7.90667 Vminpu=0.95 Vmaxpu=1.05 Daily=LoadShapeLoadDefault
New load.L_0x008c93e0 Bus=0x008c93e0.1 Phases=1 Model=1 kV=7.1996 kW=9.93333 kVAr=4.52667 Vminpu=0.95 Vmaxpu=1.05 Daily=LoadShapeLoadDefault
New load.L_0x008ca358 Bus=0x008ca358.1 Phases=1 Model=1 kV=7.1996 kW=10.8033 kVAr=4.92333 Vminpu=0.95 Vmaxpu=1.05 Daily=LoadShapeLoadDefault
New load.L_0x008ca6c8 Bus=0x008ca6c8.1 Phases=1 Model=1 kV=7.1996 kW=13.3733 kVAr=6.09333 Vminpu=0.95 Vmaxpu=1.05 Daily=LoadShapeLoadDefault
New load.L_0x008cada8 Bus=0x008cada8.1 Phases=1 Model=1 kV=7.1996 kW=15.03 kVAr=6.84667 Vminpu=0.95 Vmaxpu=1.05 Daily=LoadShapeLoadDefault
New load.L_0x008cb488 Bus=0x008cb488.1 Phases=1 Model=1 kV=7.1996 kW=18.68 kVAr=8.51 Vminpu=0.95 Vmaxpu=1.05 Daily=LoadShapeLoadDefault
New load.L_0x008cb9b0 Bus=0x008cb9b0.1 Phases=1 Model=1 kV=7.1996 kW=10.1333 kVAr=4.61667 Vminpu=0.95 Vmaxpu=1.05 Daily=LoadShapeLoadDefault
New load.L_0x008cc090 Bus=0x008cc090.1 Phases=1 Model=1 kV=7.1996 kW=12.06 kVAr=5.49333 Vminpu=0.95 Vmaxpu=1.05 Daily=LoadShapeLoadDefault
New load.L_0x008cc770 Bus=0x008cc770.1 Phases=1 Model=1 kV=7.1996 kW=14.75 kVAr=6.72 Vminpu=0.95 Vmaxpu=1.05 Daily=LoadShapeLoadDefault
New load.L_0x008cce50 Bus=0x008cce50.1 Phases=1 Model=1 kV=7.1996 kW=11.5433 kVAr=5.26 Vminpu=0.95 Vmaxpu=1.05 Daily=LoadShapeLoadDefault
New load.L_0x008cd530 Bus=0x008cd530.1 Phases=1 Model=1 kV=7.1996 kW=13.3533 kVAr=6.08333 Vminpu=0.95 Vmaxpu=1.05 Daily=LoadShapeLoadDefault
New load.L_0x008cd6e8 Bus=0x008cd6e8.1 Phases=1 Model=1 kV=7.1996 kW=13.37 kVAr=6.09 Vminpu=0.95 Vmaxpu=1.05 Daily=LoadShapeLoadDefault
New load.L_0x008cd8a0 Bus=0x008cd8a0.1 Phases=1 Model=1 kV=7.1996 kW=14.6933 kVAr=6.69333 Vminpu=0.95 Vmaxpu=1.05 Daily=LoadShapeLoadDefault
New load.L_0x008cdc10 Bus=0x008cdc10.1 Phases=1 Model=1 kV=7.1996 kW=8.80333 kVAr=4.01 Vminpu=0.95 Vmaxpu=1.05 Daily=LoadShapeLoadDefault
New load.L_0x008ce138 Bus=0x008ce138.1 Phases=1 Model=1 kV=7.1996 kW=12.8079 kVAr=5.83275 Vminpu=0.95 Vmaxpu=1.05 Daily=LoadShapeLoadDefault
New load.L_0x008ce2f0 Bus=0x008ce2f0.1 Phases=1 Model=1 kV=7.1996 kW=12.5833 kVAr=5.73333 Vminpu=0.95 Vmaxpu=1.05 Daily=LoadShapeLoadDefault
New load.L_0x008ce818 Bus=0x008ce818.1 Phases=1 Model=1 kV=7.1996 kW=17.25 kVAr=7.86 Vminpu=0.95 Vmaxpu=1.05 Daily=LoadShapeLoadDefault
New load.L_0x008cf0b0 Bus=0x008cf0b0.1 Phases=1 Model=1 kV=7.1996 kW=10.3867 kVAr=4.73333 Vminpu=0.95 Vmaxpu=1.05 Daily=LoadShapeLoadDefault
New load.L_0x008cf5d8 Bus=0x008cf5d8.1 Phases=1 Model=1 kV=7.1996 kW=10.7644 kVAr=4.90333 Vminpu=0.95 Vmaxpu=1.05 Daily=LoadShapeLoadDefault
New load.L_0x008cf790 Bus=0x008cf790.1 Phases=1 Model=1 kV=7.1996 kW=13.4867 kVAr=6.14333 Vminpu=0.95 Vmaxpu=1.05 Daily=LoadShapeLoadDefault
New load.L_0x008cfe70 Bus=0x008cfe70.1 Phases=1 Model=1 kV=7.1996 kW=9.89667 kVAr=4.51 Vminpu=0.95 Vmaxpu=1.05 Daily=LoadShapeLoadDefault
New load.L_0x008d01e0 Bus=0x008d01e0.1 Phases=1 Model=1 kV=7.1996 kW=12.5533 kVAr=5.72 Vminpu=0.95 Vmaxpu=1.05 Daily=LoadShapeLoadDefault
New load.L_0x008d0398 Bus=0x008d0398.1 Phases=1 Model=1 kV=7.1996 kW=6.57333 kVAr=2.99333 Vminpu=0.95 Vmaxpu=1.05 Daily=LoadShapeLoadDefault
New load.L_0x008d0708 Bus=0x008d0708.1 Phases=1 Model=1 kV=7.1996 kW=16.41 kVAr=7.47667 Vminpu=0.95 Vmaxpu=1.05 Daily=LoadShapeLoadDefault
New load.L_0x008d08c0 Bus=0x008d08c0.1 Phases=1 Model=1 kV=7.1996 kW=7.93256 kVAr=3.74761 Vminpu=0.95 Vmaxpu=1.05 Daily=LoadShapeLoadDefault
New load.L_0x008d0de8 Bus=0x008d0de8.1 Phases=1 Model=1 kV=7.1996 kW=13.35 kVAr=6.08333 Vminpu=0.95 Vmaxpu=1.05 Daily=LoadShapeLoadDefault
New load.L_0x008d1330 Bus=0x008d1330.1 Phases=1 Model=1 kV=7.1996 kW=13.8667 kVAr=6.31667 Vminpu=0.95 Vmaxpu=1.05 Daily=LoadShapeLoadDefault
New load.L_0x008d14e8 Bus=0x008d14e8.1 Phases=1 Model=1 kV=7.1996 kW=17.8467 kVAr=8.13 Vminpu=0.95 Vmaxpu=1.05 Daily=LoadShapeLoadDefault
New load.L_0x008d1bc8 Bus=0x008d1bc8.1 Phases=1 Model=1 kV=7.1996 kW=14.2167 kVAr=6.47667 Vminpu=0.95 Vmaxpu=1.05 Daily=LoadShapeLoadDefault
New load.L_0x008d1f38 Bus=0x008d1f38.1 Phases=1 Model=1 kV=7.1996 kW=14.5733 kVAr=6.64 Vminpu=0.95 Vmaxpu=1.05 Daily=LoadShapeLoadDefault
New load.L_0x008d2460 Bus=0x008d2460.1 Phases=1 Model=1 kV=7.1996 kW=12.8133 kVAr=5.83667 Vminpu=0.95 Vmaxpu=1.05 Daily=LoadShapeLoadDefault
New load.L_0x008d2618 Bus=0x008d2618.1 Phases=1 Model=1 kV=7.1996 kW=18.9467 kVAr=8.63333 Vminpu=0.95 Vmaxpu=1.05 Daily=LoadShapeLoadDefault
New load.L_0x008d3070 Bus=0x008d3070.1 Phases=1 Model=1 kV=7.1996 kW=62.88 kVAr=28.65 Vminpu=0.95 Vmaxpu=1.05 Daily=LoadShapeLoadDefault
New load.L_0x008d3228 Bus=0x008d3228.1 Phases=1 Model=1 kV=7.1996 kW=7.65 kVAr=3.48667 Vminpu=0.95 Vmaxpu=1.05 Daily=LoadShapeLoadDefault
New load.L_0x008d33e0 Bus=0x008d33e0.1 Phases=1 Model=1 kV=7.1996 kW=17.7967 kVAr=8.11 Vminpu=0.95 Vmaxpu=1.05 Daily=LoadShapeLoadDefault
New load.L_0x008d3598 Bus=0x008d3598.1 Phases=1 Model=1 kV=7.1996 kW=18.4767 kVAr=8.41667 Vminpu=0.95 Vmaxpu=1.05 Daily=LoadShapeLoadDefault
New load.L_0x008d3ac0 Bus=0x008d3ac0.1 Phases=1 Model=1 kV=7.1996 kW=21.2 kVAr=9.66 Vminpu=0.95 Vmaxpu=1.05 Daily=LoadShapeLoadDefault
New load.L_0x008d3e30 Bus=0x008d3e30.1 Phases=1 Model=1 kV=7.1996 kW=18.7667 kVAr=8.55 Vminpu=0.95 Vmaxpu=1.05 Daily=LoadShapeLoadDefault
New load.L_0x008d41a0 Bus=0x008d41a0.1 Phases=1 Model=1 kV=7.1996 kW=10.4633 kVAr=4.76667 Vminpu=0.95 Vmaxpu=1.05 Daily=LoadShapeLoadDefault
New load.L_0x008d4358 Bus=0x008d4358.1 Phases=1 Model=1 kV=7.1996 kW=13.8833 kVAr=6.32667 Vminpu=0.95 Vmaxpu=1.05 Daily=LoadShapeLoadDefault
New load.L_0x008d4510 Bus=0x008d4510.1 Phases=1 Model=1 kV=7.1996 kW=13.2767 kVAr=6.05 Vminpu=0.95 Vmaxpu=1.05 Daily=LoadShapeLoadDefault
New load.L_0x008d4880 Bus=0x008d4880.1 Phases=1 Model=1 kV=7.1996 kW=15.7167 kVAr=7.16 Vminpu=0.95 Vmaxpu=1.05 Daily=LoadShapeLoadDefault
New load.L_0x008d4bf0 Bus=0x008d4bf0.1 Phases=1 Model=1 kV=7.1996 kW=17.0077 kVAr=7.02444 Vminpu=0.95 Vmaxpu=1.05 Daily=LoadShapeLoadDefault
New load.L_0x008d4f60 Bus=0x008d4f60.1 Phases=1 Model=1 kV=7.1996 kW=18.9133 kVAr=8.61667 Vminpu=0.95 Vmaxpu=1.05 Daily=LoadShapeLoadDefault
New load.L_0x008d5118 Bus=0x008d5118.1 Phases=1 Model=1 kV=7.1996 kW=9.91 kVAr=4.51667 Vminpu=0.95 Vmaxpu=1.05 Daily=LoadShapeLoadDefault
New load.L_0x008d5488 Bus=0x008d5488.1 Phases=1 Model=1 kV=7.1996 kW=9.86333 kVAr=4.49333 Vminpu=0.95 Vmaxpu=1.05 Daily=LoadShapeLoadDefault
New load.L_0x008d5d20 Bus=0x008d5d20.1 Phases=1 Model=1 kV=7.1996 kW=17.6433 kVAr=8.04 Vminpu=0.95 Vmaxpu=1.05 Daily=LoadShapeLoadDefault
New load.L_0x008d5ed8 Bus=0x008d5ed8.1 Phases=1 Model=1 kV=7.1996 kW=9.39333 kVAr=4.28 Vminpu=0.95 Vmaxpu=1.05 Daily=LoadShapeLoadDefault
New load.L_0x008d6400 Bus=0x008d6400.1 Phases=1 Model=1 kV=7.1996 kW=18.4967 kVAr=8.42667 Vminpu=0.95 Vmaxpu=1.05 Daily=LoadShapeLoadDefault
New load.L_0x008d6ae0 Bus=0x008d6ae0.1 Phases=1 Model=1 kV=7.1996 kW=14.6467 kVAr=6.67333 Vminpu=0.95 Vmaxpu=1.05 Daily=LoadShapeLoadDefault
New load.L_0x008d6c98 Bus=0x008d6c98.1 Phases=1 Model=1 kV=7.1996 kW=15.0533 kVAr=6.86 Vminpu=0.95 Vmaxpu=1.05 Daily=LoadShapeLoadDefault
New load.L_0x008d7008 Bus=0x008d7008.1 Phases=1 Model=1 kV=7.1996 kW=10.3967 kVAr=4.73667 Vminpu=0.95 Vmaxpu=1.05 Daily=LoadShapeLoadDefault
New load.L_0x008d78a0 Bus=0x008d78a0.1 Phases=1 Model=1 kV=7.1996 kW=17.3567 kVAr=7.90667 Vminpu=0.95 Vmaxpu=1.05 Daily=LoadShapeLoadDefault
New load.L_0x008d7c10 Bus=0x008d7c10.1 Phases=1 Model=1 kV=7.1996 kW=16.2133 kVAr=7.38667 Vminpu=0.95 Vmaxpu=1.05 Daily=LoadShapeLoadDefault
New load.L_0x008d7dc8 Bus=0x008d7dc8.1 Phases=1 Model=1 kV=7.1996 kW=13.3967 kVAr=6.10333 Vminpu=0.95 Vmaxpu=1.05 Daily=LoadShapeLoadDefault
New load.L_0x008d8138 Bus=0x008d8138.1 Phases=1 Model=1 kV=7.1996 kW=10.3267 kVAr=4.70333 Vminpu=0.95 Vmaxpu=1.05 Daily=LoadShapeLoadDefault
New load.L_0x008d82f0 Bus=0x008d82f0.1 Phases=1 Model=1 kV=7.1996 kW=12.28 kVAr=5.59333 Vminpu=0.95 Vmaxpu=1.05 Daily=LoadShapeLoadDefault
New load.L_0x008d8660 Bus=0x008d8660.1 Phases=1 Model=1 kV=7.1996 kW=15.3133 kVAr=6.97667 Vminpu=0.95 Vmaxpu=1.05 Daily=LoadShapeLoadDefault
New load.L_0x008d89d0 Bus=0x008d89d0.1 Phases=1 Model=1 kV=7.1996 kW=16.0233 kVAr=7.3 Vminpu=0.95 Vmaxpu=1.05 Daily=LoadShapeLoadDefault
New load.L_0x008d8d40 Bus=0x008d8d40.1 Phases=1 Model=1 kV=7.1996 kW=12.2433 kVAr=5.57667 Vminpu=0.95 Vmaxpu=1.05 Daily=LoadShapeLoadDefault
New load.L_0x008d9678 Bus=0x008d9678.1 Phases=1 Model=1 kV=7.1996 kW=13.13 kVAr=5.98333 Vminpu=0.95 Vmaxpu=1.05 Daily=LoadShapeLoadDefault
New load.L_0x008d9830 Bus=0x008d9830.1 Phases=1 Model=1 kV=7.1996 kW=8.27667 kVAr=3.77 Vminpu=0.95 Vmaxpu=1.05 Daily=LoadShapeLoadDefault
New load.L_0x008d9ba0 Bus=0x008d9ba0.1 Phases=1 Model=1 kV=7.1996 kW=8.71333 kVAr=3.97 Vminpu=0.95 Vmaxpu=1.05 Daily=LoadShapeLoadDefault
New load.L_0x008da438 Bus=0x008da438.1 Phases=1 Model=1 kV=7.1996 kW=13.3267 kVAr=6.07333 Vminpu=0.95 Vmaxpu=1.05 Daily=LoadShapeLoadDefault
New load.L_0x008da5f0 Bus=0x008da5f0.1 Phases=1 Model=1 kV=7.1996 kW=10.7567 kVAr=4.9 Vminpu=0.95 Vmaxpu=1.05 Daily=LoadShapeLoadDefault
New load.L_0x008da7a8 Bus=0x008da7a8.1 Phases=1 Model=1 kV=7.1996 kW=10.3133 kVAr=4.7 Vminpu=0.95 Vmaxpu=1.05 Daily=LoadShapeLoadDefault
New load.L_0x008da960 Bus=0x008da960.1 Phases=1 Model=1 kV=7.1996 kW=9.48333 kVAr=4.32 Vminpu=0.95 Vmaxpu=1.05 Daily=LoadShapeLoadDefault
New load.L_0x008dacd0 Bus=0x008dacd0.1 Phases=1 Model=1 kV=7.1996 kW=9.95945 kVAr=4.41935 Vminpu=0.95 Vmaxpu=1.05 Daily=LoadShapeLoadDefault
New load.L_0x008db040 Bus=0x008db040.1 Phases=1 Model=1 kV=7.1996 kW=9.38 kVAr=4.27333 Vminpu=0.95 Vmaxpu=1.05 Daily=LoadShapeLoadDefault
New load.L_0x008db568 Bus=0x008db568.1 Phases=1 Model=1 kV=7.1996 kW=8.76333 kVAr=3.99333 Vminpu=0.95 Vmaxpu=1.05 Daily=LoadShapeLoadDefault
New load.L_0x008db8d8 Bus=0x008db8d8.1 Phases=1 Model=1 kV=7.1996 kW=11.79 kVAr=5.37333 Vminpu=0.95 Vmaxpu=1.05 Daily=LoadShapeLoadDefault
New load.L_0x008dbc48 Bus=0x008dbc48.1 Phases=1 Model=1 kV=7.1996 kW=6.48 kVAr=2.95333 Vminpu=0.95 Vmaxpu=1.05 Daily=LoadShapeLoadDefault
New load.L_0x008dbfb8 Bus=0x008dbfb8.1 Phases=1 Model=1 kV=7.1996 kW=6.63333 kVAr=3.02333 Vminpu=0.95 Vmaxpu=1.05 Daily=LoadShapeLoadDefault
New load.L_0x008dc4e8 Bus=0x008dc4e8.1 Phases=1 Model=1 kV=7.1996 kW=10.77 kVAr=4.90667 Vminpu=0.95 Vmaxpu=1.05 Daily=LoadShapeLoadDefault
New load.L_0x008dc858 Bus=0x008dc858.1 Phases=1 Model=1 kV=7.1996 kW=15.0567 kVAr=6.86 Vminpu=0.95 Vmaxpu=1.05 Daily=LoadShapeLoadDefault
New load.L_0x008dcbc8 Bus=0x008dcbc8.1 Phases=1 Model=1 kV=7.1996 kW=14.6367 kVAr=6.67 Vminpu=0.95 Vmaxpu=1.05 Daily=LoadShapeLoadDefault
New load.L_0x008dd0f0 Bus=0x008dd0f0.1 Phases=1 Model=1 kV=7.1996 kW=15.0367 kVAr=6.85 Vminpu=0.95 Vmaxpu=1.05 Daily=LoadShapeLoadDefault
New load.L_0x008dd618 Bus=0x008dd618.1 Phases=1 Model=1 kV=7.1996 kW=12.5767 kVAr=5.73 Vminpu=0.95 Vmaxpu=1.05 Daily=LoadShapeLoadDefault
New load.L_0x008dd7d0 Bus=0x008dd7d0.1 Phases=1 Model=1 kV=7.1996 kW=16.21 kVAr=7.38667 Vminpu=0.95 Vmaxpu=1.05 Daily=LoadShapeLoadDefault
New load.L_0x008ddeb0 Bus=0x008ddeb0.1 Phases=1 Model=1 kV=7.1996 kW=1.39 kVAr=0.633333 Vminpu=0.95 Vmaxpu=1.05 Daily=LoadShapeLoadDefault
New load.L_0x008de598 Bus=0x008de598.1 Phases=1 Model=1 kV=7.1996 kW=20.39 kVAr=9.29 Vminpu=0.95 Vmaxpu=1.05 Daily=LoadShapeLoadDefault
New load.L_0x008dec78 Bus=0x008dec78.1 Phases=1 Model=1 kV=7.1996 kW=14.2967 kVAr=6.51333 Vminpu=0.95 Vmaxpu=1.05 Daily=LoadShapeLoadDefault
New load.L_0x008dee30 Bus=0x008dee30.1 Phases=1 Model=1 kV=7.1996 kW=3.15 kVAr=1.43667 Vminpu=0.95 Vmaxpu=1.05 Daily=LoadShapeLoadDefault
New load.L_0x008df1a0 Bus=0x008df1a0.1 Phases=1 Model=1 kV=7.1996 kW=6.94667 kVAr=3.16333 Vminpu=0.95 Vmaxpu=1.05 Daily=LoadShapeLoadDefault
New load.L_0x008df510 Bus=0x008df510.1 Phases=1 Model=1 kV=7.1996 kW=6.28667 kVAr=2.86333 Vminpu=0.95 Vmaxpu=1.05 Daily=LoadShapeLoadDefault
New load.L_0x008df6c8 Bus=0x008df6c8.1 Phases=1 Model=1 kV=7.1996 kW=7.88333 kVAr=3.59333 Vminpu=0.95 Vmaxpu=1.05 Daily=LoadShapeLoadDefault
New load.L_0x008dfbf0 Bus=0x008dfbf0.1 Phases=1 Model=1 kV=7.1996 kW=11.69 kVAr=5.32667 Vminpu=0.95 Vmaxpu=1.05 Daily=LoadShapeLoadDefault
New load.L_0x008dff60 Bus=0x008dff60.1 Phases=1 Model=1 kV=7.1996 kW=12.05 kVAr=5.49 Vminpu=0.95 Vmaxpu=1.05 Daily=LoadShapeLoadDefault
New load.L_0x008e2750 Bus=0x008e2750.1 Phases=1 Model=1 kV=7.1996 kW=6.16667 kVAr=2.81 Vminpu=0.95 Vmaxpu=1.05 Daily=LoadShapeLoadDefault
New load.L_0x008e2ac0 Bus=0x008e2ac0.1 Phases=1 Model=1 kV=7.1996 kW=7.48667 kVAr=3.41 Vminpu=0.95 Vmaxpu=1.05 Daily=LoadShapeLoadDefault
New load.L_0x008e2fe8 Bus=0x008e2fe8.1 Phases=1 Model=1 kV=7.1996 kW=13.84 kVAr=6.30667 Vminpu=0.95 Vmaxpu=1.05 Daily=LoadShapeLoadDefault
New load.L_0x008e3510 Bus=0x008e3510.1 Phases=1 Model=1 kV=7.1996 kW=6.16333 kVAr=2.80667 Vminpu=0.95 Vmaxpu=1.05 Daily=LoadShapeLoadDefault
New load.L_0x008e4300 Bus=0x008e4300.1 Phases=1 Model=1 kV=7.1996 kW=11.01 kVAr=5.01667 Vminpu=0.95 Vmaxpu=1.05 Daily=LoadShapeLoadDefault
New load.L_0x008e44b8 Bus=0x008e44b8.1 Phases=1 Model=1 kV=7.1996 kW=8.76 kVAr=3.99 Vminpu=0.95 Vmaxpu=1.05 Daily=LoadShapeLoadDefault
New load.L_0x008e49e0 Bus=0x008e49e0.1 Phases=1 Model=1 kV=7.1996 kW=10.95 kVAr=4.99 Vminpu=0.95 Vmaxpu=1.05 Daily=LoadShapeLoadDefault
New load.L_0x008e5278 Bus=0x008e5278.1 Phases=1 Model=1 kV=7.1996 kW=11.5767 kVAr=5.27333 Vminpu=0.95 Vmaxpu=1.05 Daily=LoadShapeLoadDefault
New load.L_0x008e6560 Bus=0x008e6560.1 Phases=1 Model=1 kV=7.1996 kW=5.90667 kVAr=2.69 Vminpu=0.95 Vmaxpu=1.05 Daily=LoadShapeLoadDefault
New load.L_0x008e68d0 Bus=0x008e68d0.1 Phases=1 Model=1 kV=7.1996 kW=7.19 kVAr=3.27667 Vminpu=0.95 Vmaxpu=1.05 Daily=LoadShapeLoadDefault
New load.L_0x008e6fb0 Bus=0x008e6fb0.1 Phases=1 Model=1 kV=7.1996 kW=18.11 kVAr=8.25 Vminpu=0.95 Vmaxpu=1.05 Daily=LoadShapeLoadDefault
New load.L_0x008e7168 Bus=0x008e7168.1 Phases=1 Model=1 kV=7.1996 kW=0.553333 kVAr=0.253333 Vminpu=0.95 Vmaxpu=1.05 Daily=LoadShapeLoadDefault
New load.L_0x008e7320 Bus=0x008e7320.1 Phases=1 Model=1 kV=7.1996 kW=7.16333 kVAr=3.26333 Vminpu=0.95 Vmaxpu=1.05 Daily=LoadShapeLoadDefault
New load.L_0x008e74d8 Bus=0x008e74d8.1 Phases=1 Model=1 kV=7.1996 kW=18.3733 kVAr=8.37 Vminpu=0.95 Vmaxpu=1.05 Daily=LoadShapeLoadDefault
New load.L_0x008e7848 Bus=0x008e7848.1 Phases=1 Model=1 kV=7.1996 kW=6.50667 kVAr=2.96333 Vminpu=0.95 Vmaxpu=1.05 Daily=LoadShapeLoadDefault
New load.L_0x008e7a00 Bus=0x008e7a00.1 Phases=1 Model=1 kV=7.1996 kW=31.17 kVAr=14.2 Vminpu=0.95 Vmaxpu=1.05 Daily=LoadShapeLoadDefault
New load.L_0x008e7d70 Bus=0x008e7d70.1 Phases=1 Model=1 kV=7.1996 kW=3.39 kVAr=1.54 Vminpu=0.95 Vmaxpu=1.05 Daily=LoadShapeLoadDefault
New load.L_0x008e7f28 Bus=0x008e7f28.1 Phases=1 Model=1 kV=7.1996 kW=12.3667 kVAr=5.63333 Vminpu=0.95 Vmaxpu=1.05 Daily=LoadShapeLoadDefault
New load.L_0x008e8450 Bus=0x008e8450.1 Phases=1 Model=1 kV=7.1996 kW=7.08667 kVAr=3.23 Vminpu=0.95 Vmaxpu=1.05 Daily=LoadShapeLoadDefault
New load.L_0x008e87c0 Bus=0x008e87c0.1 Phases=1 Model=1 kV=7.1996 kW=9.29 kVAr=4.23333 Vminpu=0.95 Vmaxpu=1.05 Daily=LoadShapeLoadDefault
New load.L_0x008e8978 Bus=0x008e8978.1 Phases=1 Model=1 kV=7.1996 kW=10.5233 kVAr=4.79333 Vminpu=0.95 Vmaxpu=1.05 Daily=LoadShapeLoadDefault
New load.L_0x008e8b30 Bus=0x008e8b30.1 Phases=1 Model=1 kV=7.1996 kW=13.3633 kVAr=6.09 Vminpu=0.95 Vmaxpu=1.05 Daily=LoadShapeLoadDefault
New load.L_0x008e8ce8 Bus=0x008e8ce8.1 Phases=1 Model=1 kV=7.1996 kW=9.45667 kVAr=4.31 Vminpu=0.95 Vmaxpu=1.05 Daily=LoadShapeLoadDefault
New load.L_0x008e93c8 Bus=0x008e93c8.1 Phases=1 Model=1 kV=7.1996 kW=8.60333 kVAr=3.92 Vminpu=0.95 Vmaxpu=1.05 Daily=LoadShapeLoadDefault
New load.L_0x008e9c60 Bus=0x008e9c60.1 Phases=1 Model=1 kV=7.1996 kW=5.37333 kVAr=2.44667 Vminpu=0.95 Vmaxpu=1.05 Daily=LoadShapeLoadDefault
New load.L_0x008e9e18 Bus=0x008e9e18.1 Phases=1 Model=1 kV=7.1996 kW=7.79 kVAr=3.55 Vminpu=0.95 Vmaxpu=1.05 Daily=LoadShapeLoadDefault
New load.L_0x008ea188 Bus=0x008ea188.1 Phases=1 Model=1 kV=7.1996 kW=4.33 kVAr=1.97333 Vminpu=0.95 Vmaxpu=1.05 Daily=LoadShapeLoadDefault
New load.L_0x008eaa20 Bus=0x008eaa20.1 Phases=1 Model=1 kV=7.1996 kW=14.6133 kVAr=6.65667 Vminpu=0.95 Vmaxpu=1.05 Daily=LoadShapeLoadDefault
New load.L_0x008eb2b8 Bus=0x008eb2b8.1 Phases=1 Model=1 kV=7.1996 kW=6.46667 kVAr=2.94667 Vminpu=0.95 Vmaxpu=1.05 Daily=LoadShapeLoadDefault
New load.L_0x008eb470 Bus=0x008eb470.1 Phases=1 Model=1 kV=7.1996 kW=9.55 kVAr=4.35 Vminpu=0.95 Vmaxpu=1.05 Daily=LoadShapeLoadDefault
New load.L_0x008eb7e0 Bus=0x008eb7e0.1 Phases=1 Model=1 kV=7.1996 kW=14.2 kVAr=6.47 Vminpu=0.95 Vmaxpu=1.05 Daily=LoadShapeLoadDefault
New load.L_0x008eb998 Bus=0x008eb998.1 Phases=1 Model=1 kV=7.1996 kW=7.46667 kVAr=3.40333 Vminpu=0.95 Vmaxpu=1.05 Daily=LoadShapeLoadDefault
New load.L_0x008ed358 Bus=0x008ed358.1 Phases=1 Model=1 kV=7.1996 kW=10.5767 kVAr=4.82 Vminpu=0.95 Vmaxpu=1.05 Daily=LoadShapeLoadDefault
New load.L_0x008eda38 Bus=0x008eda38.1 Phases=1 Model=1 kV=7.1996 kW=18.5433 kVAr=8.45 Vminpu=0.95 Vmaxpu=1.05 Daily=LoadShapeLoadDefault
New load.L_0x008ee520 Bus=0x008ee520.1 Phases=1 Model=1 kV=7.1996 kW=11.3467 kVAr=5.17 Vminpu=0.95 Vmaxpu=1.05 Daily=LoadShapeLoadDefault
New load.L_0x008f2830 Bus=0x008f2830.1 Phases=1 Model=1 kV=7.1996 kW=19.98 kVAr=9.10333 Vminpu=0.95 Vmaxpu=1.05 Daily=LoadShapeLoadDefault
New load.L_0x008f3960 Bus=0x008f3960.1 Phases=1 Model=1 kV=7.1996 kW=7.93667 kVAr=3.61667 Vminpu=0.95 Vmaxpu=1.05 Daily=LoadShapeLoadDefault
