! epri_m1_1ph: single-phase per-phase equivalent of test_systems\epri_test_circuits\epri_dpv\M1\Master_NoPV.dss (unmodified original).
! Written by envs/multi_poi/root_level/convert_to_1ph.jl -- do not edit by hand.
! 49 PV units on load buses, sized in proportion to the bus load; fleet Pmpp = 40 % of total load.
New PVsystem.PV_0x0089d020 irrad=1.0 Phases=1 Bus1=0x0089d020.1 kV=7.1996 kVA=10.6616 Pmpp=8.88465 %cutin=0.001 %cutout=0.001
New PVsystem.PV_0x0089d700 irrad=1.0 Phases=1 Bus1=0x0089d700.1 kV=7.1996 kVA=11.6113 Pmpp=9.67605 %cutin=0.001 %cutout=0.001
New PVsystem.PV_0x0089dde0 irrad=1.0 Phases=1 Bus1=0x0089dde0.1 kV=7.1996 kVA=23.1963 Pmpp=19.3302 %cutin=0.001 %cutout=0.001
New PVsystem.PV_0x0089e4c0 irrad=1.0 Phases=1 Bus1=0x0089e4c0.1 kV=7.1996 kVA=6.57954 Pmpp=5.48295 %cutin=0.001 %cutout=0.001
New PVsystem.PV_0x0089e678 irrad=1.0 Phases=1 Bus1=0x0089e678.1 kV=7.1996 kVA=54.8872 Pmpp=45.7393 %cutin=0.001 %cutout=0.001
New PVsystem.PV_0x0089f280 irrad=1.0 Phases=1 Bus1=0x0089f280.1 kV=7.1996 kVA=23.9623 Pmpp=19.9686 %cutin=0.001 %cutout=0.001
New PVsystem.PV_0x008c2648 irrad=1.0 Phases=1 Bus1=0x008c2648.1 kV=7.1996 kVA=15.389 Pmpp=12.8241 %cutin=0.001 %cutout=0.001
New PVsystem.PV_0x008c4bb0 irrad=1.0 Phases=1 Bus1=0x008c4bb0.1 kV=7.1996 kVA=15.2368 Pmpp=12.6974 %cutin=0.001 %cutout=0.001
New PVsystem.PV_0x008c7338 irrad=1.0 Phases=1 Bus1=0x008c7338.1 kV=7.1996 kVA=9.74863 Pmpp=8.12386 %cutin=0.001 %cutout=0.001
New PVsystem.PV_0x008c7a18 irrad=1.0 Phases=1 Bus1=0x008c7a18.1 kV=7.1996 kVA=28.5323 Pmpp=23.7769 %cutin=0.001 %cutout=0.001
New PVsystem.PV_0x008ca6c8 irrad=1.0 Phases=1 Bus1=0x008ca6c8.1 kV=7.1996 kVA=21.0503 Pmpp=17.5419 %cutin=0.001 %cutout=0.001
New PVsystem.PV_0x008cc090 irrad=1.0 Phases=1 Bus1=0x008cc090.1 kV=7.1996 kVA=18.9831 Pmpp=15.8192 %cutin=0.001 %cutout=0.001
New PVsystem.PV_0x008cc770 irrad=1.0 Phases=1 Bus1=0x008cc770.1 kV=7.1996 kVA=23.2173 Pmpp=19.3477 %cutin=0.001 %cutout=0.001
New PVsystem.PV_0x008cd6e8 irrad=1.0 Phases=1 Bus1=0x008cd6e8.1 kV=7.1996 kVA=21.0451 Pmpp=17.5376 %cutin=0.001 %cutout=0.001
New PVsystem.PV_0x008cdc10 irrad=1.0 Phases=1 Bus1=0x008cdc10.1 kV=7.1996 kVA=13.8569 Pmpp=11.5474 %cutin=0.001 %cutout=0.001
New PVsystem.PV_0x008ce2f0 irrad=1.0 Phases=1 Bus1=0x008ce2f0.1 kV=7.1996 kVA=19.8068 Pmpp=16.5057 %cutin=0.001 %cutout=0.001
New PVsystem.PV_0x008ce818 irrad=1.0 Phases=1 Bus1=0x008ce818.1 kV=7.1996 kVA=27.1524 Pmpp=22.627 %cutin=0.001 %cutout=0.001
New PVsystem.PV_0x008d01e0 irrad=1.0 Phases=1 Bus1=0x008d01e0.1 kV=7.1996 kVA=19.7596 Pmpp=16.4663 %cutin=0.001 %cutout=0.001
New PVsystem.PV_0x008d0398 irrad=1.0 Phases=1 Bus1=0x008d0398.1 kV=7.1996 kVA=10.3468 Pmpp=8.62231 %cutin=0.001 %cutout=0.001
New PVsystem.PV_0x008d0de8 irrad=1.0 Phases=1 Bus1=0x008d0de8.1 kV=7.1996 kVA=21.0136 Pmpp=17.5113 %cutin=0.001 %cutout=0.001
New PVsystem.PV_0x008d1f38 irrad=1.0 Phases=1 Bus1=0x008d1f38.1 kV=7.1996 kVA=22.9392 Pmpp=19.116 %cutin=0.001 %cutout=0.001
New PVsystem.PV_0x008d3598 irrad=1.0 Phases=1 Bus1=0x008d3598.1 kV=7.1996 kVA=29.0832 Pmpp=24.236 %cutin=0.001 %cutout=0.001
New PVsystem.PV_0x008d4510 irrad=1.0 Phases=1 Bus1=0x008d4510.1 kV=7.1996 kVA=20.8982 Pmpp=17.4151 %cutin=0.001 %cutout=0.001
New PVsystem.PV_0x008d4880 irrad=1.0 Phases=1 Bus1=0x008d4880.1 kV=7.1996 kVA=24.7388 Pmpp=20.6157 %cutin=0.001 %cutout=0.001
New PVsystem.PV_0x008d4bf0 irrad=1.0 Phases=1 Bus1=0x008d4bf0.1 kV=7.1996 kVA=26.771 Pmpp=22.3092 %cutin=0.001 %cutout=0.001
New PVsystem.PV_0x008d6400 irrad=1.0 Phases=1 Bus1=0x008d6400.1 kV=7.1996 kVA=29.1147 Pmpp=24.2623 %cutin=0.001 %cutout=0.001
New PVsystem.PV_0x008d7c10 irrad=1.0 Phases=1 Bus1=0x008d7c10.1 kV=7.1996 kVA=25.5206 Pmpp=21.2672 %cutin=0.001 %cutout=0.001
New PVsystem.PV_0x008d82f0 irrad=1.0 Phases=1 Bus1=0x008d82f0.1 kV=7.1996 kVA=19.3294 Pmpp=16.1078 %cutin=0.001 %cutout=0.001
New PVsystem.PV_0x008d8d40 irrad=1.0 Phases=1 Bus1=0x008d8d40.1 kV=7.1996 kVA=19.2716 Pmpp=16.0597 %cutin=0.001 %cutout=0.001
New PVsystem.PV_0x008da438 irrad=1.0 Phases=1 Bus1=0x008da438.1 kV=7.1996 kVA=20.9769 Pmpp=17.4807 %cutin=0.001 %cutout=0.001
New PVsystem.PV_0x008da5f0 irrad=1.0 Phases=1 Bus1=0x008da5f0.1 kV=7.1996 kVA=16.9316 Pmpp=14.1096 %cutin=0.001 %cutout=0.001
New PVsystem.PV_0x008da7a8 irrad=1.0 Phases=1 Bus1=0x008da7a8.1 kV=7.1996 kVA=16.2337 Pmpp=13.5281 %cutin=0.001 %cutout=0.001
New PVsystem.PV_0x008dacd0 irrad=1.0 Phases=1 Bus1=0x008dacd0.1 kV=7.1996 kVA=15.6767 Pmpp=13.0639 %cutin=0.001 %cutout=0.001
New PVsystem.PV_0x008db568 irrad=1.0 Phases=1 Bus1=0x008db568.1 kV=7.1996 kVA=13.7939 Pmpp=11.495 %cutin=0.001 %cutout=0.001
New PVsystem.PV_0x008dc4e8 irrad=1.0 Phases=1 Bus1=0x008dc4e8.1 kV=7.1996 kVA=16.9525 Pmpp=14.1271 %cutin=0.001 %cutout=0.001
New PVsystem.PV_0x008de598 irrad=1.0 Phases=1 Bus1=0x008de598.1 kV=7.1996 kVA=32.0949 Pmpp=26.7458 %cutin=0.001 %cutout=0.001
New PVsystem.PV_0x008dee30 irrad=1.0 Phases=1 Bus1=0x008dee30.1 kV=7.1996 kVA=4.95826 Pmpp=4.13189 %cutin=0.001 %cutout=0.001
New PVsystem.PV_0x008e2750 irrad=1.0 Phases=1 Bus1=0x008e2750.1 kV=7.1996 kVA=9.70665 Pmpp=8.08888 %cutin=0.001 %cutout=0.001
New PVsystem.PV_0x008e2ac0 irrad=1.0 Phases=1 Bus1=0x008e2ac0.1 kV=7.1996 kVA=11.7844 Pmpp=9.82033 %cutin=0.001 %cutout=0.001
New PVsystem.PV_0x008e44b8 irrad=1.0 Phases=1 Bus1=0x008e44b8.1 kV=7.1996 kVA=13.7887 Pmpp=11.4906 %cutin=0.001 %cutout=0.001
New PVsystem.PV_0x008e5278 irrad=1.0 Phases=1 Bus1=0x008e5278.1 kV=7.1996 kVA=18.2223 Pmpp=15.1852 %cutin=0.001 %cutout=0.001
New PVsystem.PV_0x008e7168 irrad=1.0 Phases=1 Bus1=0x008e7168.1 kV=7.1996 kVA=0.870975 Pmpp=0.725813 %cutin=0.001 %cutout=0.001
New PVsystem.PV_0x008e87c0 irrad=1.0 Phases=1 Bus1=0x008e87c0.1 kV=7.1996 kVA=14.6229 Pmpp=12.1858 %cutin=0.001 %cutout=0.001
New PVsystem.PV_0x008e8978 irrad=1.0 Phases=1 Bus1=0x008e8978.1 kV=7.1996 kVA=16.5643 Pmpp=13.8036 %cutin=0.001 %cutout=0.001
New PVsystem.PV_0x008e8b30 irrad=1.0 Phases=1 Bus1=0x008e8b30.1 kV=7.1996 kVA=21.0346 Pmpp=17.5288 %cutin=0.001 %cutout=0.001
New PVsystem.PV_0x008e8ce8 irrad=1.0 Phases=1 Bus1=0x008e8ce8.1 kV=7.1996 kVA=14.8853 Pmpp=12.4044 %cutin=0.001 %cutout=0.001
New PVsystem.PV_0x008eb998 irrad=1.0 Phases=1 Bus1=0x008eb998.1 kV=7.1996 kVA=11.7529 Pmpp=9.7941 %cutin=0.001 %cutout=0.001
New PVsystem.PV_0x008ed358 irrad=1.0 Phases=1 Bus1=0x008ed358.1 kV=7.1996 kVA=16.6482 Pmpp=13.8735 %cutin=0.001 %cutout=0.001
New PVsystem.PV_0x008ee520 irrad=1.0 Phases=1 Bus1=0x008ee520.1 kV=7.1996 kVA=17.8602 Pmpp=14.8835 %cutin=0.001 %cutout=0.001
