! ieee8500xf_1ph: single-phase per-phase equivalent of test_networks\sources\ieee8500\Master.dss (unmodified original).
! Written by problems/msopf/root_level/convert_to_1ph.jl -- do not edit by hand.
! The original's normally-open switches, disabled. Close one with Line.<name>.enabled=true. A switch is
! 1e-3 + j1e-3 ohm, as the other decks' shortest lines; a tie cable with an open switch at each end
! (tie_<switch>) is one line with both switches and the cable in series, its middle buses left out.
New Line.wd701_48332_sw Phases=1 Bus1=228-1048090-1_int.1 Bus2=193-51796.1 r1=0.001 x1=0.001 c1=0 c0=0 length=1 units=none enabled=false
New Line.v7995_48332_sw Phases=1 Bus1=d5837361-8_int.1 Bus2=e182745.1 r1=0.001 x1=0.001 c1=0 c0=0 length=1 units=none enabled=false
New Line.wg127_48332_sw Phases=1 Bus1=228-961799-3_int.1 Bus2=193-46661.1 r1=0.001 x1=0.001 c1=0 c0=0 length=1 units=none enabled=false
New Line.wf856_48332_sw Phases=1 Bus1=228-1353934-4_int.1 Bus2=193-103041.1 r1=0.001 x1=0.001 c1=0 c0=0 length=1 units=none enabled=false
New Line.wf586_48332_sw Phases=1 Bus1=228-979371-2_int.1 Bus2=193-48013.1 r1=0.001 x1=0.001 c1=0 c0=0 length=1 units=none enabled=false
