! ieee9500xf_1ph: single-phase per-phase equivalent of test_networks\ieee9500_source\base\Master-bal-initial-config.dss (unmodified original).
! Written by problems/msopf/root_level/convert_to_1ph.jl -- do not edit by hand.
! The original's capacitor banks as fixed shunts, always in service (the original switches them by CapControl):
! per-phase equivalent of the rated susceptance (kvar / 3, referred to the base voltage), banks on one bus combined.
New Capacitor.C_r18242 Phases=1 Bus1=r18242.1 kV=7.1996 kvar=300 conn=wye
New Capacitor.C_r20185 Phases=1 Bus1=r20185.1 kV=7.1996 kvar=299.963 conn=wye
New Capacitor.C_r42246 Phases=1 Bus1=r42246.1 kV=7.1996 kvar=399.951 conn=wye
New Capacitor.C_r42247 Phases=1 Bus1=r42247.1 kV=7.1996 kvar=299.963 conn=wye
