! smartds_p1u_hs0_1ph: single-phase per-phase equivalent of test_networks\sources\smartds_sfo_p1u\p1uhs0_1247\Master.dss (unmodified original).
! Written by problems/msopf/root_level/convert_to_1ph.jl -- do not edit by hand.
! The original's normally-open switches, disabled. Close one with Line.<name>.enabled=true. A switch is
! 1e-3 + j1e-3 ohm, as the other decks' shortest lines; a tie cable with an open switch at each end
! (tie_<switch>) is one line with both switches and the cable in series, its middle buses left out.
New Line.sb9_p1uhs0_1247_267 Phases=1 Bus1=sb9_p1uhs0_1247_bus_9_3.1 Bus2=sb9_p1uhs0_1247_bus_9_4.1 r1=0.001 x1=0.001 c1=0 c0=0 length=1 units=none enabled=false
New Line.elbswitch_r_p1udt104-p1udt212_p1u_11897 Phases=1 Bus1=p1udt212.1 Bus2=p1udt104-p1udt212x.1 r1=0.001 x1=0.001 c1=0 c0=0 length=1 units=none enabled=false
New Line.elbswitch_r_p1udt424-p1udt51_p1u_11907 Phases=1 Bus1=p1udt424.1 Bus2=p1udt424-p1udt51x.1 r1=0.001 x1=0.001 c1=0 c0=0 length=1 units=none enabled=false
New Line.elbswitch_r_p1udt873-p1udt874_p1u_11909 Phases=1 Bus1=p1udt873.1 Bus2=p1udt873-p1udt874x.1 r1=0.001 x1=0.001 c1=0 c0=0 length=1 units=none enabled=false
New Line.elbswitch_r_p1udt1418-p1udt1440_p1u_11926 Phases=1 Bus1=p1udt1418.1 Bus2=p1udt1418-p1udt1440x.1 r1=0.001 x1=0.001 c1=0 c0=0 length=1 units=none enabled=false
New Line.tie_padswitch_r_p1udt201-p1umv7_p1u_11912 Phases=1 Bus1=p1udt201.1 Bus2=p1umv7.1 r1=0.0125841 x1=0.0672167 c1=0 c0=0 length=1 units=none enabled=false
New Line.tie_padswitch_r_p1udt175-p1udt258_p1u_11919 Phases=1 Bus1=p1udt258.1 Bus2=p1udt175.1 r1=0.00742236 x1=0.0354112 c1=0 c0=0 length=1 units=none enabled=false
New Line.tie_padswitch_r_p1udt258-p1udt447_p1u_11935 Phases=1 Bus1=p1udt258.1 Bus2=p1udt447.1 r1=0.0183628 x1=0.102823 c1=0 c0=0 length=1 units=none enabled=false
New Line.tie_padswitch_r_p1udt158-p1udt450_p1u_11893 Phases=1 Bus1=p1udt158.1 Bus2=p1udt450.1 r1=0.00799759 x1=0.0389556 c1=0 c0=0 length=1 units=none enabled=false
New Line.tie_padswitch_r_p1udt111-p1udt219_p1u_11903 Phases=1 Bus1=p1udt219.1 Bus2=p1udt111.1 r1=0.00570597 x1=0.0248352 c1=0 c0=0 length=1 units=none enabled=false
New Line.tie_padswitch_r_p1udt101-p1udt94_p1u_11914 Phases=1 Bus1=p1udt101.1 Bus2=p1udt94.1 r1=0.0113456 x1=0.0595851 c1=0 c0=0 length=1 units=none enabled=false
New Line.tie_padswitch_r_p1udt290-p1udt371_p1u_11943 Phases=1 Bus1=p1udt371.1 Bus2=p1udt290.1 r1=0.0106198 x1=0.0551128 c1=0 c0=0 length=1 units=none enabled=false
New Line.tie_padswitch_r_p1udt458-p1udt78_p1u_11905 Phases=1 Bus1=p1udt458.1 Bus2=p1udt78.1 r1=0.00635625 x1=0.0288421 c1=0 c0=0 length=1 units=none enabled=false
