! smartds_p1u_hs2_1ph: single-phase per-phase equivalent of test_networks\sources\smartds_sfo_p1u\p1uhs2_1247\Master.dss (unmodified original).
! Written by problems/msopf/root_level/convert_to_1ph.jl -- do not edit by hand.
! The original's capacitor banks (kvar / 3), not redirected by Master.dss.
New generator.p1udt1179C Phases=1 Bus1=p1udt1179.1 kV=7.1996 Model=1 kW=1e-06 kVAr=100
New generator.p1umv14C Phases=1 Bus1=p1umv14.1 kV=7.1996 Model=1 kW=1e-06 kVAr=100
