! smartds_p1u_hs2_1ph: single-phase per-phase equivalent of test_networks\sources\smartds_sfo_p1u\p1uhs2_1247\Master.dss (unmodified original).
! Written by problems/msopf/root_level/convert_to_1ph.jl -- do not edit by hand.
! 97 PV units on load buses, sized in proportion to the bus load; fleet Pmpp = 40 % of total load.
New PVsystem.PV_p1udt1045 irrad=1.0 Phases=1 Bus1=p1udt1045.1 kV=7.1996 kVA=23.1224 Pmpp=19.2687 %cutin=0.001 %cutout=0.001
New PVsystem.PV_p1udt1048 irrad=1.0 Phases=1 Bus1=p1udt1048.1 kV=7.1996 kVA=10.7817 Pmpp=8.98479 %cutin=0.001 %cutout=0.001
New PVsystem.PV_p1udt1051 irrad=1.0 Phases=1 Bus1=p1udt1051.1 kV=7.1996 kVA=35.9173 Pmpp=29.9311 %cutin=0.001 %cutout=0.001
New PVsystem.PV_p1udt1052 irrad=1.0 Phases=1 Bus1=p1udt1052.1 kV=7.1996 kVA=61.0867 Pmpp=50.9056 %cutin=0.001 %cutout=0.001
New PVsystem.PV_p1udt1060 irrad=1.0 Phases=1 Bus1=p1udt1060.1 kV=7.1996 kVA=46.4749 Pmpp=38.7291 %cutin=0.001 %cutout=0.001
New PVsystem.PV_p1udt1061 irrad=1.0 Phases=1 Bus1=p1udt1061.1 kV=7.1996 kVA=18.8433 Pmpp=15.7027 %cutin=0.001 %cutout=0.001
New PVsystem.PV_p1udt1067 irrad=1.0 Phases=1 Bus1=p1udt1067.1 kV=7.1996 kVA=14.7821 Pmpp=12.3184 %cutin=0.001 %cutout=0.001
New PVsystem.PV_p1udt1083 irrad=1.0 Phases=1 Bus1=p1udt1083.1 kV=7.1996 kVA=22.1235 Pmpp=18.4362 %cutin=0.001 %cutout=0.001
New PVsystem.PV_p1udt1087 irrad=1.0 Phases=1 Bus1=p1udt1087.1 kV=7.1996 kVA=19.7785 Pmpp=16.4821 %cutin=0.001 %cutout=0.001
New PVsystem.PV_p1udt1098 irrad=1.0 Phases=1 Bus1=p1udt1098.1 kV=7.1996 kVA=17.68 Pmpp=14.7334 %cutin=0.001 %cutout=0.001
New PVsystem.PV_p1udt1099 irrad=1.0 Phases=1 Bus1=p1udt1099.1 kV=7.1996 kVA=43.6658 Pmpp=36.3882 %cutin=0.001 %cutout=0.001
New PVsystem.PV_p1udt1101 irrad=1.0 Phases=1 Bus1=p1udt1101.1 kV=7.1996 kVA=36.8839 Pmpp=30.7366 %cutin=0.001 %cutout=0.001
New PVsystem.PV_p1udt1107 irrad=1.0 Phases=1 Bus1=p1udt1107.1 kV=7.1996 kVA=15.9236 Pmpp=13.2697 %cutin=0.001 %cutout=0.001
New PVsystem.PV_p1udt1128 irrad=1.0 Phases=1 Bus1=p1udt1128.1 kV=7.1996 kVA=40.4721 Pmpp=33.7268 %cutin=0.001 %cutout=0.001
New PVsystem.PV_p1udt1129 irrad=1.0 Phases=1 Bus1=p1udt1129.1 kV=7.1996 kVA=20.1906 Pmpp=16.8255 %cutin=0.001 %cutout=0.001
New PVsystem.PV_p1udt1134 irrad=1.0 Phases=1 Bus1=p1udt1134.1 kV=7.1996 kVA=19.068 Pmpp=15.89 %cutin=0.001 %cutout=0.001
New PVsystem.PV_p1udt1167 irrad=1.0 Phases=1 Bus1=p1udt1167.1 kV=7.1996 kVA=20.9413 Pmpp=17.4511 %cutin=0.001 %cutout=0.001
New PVsystem.PV_p1udt1170 irrad=1.0 Phases=1 Bus1=p1udt1170.1 kV=7.1996 kVA=16.4851 Pmpp=13.7376 %cutin=0.001 %cutout=0.001
New PVsystem.PV_p1udt1174 irrad=1.0 Phases=1 Bus1=p1udt1174.1 kV=7.1996 kVA=55.7283 Pmpp=46.4402 %cutin=0.001 %cutout=0.001
New PVsystem.PV_p1udt1176 irrad=1.0 Phases=1 Bus1=p1udt1176.1 kV=7.1996 kVA=36.6095 Pmpp=30.5079 %cutin=0.001 %cutout=0.001
New PVsystem.PV_p1udt1179 irrad=1.0 Phases=1 Bus1=p1udt1179.1 kV=7.1996 kVA=50.5795 Pmpp=42.1496 %cutin=0.001 %cutout=0.001
New PVsystem.PV_p1udt1201 irrad=1.0 Phases=1 Bus1=p1udt1201.1 kV=7.1996 kVA=6.88174 Pmpp=5.73479 %cutin=0.001 %cutout=0.001
New PVsystem.PV_p1udt1202 irrad=1.0 Phases=1 Bus1=p1udt1202.1 kV=7.1996 kVA=15.3274 Pmpp=12.7728 %cutin=0.001 %cutout=0.001
New PVsystem.PV_p1udt1204 irrad=1.0 Phases=1 Bus1=p1udt1204.1 kV=7.1996 kVA=15.1354 Pmpp=12.6129 %cutin=0.001 %cutout=0.001
New PVsystem.PV_p1udt1207 irrad=1.0 Phases=1 Bus1=p1udt1207.1 kV=7.1996 kVA=20.074 Pmpp=16.7283 %cutin=0.001 %cutout=0.001
New PVsystem.PV_p1udt1295 irrad=1.0 Phases=1 Bus1=p1udt1295.1 kV=7.1996 kVA=15.1889 Pmpp=12.6574 %cutin=0.001 %cutout=0.001
New PVsystem.PV_p1udt1320 irrad=1.0 Phases=1 Bus1=p1udt1320.1 kV=7.1996 kVA=14.5478 Pmpp=12.1232 %cutin=0.001 %cutout=0.001
New PVsystem.PV_p1udt1436 irrad=1.0 Phases=1 Bus1=p1udt1436.1 kV=7.1996 kVA=13.8223 Pmpp=11.5186 %cutin=0.001 %cutout=0.001
New PVsystem.PV_p1udt1494 irrad=1.0 Phases=1 Bus1=p1udt1494.1 kV=7.1996 kVA=5.24965 Pmpp=4.37471 %cutin=0.001 %cutout=0.001
New PVsystem.PV_p1udt1499 irrad=1.0 Phases=1 Bus1=p1udt1499.1 kV=7.1996 kVA=25.5536 Pmpp=21.2947 %cutin=0.001 %cutout=0.001
New PVsystem.PV_p1udt1500 irrad=1.0 Phases=1 Bus1=p1udt1500.1 kV=7.1996 kVA=38.1724 Pmpp=31.8104 %cutin=0.001 %cutout=0.001
New PVsystem.PV_p1udt1501 irrad=1.0 Phases=1 Bus1=p1udt1501.1 kV=7.1996 kVA=6.98423 Pmpp=5.82019 %cutin=0.001 %cutout=0.001
New PVsystem.PV_p1udt1508 irrad=1.0 Phases=1 Bus1=p1udt1508.1 kV=7.1996 kVA=9.28848 Pmpp=7.7404 %cutin=0.001 %cutout=0.001
New PVsystem.PV_p1udt1514 irrad=1.0 Phases=1 Bus1=p1udt1514.1 kV=7.1996 kVA=27.9098 Pmpp=23.2581 %cutin=0.001 %cutout=0.001
New PVsystem.PV_p1udt1519 irrad=1.0 Phases=1 Bus1=p1udt1519.1 kV=7.1996 kVA=35.3797 Pmpp=29.4831 %cutin=0.001 %cutout=0.001
New PVsystem.PV_p1udt1520 irrad=1.0 Phases=1 Bus1=p1udt1520.1 kV=7.1996 kVA=2.56112 Pmpp=2.13426 %cutin=0.001 %cutout=0.001
New PVsystem.PV_p1udt1528 irrad=1.0 Phases=1 Bus1=p1udt1528.1 kV=7.1996 kVA=3.49721 Pmpp=2.91434 %cutin=0.001 %cutout=0.001
New PVsystem.PV_p1udt1535 irrad=1.0 Phases=1 Bus1=p1udt1535.1 kV=7.1996 kVA=14.5342 Pmpp=12.1118 %cutin=0.001 %cutout=0.001
New PVsystem.PV_p1udt1538 irrad=1.0 Phases=1 Bus1=p1udt1538.1 kV=7.1996 kVA=16.6551 Pmpp=13.8792 %cutin=0.001 %cutout=0.001
New PVsystem.PV_p1udt1539 irrad=1.0 Phases=1 Bus1=p1udt1539.1 kV=7.1996 kVA=17.4614 Pmpp=14.5512 %cutin=0.001 %cutout=0.001
New PVsystem.PV_p1udt1541 irrad=1.0 Phases=1 Bus1=p1udt1541.1 kV=7.1996 kVA=25.1517 Pmpp=20.9598 %cutin=0.001 %cutout=0.001
New PVsystem.PV_p1udt1548 irrad=1.0 Phases=1 Bus1=p1udt1548.1 kV=7.1996 kVA=5.11064 Pmpp=4.25887 %cutin=0.001 %cutout=0.001
New PVsystem.PV_p1udt1550 irrad=1.0 Phases=1 Bus1=p1udt1550.1 kV=7.1996 kVA=2.39998 Pmpp=1.99999 %cutin=0.001 %cutout=0.001
New PVsystem.PV_p1udt1572 irrad=1.0 Phases=1 Bus1=p1udt1572.1 kV=7.1996 kVA=14.7743 Pmpp=12.3119 %cutin=0.001 %cutout=0.001
New PVsystem.PV_p1udt1574 irrad=1.0 Phases=1 Bus1=p1udt1574.1 kV=7.1996 kVA=46.6748 Pmpp=38.8957 %cutin=0.001 %cutout=0.001
New PVsystem.PV_p1udt1575 irrad=1.0 Phases=1 Bus1=p1udt1575.1 kV=7.1996 kVA=37.9704 Pmpp=31.642 %cutin=0.001 %cutout=0.001
New PVsystem.PV_p1udt1580 irrad=1.0 Phases=1 Bus1=p1udt1580.1 kV=7.1996 kVA=17.5781 Pmpp=14.6484 %cutin=0.001 %cutout=0.001
New PVsystem.PV_p1udt1587 irrad=1.0 Phases=1 Bus1=p1udt1587.1 kV=7.1996 kVA=17.002 Pmpp=14.1683 %cutin=0.001 %cutout=0.001
New PVsystem.PV_p1udt1596 irrad=1.0 Phases=1 Bus1=p1udt1596.1 kV=7.1996 kVA=13.5148 Pmpp=11.2624 %cutin=0.001 %cutout=0.001
New PVsystem.PV_p1udt1612 irrad=1.0 Phases=1 Bus1=p1udt1612.1 kV=7.1996 kVA=7.83133 Pmpp=6.52611 %cutin=0.001 %cutout=0.001
New PVsystem.PV_p1udt1622 irrad=1.0 Phases=1 Bus1=p1udt1622.1 kV=7.1996 kVA=6.94943 Pmpp=5.79119 %cutin=0.001 %cutout=0.001
New PVsystem.PV_p1udt1623 irrad=1.0 Phases=1 Bus1=p1udt1623.1 kV=7.1996 kVA=4.34151 Pmpp=3.61792 %cutin=0.001 %cutout=0.001
New PVsystem.PV_p1udt1626 irrad=1.0 Phases=1 Bus1=p1udt1626.1 kV=7.1996 kVA=105.181 Pmpp=87.6511 %cutin=0.001 %cutout=0.001
New PVsystem.PV_p1udt1700 irrad=1.0 Phases=1 Bus1=p1udt1700.1 kV=7.1996 kVA=6.24917 Pmpp=5.20764 %cutin=0.001 %cutout=0.001
New PVsystem.PV_p1udt1703 irrad=1.0 Phases=1 Bus1=p1udt1703.1 kV=7.1996 kVA=16.26 Pmpp=13.55 %cutin=0.001 %cutout=0.001
New PVsystem.PV_p1udt1706 irrad=1.0 Phases=1 Bus1=p1udt1706.1 kV=7.1996 kVA=15.5353 Pmpp=12.9461 %cutin=0.001 %cutout=0.001
New PVsystem.PV_p1udt1708 irrad=1.0 Phases=1 Bus1=p1udt1708.1 kV=7.1996 kVA=71.0345 Pmpp=59.1954 %cutin=0.001 %cutout=0.001
New PVsystem.PV_p1udt1710 irrad=1.0 Phases=1 Bus1=p1udt1710.1 kV=7.1996 kVA=37.6188 Pmpp=31.349 %cutin=0.001 %cutout=0.001
New PVsystem.PV_p1udt1713 irrad=1.0 Phases=1 Bus1=p1udt1713.1 kV=7.1996 kVA=5.35613 Pmpp=4.46345 %cutin=0.001 %cutout=0.001
New PVsystem.PV_p1udt1715 irrad=1.0 Phases=1 Bus1=p1udt1715.1 kV=7.1996 kVA=21.6568 Pmpp=18.0473 %cutin=0.001 %cutout=0.001
New PVsystem.PV_p1udt1724 irrad=1.0 Phases=1 Bus1=p1udt1724.1 kV=7.1996 kVA=13.0025 Pmpp=10.8354 %cutin=0.001 %cutout=0.001
New PVsystem.PV_p1udt1727 irrad=1.0 Phases=1 Bus1=p1udt1727.1 kV=7.1996 kVA=12.4333 Pmpp=10.3611 %cutin=0.001 %cutout=0.001
New PVsystem.PV_p1udt561 irrad=1.0 Phases=1 Bus1=p1udt561.1 kV=7.1996 kVA=15.5863 Pmpp=12.9886 %cutin=0.001 %cutout=0.001
New PVsystem.PV_p1udt564 irrad=1.0 Phases=1 Bus1=p1udt564.1 kV=7.1996 kVA=9.87035 Pmpp=8.22529 %cutin=0.001 %cutout=0.001
New PVsystem.PV_p1udt568 irrad=1.0 Phases=1 Bus1=p1udt568.1 kV=7.1996 kVA=21.1895 Pmpp=17.6579 %cutin=0.001 %cutout=0.001
New PVsystem.PV_p1udt569 irrad=1.0 Phases=1 Bus1=p1udt569.1 kV=7.1996 kVA=42.0747 Pmpp=35.0623 %cutin=0.001 %cutout=0.001
New PVsystem.PV_p1udt572 irrad=1.0 Phases=1 Bus1=p1udt572.1 kV=7.1996 kVA=16.5427 Pmpp=13.7856 %cutin=0.001 %cutout=0.001
New PVsystem.PV_p1udt575 irrad=1.0 Phases=1 Bus1=p1udt575.1 kV=7.1996 kVA=9.41233 Pmpp=7.84361 %cutin=0.001 %cutout=0.001
New PVsystem.PV_p1udt580 irrad=1.0 Phases=1 Bus1=p1udt580.1 kV=7.1996 kVA=32.6092 Pmpp=27.1743 %cutin=0.001 %cutout=0.001
New PVsystem.PV_p1udt583 irrad=1.0 Phases=1 Bus1=p1udt583.1 kV=7.1996 kVA=28.3961 Pmpp=23.6634 %cutin=0.001 %cutout=0.001
New PVsystem.PV_p1udt584 irrad=1.0 Phases=1 Bus1=p1udt584.1 kV=7.1996 kVA=12.3141 Pmpp=10.2617 %cutin=0.001 %cutout=0.001
New PVsystem.PV_p1udt585 irrad=1.0 Phases=1 Bus1=p1udt585.1 kV=7.1996 kVA=45.0637 Pmpp=37.5531 %cutin=0.001 %cutout=0.001
New PVsystem.PV_p1udt589 irrad=1.0 Phases=1 Bus1=p1udt589.1 kV=7.1996 kVA=22.3458 Pmpp=18.6215 %cutin=0.001 %cutout=0.001
New PVsystem.PV_p1udt592 irrad=1.0 Phases=1 Bus1=p1udt592.1 kV=7.1996 kVA=14.4039 Pmpp=12.0032 %cutin=0.001 %cutout=0.001
New PVsystem.PV_p1udt594 irrad=1.0 Phases=1 Bus1=p1udt594.1 kV=7.1996 kVA=41.8736 Pmpp=34.8947 %cutin=0.001 %cutout=0.001
New PVsystem.PV_p1udt599 irrad=1.0 Phases=1 Bus1=p1udt599.1 kV=7.1996 kVA=9.79819 Pmpp=8.16516 %cutin=0.001 %cutout=0.001
New PVsystem.PV_p1udt602 irrad=1.0 Phases=1 Bus1=p1udt602.1 kV=7.1996 kVA=42.6407 Pmpp=35.5339 %cutin=0.001 %cutout=0.001
New PVsystem.PV_p1udt603 irrad=1.0 Phases=1 Bus1=p1udt603.1 kV=7.1996 kVA=39.5751 Pmpp=32.9793 %cutin=0.001 %cutout=0.001
New PVsystem.PV_p1udt604 irrad=1.0 Phases=1 Bus1=p1udt604.1 kV=7.1996 kVA=49.9348 Pmpp=41.6123 %cutin=0.001 %cutout=0.001
New PVsystem.PV_p1udt606 irrad=1.0 Phases=1 Bus1=p1udt606.1 kV=7.1996 kVA=42.9928 Pmpp=35.8273 %cutin=0.001 %cutout=0.001
New PVsystem.PV_p1udt608 irrad=1.0 Phases=1 Bus1=p1udt608.1 kV=7.1996 kVA=29.0211 Pmpp=24.1843 %cutin=0.001 %cutout=0.001
New PVsystem.PV_p1udt611 irrad=1.0 Phases=1 Bus1=p1udt611.1 kV=7.1996 kVA=27.0634 Pmpp=22.5528 %cutin=0.001 %cutout=0.001
New PVsystem.PV_p1udt794 irrad=1.0 Phases=1 Bus1=p1udt794.1 kV=7.1996 kVA=38.5932 Pmpp=32.161 %cutin=0.001 %cutout=0.001
New PVsystem.PV_p1udt800 irrad=1.0 Phases=1 Bus1=p1udt800.1 kV=7.1996 kVA=20.683 Pmpp=17.2358 %cutin=0.001 %cutout=0.001
New PVsystem.PV_p1udt801 irrad=1.0 Phases=1 Bus1=p1udt801.1 kV=7.1996 kVA=18.7769 Pmpp=15.6475 %cutin=0.001 %cutout=0.001
New PVsystem.PV_p1udt803 irrad=1.0 Phases=1 Bus1=p1udt803.1 kV=7.1996 kVA=17.2668 Pmpp=14.389 %cutin=0.001 %cutout=0.001
New PVsystem.PV_p1udt811 irrad=1.0 Phases=1 Bus1=p1udt811.1 kV=7.1996 kVA=34.1991 Pmpp=28.4992 %cutin=0.001 %cutout=0.001
New PVsystem.PV_p1udt812 irrad=1.0 Phases=1 Bus1=p1udt812.1 kV=7.1996 kVA=29.265 Pmpp=24.3875 %cutin=0.001 %cutout=0.001
New PVsystem.PV_p1udt814 irrad=1.0 Phases=1 Bus1=p1udt814.1 kV=7.1996 kVA=17.2256 Pmpp=14.3547 %cutin=0.001 %cutout=0.001
New PVsystem.PV_p1udt819 irrad=1.0 Phases=1 Bus1=p1udt819.1 kV=7.1996 kVA=41.1039 Pmpp=34.2532 %cutin=0.001 %cutout=0.001
New PVsystem.PV_p1udt821 irrad=1.0 Phases=1 Bus1=p1udt821.1 kV=7.1996 kVA=35.6679 Pmpp=29.7233 %cutin=0.001 %cutout=0.001
New PVsystem.PV_p1udt822 irrad=1.0 Phases=1 Bus1=p1udt822.1 kV=7.1996 kVA=23.7375 Pmpp=19.7812 %cutin=0.001 %cutout=0.001
New PVsystem.PV_p1udt824 irrad=1.0 Phases=1 Bus1=p1udt824.1 kV=7.1996 kVA=24.6422 Pmpp=20.5351 %cutin=0.001 %cutout=0.001
New PVsystem.PV_p1udt834 irrad=1.0 Phases=1 Bus1=p1udt834.1 kV=7.1996 kVA=19.0797 Pmpp=15.8998 %cutin=0.001 %cutout=0.001
New PVsystem.PV_p1udt835 irrad=1.0 Phases=1 Bus1=p1udt835.1 kV=7.1996 kVA=104.451 Pmpp=87.0427 %cutin=0.001 %cutout=0.001
New PVsystem.PV_p1udt841 irrad=1.0 Phases=1 Bus1=p1udt841.1 kV=7.1996 kVA=5.63286 Pmpp=4.69405 %cutin=0.001 %cutout=0.001
New PVsystem.PV_p1umv14 irrad=1.0 Phases=1 Bus1=p1umv14.1 kV=7.1996 kVA=382.486 Pmpp=318.738 %cutin=0.001 %cutout=0.001
