! smartds_p1u_hs3_1ph: single-phase per-phase equivalent of test_networks\sources\smartds_sfo_p1u\p1uhs3_1247\Master.dss (unmodified original).
! Written by problems/msopf/root_level/convert_to_1ph.jl -- do not edit by hand.
! Per-phase equivalent, referred to 12.47 kV: a k-phase section has (3/k) x its positive-sequence
! impedance. Series R + jX only (c1=0 c0=0). Grouped by what each line is in the original.
! Substation transformers: a line with the leakage impedance (%R of both windings + j%X on its rating) in ohm at the distribution-side voltage, from the source bus (parallel units combined).
New Line.xfmr_sb8_p1uhs3_1247_trans_2 Phases=1 Bus1=sb8_p1uhs3_1247_node_8_4.1 Bus2=sb8_p1uhs3_1247_node_8_9.1 r1=0.0350719 x1=0.348926 c1=0 c0=0 length=1 units=none
! Lines of the original.
New Line.l_r_p1udt1266-p1udt1673_ Phases=1 Bus1=p1udt1266-p1udt1673x.1 Bus2=p1udt1266-p1udt1673xx.1 r1=0.0268685 x1=0.0241986 c1=0 c0=0 length=1 units=none
New Line.l_r_p1udt1266-p1udt793_ Phases=1 Bus1=p1udt1266.1 Bus2=p1udt1266-p1udt793x.1 r1=0.152823 x1=0.233733 c1=0 c0=0 length=1 units=none
New Line.l_r_p1udt1267-p1udt1818_ Phases=1 Bus1=p1udt1267-p1udt1818x.1 Bus2=p1udt1267-p1udt1818xx.1 r1=0.0205228 x1=0.0184835 c1=0 c0=0 length=1 units=none
New Line.l_r_p1udt1267-p1udt1823_ Phases=1 Bus1=p1udt1267-p1udt1823x.1 Bus2=p1udt1267-p1udt1823xx.1 r1=0.0106116 x1=0.00955712 c1=0 c0=0 length=1 units=none
New Line.l_r_p1udt1268-p1udt1798_ Phases=1 Bus1=p1udt1268-p1udt1798x.1 Bus2=p1udt1268-p1udt1798xx.1 r1=0.0413989 x1=0.0372852 c1=0 c0=0 length=1 units=none
New Line.l_r_p1udt1268-p1udt1799_ Phases=1 Bus1=p1udt1268-p1udt1799x.1 Bus2=p1udt1268-p1udt1799xx.1 r1=0.0334352 x1=0.0301128 c1=0 c0=0 length=1 units=none
New Line.l_r_p1udt1268-p1udt1814_ Phases=1 Bus1=p1udt1268-p1udt1814x.1 Bus2=p1udt1268-p1udt1814xx.1 r1=0.0306546 x1=0.0276085 c1=0 c0=0 length=1 units=none
New Line.l_r_p1udt1269-p1udt1813_ Phases=1 Bus1=p1udt1269-p1udt1813x.1 Bus2=p1udt1269-p1udt1813xx.1 r1=0.0134254 x1=0.0120913 c1=0 c0=0 length=1 units=none
New Line.l_r_p1udt1269-p1udt1818_ Phases=1 Bus1=p1udt1269-p1udt1818x.1 Bus2=p1udt1269-p1udt1818xx.1 r1=0.0548497 x1=0.0493993 c1=0 c0=0 length=1 units=none
New Line.l_r_p1udt1270-p1udt1310_ Phases=1 Bus1=p1udt1270-p1udt1310x.1 Bus2=p1udt1270-p1udt1310xx.1 r1=0.0124796 x1=0.0112395 c1=0 c0=0 length=1 units=none
New Line.l_r_p1udt1271-p1udt1663_ Phases=1 Bus1=p1udt1271.1 Bus2=p1udt1663.1 r1=0.0155634 x1=0.0238031 c1=0 c0=0 length=1 units=none
New Line.l_r_p1udt1271-p1udt1665_ Phases=1 Bus1=p1udt1271.1 Bus2=p1udt1271-p1udt1665x.1 r1=0.0263795 x1=0.0403456 c1=0 c0=0 length=1 units=none
New Line.l_r_p1udt1272-p1udt1273_ Phases=1 Bus1=p1udt1272-p1udt1273x.1 Bus2=p1udt1272-p1udt1273xx.1 r1=0.0283743 x1=0.0255548 c1=0 c0=0 length=1 units=none
New Line.l_r_p1udt1272-p1udt1669_ Phases=1 Bus1=p1udt1272-p1udt1669x.1 Bus2=p1udt1272-p1udt1669xx.1 r1=0.0368901 x1=0.0332243 c1=0 c0=0 length=1 units=none
New Line.l_r_p1udt1272-p1udt1682_ Phases=1 Bus1=p1udt1272-p1udt1682x.1 Bus2=p1udt1272-p1udt1682xx.1 r1=0.023485 x1=0.0211513 c1=0 c0=0 length=1 units=none
New Line.l_r_p1udt1273-p1udt1677_ Phases=1 Bus1=p1udt1273-p1udt1677x.1 Bus2=p1udt1273-p1udt1677xx.1 r1=0.0483515 x1=0.0435469 c1=0 c0=0 length=1 units=none
New Line.l_r_p1udt1298-p1udt1617_ Phases=1 Bus1=p1udt1298-p1udt1617x.1 Bus2=p1udt1298-p1udt1617xx.1 r1=0.00928671 x1=0.0083639 c1=0 c0=0 length=1 units=none
New Line.l_r_p1udt1298-p1udt1650_ Phases=1 Bus1=p1udt1298-p1udt1650x.1 Bus2=p1udt1298-p1udt1650xx.1 r1=0.0744318 x1=0.0670355 c1=0 c0=0 length=1 units=none
New Line.l_r_p1udt1299-p1udt1642_ Phases=1 Bus1=p1udt1299-p1udt1642x.1 Bus2=p1udt1299-p1udt1642xx.1 r1=0.158915 x1=0.165322 c1=0 c0=0 length=1 units=none
New Line.l_r_p1udt1300-p1udt1313_ Phases=1 Bus1=p1udt1300-p1udt1313x.1 Bus2=p1udt1300-p1udt1313xx.1 r1=0.0103137 x1=0.00928881 c1=0 c0=0 length=1 units=none
New Line.l_r_p1udt1300-p1udt1644_ Phases=1 Bus1=p1udt1300-p1udt1644x.1 Bus2=p1udt1300-p1udt1644xx.1 r1=0.00797009 x1=0.00717811 c1=0 c0=0 length=1 units=none
New Line.l_r_p1udt1301-p1udt1303_ Phases=1 Bus1=p1udt1301-p1udt1303x.1 Bus2=p1udt1301-p1udt1303xx.1 r1=0.0191833 x1=0.017277 c1=0 c0=0 length=1 units=none
New Line.l_r_p1udt1301-p1udt1305_ Phases=1 Bus1=p1udt1301-p1udt1305xx.1 Bus2=p1udt1301-p1udt1305xxx.1 r1=0.0027531 x1=0.0028641 c1=0 c0=0 length=1 units=none
New Line.l_r_p1udt1302-p1udt1309_ Phases=1 Bus1=p1udt1302-p1udt1309x.1 Bus2=p1udt1302-p1udt1309xx.1 r1=0.205884 x1=0.214185 c1=0 c0=0 length=1 units=none
New Line.l_r_p1udt1302-p1udt1311_ Phases=1 Bus1=p1udt1302.1 Bus2=p1udt1311.1 r1=0.117818 x1=0.0863044 c1=0 c0=0 length=1 units=none
New Line.l_r_p1udt1303-p1udt1316_ Phases=1 Bus1=p1udt1303-p1udt1316x.1 Bus2=p1udt1303-p1udt1316xx.1 r1=0.023663 x1=0.0213116 c1=0 c0=0 length=1 units=none
New Line.l_r_p1udt1304-p1udt1306_ Phases=1 Bus1=p1udt1304-p1udt1306x.1 Bus2=p1udt1304-p1udt1306xx.1 r1=0.193067 x1=0.200851 c1=0 c0=0 length=1 units=none
New Line.l_r_p1udt1306-p1udt1645_ Phases=1 Bus1=p1udt1306-p1udt1645x.1 Bus2=p1udt1306-p1udt1645xx.1 r1=0.175328 x1=0.182396 c1=0 c0=0 length=1 units=none
New Line.l_r_p1udt1307-p1udt1645_ Phases=1 Bus1=p1udt1307-p1udt1645x.1 Bus2=p1udt1307-p1udt1645xx.1 r1=0.185871 x1=0.193365 c1=0 c0=0 length=1 units=none
New Line.l_r_p1udt1308-p1udt1638_ Phases=1 Bus1=p1udt1308-p1udt1638x.1 Bus2=p1udt1308-p1udt1638xx.1 r1=0.0202688 x1=0.0182547 c1=0 c0=0 length=1 units=none
New Line.l_r_p1udt1308-p1udt1641_ Phases=1 Bus1=p1udt1308-p1udt1641x.1 Bus2=p1udt1308-p1udt1641xx.1 r1=0.0129592 x1=0.0116714 c1=0 c0=0 length=1 units=none
New Line.l_r_p1udt1308-p1udt1644_ Phases=1 Bus1=p1udt1308-p1udt1644x.1 Bus2=p1udt1308-p1udt1644xx.1 r1=0.0132793 x1=0.0119597 c1=0 c0=0 length=1 units=none
New Line.l_r_p1udt1310-p1udt1316_ Phases=1 Bus1=p1udt1310-p1udt1316x.1 Bus2=p1udt1310-p1udt1316xx.1 r1=0.0202164 x1=0.0182075 c1=0 c0=0 length=1 units=none
New Line.l_r_p1udt1311-p1udt1316_ Phases=1 Bus1=p1udt1311.1 Bus2=p1udt1311-p1udt1316x.1 r1=0.225527 x1=0.165203 c1=0 c0=0 length=1 units=none
New Line.l_r_p1udt1312-p1udt1314_ Phases=1 Bus1=p1udt1312-p1udt1314x.1 Bus2=p1udt1314.1 r1=0.134138 x1=0.098259 c1=0 c0=0 length=1 units=none
New Line.l_r_p1udt1312-p1udt1315_ Phases=1 Bus1=p1udt1312-p1udt1315x.1 Bus2=p1udt1312-p1udt1315xx.1 r1=0.0383767 x1=0.0345632 c1=0 c0=0 length=1 units=none
New Line.l_r_p1udt1312-p1udt1316_ Phases=1 Bus1=p1udt1312-p1udt1316x.1 Bus2=p1udt1312-p1udt1316xx.1 r1=0.0137007 x1=0.0123393 c1=0 c0=0 length=1 units=none
New Line.l_r_p1udt1313-p1udt1315_ Phases=1 Bus1=p1udt1313-p1udt1315x.1 Bus2=p1udt1313-p1udt1315xx.1 r1=0.0102112 x1=0.00919649 c1=0 c0=0 length=1 units=none
New Line.l_r_p1udt1315-p1udt1648_ Phases=1 Bus1=p1udt1315-p1udt1648x.1 Bus2=p1udt1315-p1udt1648xx.1 r1=0.0503511 x1=0.0453477 c1=0 c0=0 length=1 units=none
New Line.l_r_p1udt1317-p1udt1636_ Phases=1 Bus1=p1udt1317-p1udt1636x.1 Bus2=p1udt1317-p1udt1636xx.1 r1=0.00259783 x1=0.00233968 c1=0 c0=0 length=1 units=none
New Line.l_r_p1udt1321-p1udt1635_ Phases=1 Bus1=p1udt1321-p1udt1635xx.1 Bus2=p1udt1321-p1udt1635xxx.1 r1=0.0266637 x1=0.0277387 c1=0 c0=0 length=1 units=none
New Line.l_r_p1udt1321-p1udt1638_ Phases=1 Bus1=p1udt1321-p1udt1638x.1 Bus2=p1udt1321-p1udt1638xx.1 r1=0.014383 x1=0.0129538 c1=0 c0=0 length=1 units=none
New Line.l_r_p1udt1616-p1udt1617_ Phases=1 Bus1=p1udt1616-p1udt1617x.1 Bus2=p1udt1616-p1udt1617xx.1 r1=0.0435002 x1=0.0391776 c1=0 c0=0 length=1 units=none
New Line.l_r_p1udt1628-p1udt1651_ Phases=1 Bus1=p1udt1628-p1udt1651x.1 Bus2=p1udt1628-p1udt1651xx.1 r1=0.025842 x1=0.0232741 c1=0 c0=0 length=1 units=none
New Line.l_r_p1udt1631-p1udt1635_ Phases=1 Bus1=p1udt1631-p1udt1635x.1 Bus2=p1udt1631-p1udt1635xx.1 r1=0.213472 x1=0.222079 c1=0 c0=0 length=1 units=none
New Line.l_r_p1udt1634-p1udt1637_ Phases=1 Bus1=p1udt1634-p1udt1637x.1 Bus2=p1udt1634-p1udt1637xx.1 r1=0.0270296 x1=0.0243437 c1=0 c0=0 length=1 units=none
New Line.l_r_p1udt1636-p1udt1640_ Phases=1 Bus1=p1udt1636-p1udt1640x.1 Bus2=p1udt1636-p1udt1640xx.1 r1=0.00779945 x1=0.00702443 c1=0 c0=0 length=1 units=none
New Line.l_r_p1udt1637-p1udt1650_ Phases=1 Bus1=p1udt1637-p1udt1650x.1 Bus2=p1udt1637-p1udt1650xx.1 r1=0.0799879 x1=0.0720395 c1=0 c0=0 length=1 units=none
New Line.l_r_p1udt1640-p1udt1646_ Phases=1 Bus1=p1udt1640-p1udt1646x.1 Bus2=p1udt1640-p1udt1646xx.1 r1=0.0103995 x1=0.00936608 c1=0 c0=0 length=1 units=none
New Line.l_r_p1udt1641-p1udt1645_ Phases=1 Bus1=p1udt1641-p1udt1645x.1 Bus2=p1udt1641-p1udt1645xx.1 r1=0.00764181 x1=0.00688245 c1=0 c0=0 length=1 units=none
New Line.l_r_p1udt1642-p1udt1647_ Phases=1 Bus1=p1udt1642-p1udt1647x.1 Bus2=p1udt1642-p1udt1647xx.1 r1=0.132405 x1=0.137743 c1=0 c0=0 length=1 units=none
New Line.l_r_p1udt1645-p1udt1646_ Phases=1 Bus1=p1udt1645-p1udt1646x.1 Bus2=p1udt1645-p1udt1646xx.1 r1=0.0232429 x1=0.0209332 c1=0 c0=0 length=1 units=none
New Line.l_r_p1udt1647-p1udt1649_ Phases=1 Bus1=p1udt1647-p1udt1649x.1 Bus2=p1udt1647-p1udt1649xx.1 r1=0.105949 x1=0.11022 c1=0 c0=0 length=1 units=none
New Line.l_r_p1udt1648-p1udt1649_ Phases=1 Bus1=p1udt1648-p1udt1649xx.1 Bus2=p1udt1648-p1udt1649xxx.1 r1=0.396741 x1=0.412737 c1=0 c0=0 length=1 units=none
New Line.l_r_p1udt1648-p1udt1650_ Phases=1 Bus1=p1udt1648-p1udt1650x.1 Bus2=p1udt1648-p1udt1650xx.1 r1=0.079486 x1=0.0715875 c1=0 c0=0 length=1 units=none
New Line.l_r_p1udt1650-p1udt1671_ Phases=1 Bus1=p1udt1650-p1udt1671x.1 Bus2=p1udt1650-p1udt1671xx.1 r1=0.057969 x1=0.0522087 c1=0 c0=0 length=1 units=none
New Line.l_r_p1udt1651-p1udt1655_ Phases=1 Bus1=p1udt1651-p1udt1655x.1 Bus2=p1udt1651-p1udt1655xx.1 r1=0.0338681 x1=0.0305027 c1=0 c0=0 length=1 units=none
New Line.l_r_p1udt1652-p1udt1666_ Phases=1 Bus1=p1udt1652-p1udt1666x.1 Bus2=p1udt1652-p1udt1666xx.1 r1=0.0504698 x1=0.0525047 c1=0 c0=0 length=1 units=none
New Line.l_r_p1udt1653-p1udt1657_ Phases=1 Bus1=p1udt1653-p1udt1657x.1 Bus2=p1udt1657.1 r1=0.0031236 x1=0.0022881 c1=0 c0=0 length=1 units=none
New Line.l_r_p1udt1653-p1udt1658_ Phases=1 Bus1=p1udt1653.1 Bus2=p1udt1653-p1udt1658x.1 r1=0.0105345 x1=0.0161117 c1=0 c0=0 length=1 units=none
New Line.l_r_p1udt1654-p1umv17_ Phases=1 Bus1=p1udt1654.1 Bus2=p1udt1654-p1umv17x.1 r1=0.025008 x1=0.0382481 c1=0 c0=0 length=1 units=none
New Line.l_r_p1udt1655-p1udt1669_ Phases=1 Bus1=p1udt1655-p1udt1669x.1 Bus2=p1udt1655-p1udt1669xx.1 r1=0.0632463 x1=0.0569615 c1=0 c0=0 length=1 units=none
New Line.l_r_p1udt1656-p1udt1677_ Phases=1 Bus1=p1udt1656-p1udt1677x.1 Bus2=p1udt1656-p1udt1677xx.1 r1=0.025826 x1=0.0232596 c1=0 c0=0 length=1 units=none
New Line.l_r_p1udt1656-p1umv20_ Phases=1 Bus1=p1udt1656-p1umv20x.1 Bus2=p1udt1656-p1umv20xx.1 r1=0.0104427 x1=0.00940502 c1=0 c0=0 length=1 units=none
New Line.l_r_p1udt1658-p1umv17_ Phases=1 Bus1=p1udt1658.1 Bus2=p1udt1658-p1umv17x.1 r1=0.0400989 x1=0.0613286 c1=0 c0=0 length=1 units=none
New Line.l_r_p1udt1659-p1udt1664_ Phases=1 Bus1=p1udt1659.1 Bus2=p1udt1659-p1udt1664x.1 r1=0.0569386 x1=0.0870838 c1=0 c0=0 length=1 units=none
New Line.l_r_p1udt1659-p1umv17_ Phases=1 Bus1=p1udt1659.1 Bus2=p1umv17.1 r1=0.0412474 x1=0.0630851 c1=0 c0=0 length=1 units=none
New Line.l_r_p1udt1660-p1udt1664_ Phases=1 Bus1=p1udt1660-p1udt1664x.1 Bus2=p1udt1660-p1udt1664xx.1 r1=0.0947707 x1=0.0853534 c1=0 c0=0 length=1 units=none
New Line.l_r_p1udt1661-p1udt1662_ Phases=1 Bus1=p1udt1661.1 Bus2=p1udt1661-p1udt1662x.1 r1=0.0103756 x1=0.0158688 c1=0 c0=0 length=1 units=none
New Line.l_r_p1udt1661-p1udt1668_ Phases=1 Bus1=p1udt1661.1 Bus2=p1udt1668.1 r1=0.0330577 x1=0.0505595 c1=0 c0=0 length=1 units=none
New Line.l_r_p1udt1662-p1udt1663_ Phases=1 Bus1=p1udt1662.1 Bus2=p1udt1663.1 r1=0.0103729 x1=0.0158647 c1=0 c0=0 length=1 units=none
New Line.l_r_p1udt1664-p1udt1667_ Phases=1 Bus1=p1udt1664-p1udt1667xx.1 Bus2=p1udt1664-p1udt1667xxx.1 r1=0.182092 x1=0.189433 c1=0 c0=0 length=1 units=none
New Line.l_r_p1udt1664-p1udt1669_ Phases=1 Bus1=p1udt1664-p1udt1669x.1 Bus2=p1udt1664-p1udt1669xx.1 r1=0.0410462 x1=0.0369674 c1=0 c0=0 length=1 units=none
New Line.l_r_p1udt1665-p1udt1677_ Phases=1 Bus1=p1udt1665.1 Bus2=p1udt1665-p1udt1677x.1 r1=0.0410775 x1=0.0628253 c1=0 c0=0 length=1 units=none
New Line.l_r_p1udt1666-p1udt1671_ Phases=1 Bus1=p1udt1666-p1udt1671x.1 Bus2=p1udt1666-p1udt1671xx.1 r1=0.497463 x1=0.51752 c1=0 c0=0 length=1 units=none
New Line.l_r_p1udt1668-p1udt1670_ Phases=1 Bus1=p1udt1668.1 Bus2=p1udt1670.1 r1=0.0002735 x1=0.0004183 c1=0 c0=0 length=1 units=none
New Line.l_r_p1udt1671-p1udt1819_ Phases=1 Bus1=p1udt1671-p1udt1819x.1 Bus2=p1udt1671-p1udt1819xx.1 r1=0.0919175 x1=0.0827837 c1=0 c0=0 length=1 units=none
New Line.l_r_p1udt1672-p1udt1673_ Phases=1 Bus1=p1udt1672-p1udt1673x.1 Bus2=p1udt1672-p1udt1673xx.1 r1=0.0158069 x1=0.0142362 c1=0 c0=0 length=1 units=none
New Line.l_r_p1udt1674-p1udt1675_ Phases=1 Bus1=p1udt1674-p1udt1675x.1 Bus2=p1udt1674-p1udt1675xx.1 r1=0.0365174 x1=0.0328887 c1=0 c0=0 length=1 units=none
New Line.l_r_p1udt1674-p1umv22_ Phases=1 Bus1=p1udt1674-p1umv22x.1 Bus2=p1udt1674-p1umv22xx.1 r1=0.0157937 x1=0.0142243 c1=0 c0=0 length=1 units=none
New Line.l_r_p1udt1675-p1udt1806_ Phases=1 Bus1=p1udt1675-p1udt1806x.1 Bus2=p1udt1675-p1udt1806xx.1 r1=0.0279053 x1=0.0251324 c1=0 c0=0 length=1 units=none
New Line.l_r_p1udt1676-p1udt1801_ Phases=1 Bus1=p1udt1676-p1udt1801x.1 Bus2=p1udt1676-p1udt1801xx.1 r1=0.02129 x1=0.0191745 c1=0 c0=0 length=1 units=none
New Line.l_r_p1udt1676-p1udt1824_ Phases=1 Bus1=p1udt1676-p1udt1824x.1 Bus2=p1udt1676-p1udt1824xx.1 r1=0.0425818 x1=0.0383505 c1=0 c0=0 length=1 units=none
New Line.l_r_p1udt1678-p1udt1694_ Phases=1 Bus1=p1udt1678-p1udt1694x.1 Bus2=p1udt1678-p1udt1694xx.1 r1=0.00455415 x1=0.00828927 c1=0 c0=0 length=1 units=none
New Line.l_r_p1udt1678-p1udt1819_ Phases=1 Bus1=p1udt1678-p1udt1819x.1 Bus2=p1udt1678-p1udt1819xx.1 r1=0.0214649 x1=0.0390694 c1=0 c0=0 length=1 units=none
New Line.l_r_p1udt1679-p1udt1680_ Phases=1 Bus1=p1udt1679.1 Bus2=p1udt1679-p1udt1680x.1 r1=0.0309181 x1=0.0472871 c1=0 c0=0 length=1 units=none
New Line.l_r_p1udt1679-p1udt1688_ Phases=1 Bus1=p1udt1679-p1udt1688x.1 Bus2=p1udt1688.1 r1=0.0154585 x1=0.0236428 c1=0 c0=0 length=1 units=none
New Line.l_r_p1udt1680-p1udt1681_ Phases=1 Bus1=p1udt1680.1 Bus2=p1udt1680-p1udt1681x.1 r1=0.0311303 x1=0.0476117 c1=0 c0=0 length=1 units=none
New Line.l_r_p1udt1681-p1udt1686_ Phases=1 Bus1=p1udt1681-p1udt1686x.1 Bus2=p1udt1681-p1udt1686xx.1 r1=0.0390593 x1=0.035178 c1=0 c0=0 length=1 units=none
New Line.l_r_p1udt1681-p1udt1689_ Phases=1 Bus1=p1udt1681-p1udt1689x.1 Bus2=p1udt1689.1 r1=0.451548 x1=0.330768 c1=0 c0=0 length=1 units=none
New Line.l_r_p1udt1682-p1udt1686_ Phases=1 Bus1=p1udt1682-p1udt1686x.1 Bus2=p1udt1682-p1udt1686xx.1 r1=0.0208879 x1=0.0188122 c1=0 c0=0 length=1 units=none
New Line.l_r_p1udt1682-p1udt1819_ Phases=1 Bus1=p1udt1682-p1udt1819x.1 Bus2=p1udt1682-p1udt1819xx.1 r1=0.0415981 x1=0.0566761 c1=0 c0=0 length=1 units=none
New Line.l_r_p1udt1683-p1udt1684_ Phases=1 Bus1=p1udt1683-p1udt1684x.1 Bus2=p1udt1683-p1udt1684xx.1 r1=0.0158219 x1=0.0142497 c1=0 c0=0 length=1 units=none
New Line.l_r_p1udt1683-p1udt1686_ Phases=1 Bus1=p1udt1683-p1udt1686x.1 Bus2=p1udt1683-p1udt1686xx.1 r1=0.0105497 x1=0.00950137 c1=0 c0=0 length=1 units=none
New Line.l_r_p1udt1685-p1udt1687_ Phases=1 Bus1=p1udt1685.1 Bus2=p1udt1687.1 r1=0.0582377 x1=0.0890707 c1=0 c0=0 length=1 units=none
New Line.l_r_p1udt1685-p1umv19_ Phases=1 Bus1=p1udt1685-p1umv19x.1 Bus2=p1udt1685-p1umv19xx.1 r1=0.0669967 x1=0.0603393 c1=0 c0=0 length=1 units=none
New Line.l_r_p1udt1687-p1udt1688_ Phases=1 Bus1=p1udt1687.1 Bus2=p1udt1687-p1udt1688x.1 r1=0.00515373 x1=0.00788228 c1=0 c0=0 length=1 units=none
New Line.l_r_p1udt1690-p1udt1691_ Phases=1 Bus1=p1udt1690-p1udt1691x.1 Bus2=p1udt1690-p1udt1691xx.1 r1=0.0214843 x1=0.0193494 c1=0 c0=0 length=1 units=none
New Line.l_r_p1udt1691-p1udt1692_ Phases=1 Bus1=p1udt1691-p1udt1692x.1 Bus2=p1udt1691-p1udt1692xx.1 r1=0.0212659 x1=0.0191527 c1=0 c0=0 length=1 units=none
New Line.l_r_p1udt1692-p1udt1693_ Phases=1 Bus1=p1udt1692-p1udt1693x.1 Bus2=p1udt1692-p1udt1693xx.1 r1=0.0156804 x1=0.0141223 c1=0 c0=0 length=1 units=none
New Line.l_r_p1udt1693-p1udt1695_ Phases=1 Bus1=p1udt1693-p1udt1695x.1 Bus2=p1udt1693-p1udt1695xx.1 r1=0.0477846 x1=0.0430363 c1=0 c0=0 length=1 units=none
New Line.l_r_p1udt1694-p1udt1695_ Phases=1 Bus1=p1udt1694-p1udt1695x.1 Bus2=p1udt1694-p1udt1695xx.1 r1=0.00569296 x1=0.0103621 c1=0 c0=0 length=1 units=none
New Line.l_r_p1udt1695-p1udt1696_ Phases=1 Bus1=p1udt1695-p1udt1696x.1 Bus2=p1udt1695-p1udt1696xx.1 r1=0.023056 x1=0.0419656 c1=0 c0=0 length=1 units=none
New Line.l_r_p1udt1696-p1udt1697_ Phases=1 Bus1=p1udt1696-p1udt1697x.1 Bus2=p1udt1696-p1udt1697xx.1 r1=0.0526586 x1=0.047426 c1=0 c0=0 length=1 units=none
New Line.l_r_p1udt1696-p1uhs3_1247_ Phases=1 Bus1=p1udt1696.1 Bus2=p1udt1696-p1uhs3_1247x.1 r1=0.00686289 x1=0.0124915 c1=0 c0=0 length=1 units=none
New Line.l_r_p1udt1697-p1udt1699_ Phases=1 Bus1=p1udt1697-p1udt1699x.1 Bus2=p1udt1697-p1udt1699xx.1 r1=0.0425282 x1=0.0383022 c1=0 c0=0 length=1 units=none
New Line.l_r_p1udt1698-p1udt1699_ Phases=1 Bus1=p1udt1698-p1udt1699x.1 Bus2=p1udt1698-p1udt1699xx.1 r1=0.0275798 x1=0.0248392 c1=0 c0=0 length=1 units=none
New Line.l_r_p1udt1698-p1udt1851_ Phases=1 Bus1=p1udt1698-p1udt1851x.1 Bus2=p1udt1698-p1udt1851xx.1 r1=0.0252826 x1=0.0227703 c1=0 c0=0 length=1 units=none
New Line.l_r_p1udt1698-p1udt793_ Phases=1 Bus1=p1udt1698.1 Bus2=p1udt793.1 r1=0.0640179 x1=0.0979111 c1=0 c0=0 length=1 units=none
New Line.l_r_p1udt1797-p1udt1816_ Phases=1 Bus1=p1udt1797-p1udt1816x.1 Bus2=p1udt1797-p1udt1816xx.1 r1=0.0322205 x1=0.0290188 c1=0 c0=0 length=1 units=none
New Line.l_r_p1udt1798-p1udt1820_ Phases=1 Bus1=p1udt1798-p1udt1820x.1 Bus2=p1udt1798-p1udt1820xx.1 r1=0.00532385 x1=0.00479482 c1=0 c0=0 length=1 units=none
New Line.l_r_p1udt1799-p1udt1821_ Phases=1 Bus1=p1udt1799-p1udt1821x.1 Bus2=p1udt1799-p1udt1821xx.1 r1=0.00797352 x1=0.00718119 c1=0 c0=0 length=1 units=none
New Line.l_r_p1udt1800-p1udt1817_ Phases=1 Bus1=p1udt1800-p1udt1817x.1 Bus2=p1udt1817.1 r1=0.0668574 x1=0.102254 c1=0 c0=0 length=1 units=none
New Line.l_r_p1udt1800-p1udt1818_ Phases=1 Bus1=p1udt1800.1 Bus2=p1udt1818.1 r1=0.0615099 x1=0.0940753 c1=0 c0=0 length=1 units=none
New Line.l_r_p1udt1801-p1udt1822_ Phases=1 Bus1=p1udt1801-p1udt1822x.1 Bus2=p1udt1801-p1udt1822xx.1 r1=0.00266103 x1=0.00239661 c1=0 c0=0 length=1 units=none
New Line.l_r_p1udt1802-p1udt1804_ Phases=1 Bus1=p1udt1802-p1udt1804x.1 Bus2=p1udt1802-p1udt1804xx.1 r1=0.0214788 x1=0.0193445 c1=0 c0=0 length=1 units=none
New Line.l_r_p1udt1803-p1udt1823_ Phases=1 Bus1=p1udt1803-p1udt1823x.1 Bus2=p1udt1803-p1udt1823xx.1 r1=0.00795545 x1=0.00716492 c1=0 c0=0 length=1 units=none
New Line.l_r_p1udt1804-p1udt1806_ Phases=1 Bus1=p1udt1804-p1udt1806x.1 Bus2=p1udt1804-p1udt1806xx.1 r1=0.0323341 x1=0.029121 c1=0 c0=0 length=1 units=none
New Line.l_r_p1udt1805-p1umv22_ Phases=1 Bus1=p1udt1805-p1umv22x.1 Bus2=p1udt1805-p1umv22xx.1 r1=0.0412228 x1=0.0371265 c1=0 c0=0 length=1 units=none
New Line.l_r_p1udt1807-p1udt1824_ Phases=1 Bus1=p1udt1807-p1udt1824x.1 Bus2=p1udt1807-p1udt1824xx.1 r1=0.05443 x1=0.0490213 c1=0 c0=0 length=1 units=none
New Line.l_r_p1udt1807-p1umv21_ Phases=1 Bus1=p1udt1807-p1umv21x.1 Bus2=p1udt1807-p1umv21xx.1 r1=0.0582312 x1=0.0524448 c1=0 c0=0 length=1 units=none
New Line.l_r_p1udt1807-p1umv22_ Phases=1 Bus1=p1udt1807-p1umv22x.1 Bus2=p1udt1807-p1umv22xx.1 r1=0.0474653 x1=0.0427487 c1=0 c0=0 length=1 units=none
New Line.l_r_p1udt1808-p1umv22_ Phases=1 Bus1=p1udt1808-p1umv22x.1 Bus2=p1udt1808-p1umv22xx.1 r1=0.0434565 x1=0.0391382 c1=0 c0=0 length=1 units=none
New Line.l_r_p1udt1812-p1udt1815_ Phases=1 Bus1=p1udt1812.1 Bus2=p1udt1815.1 r1=0.0222285 x1=0.033997 c1=0 c0=0 length=1 units=none
New Line.l_r_p1udt1813-p1udt1816_ Phases=1 Bus1=p1udt1813-p1udt1816x.1 Bus2=p1udt1813-p1udt1816xx.1 r1=0.00805548 x1=0.00725501 c1=0 c0=0 length=1 units=none
New Line.l_r_p1udt1814-p1udt1818_ Phases=1 Bus1=p1udt1814-p1udt1818x.1 Bus2=p1udt1814-p1udt1818xx.1 r1=0.0175832 x1=0.015836 c1=0 c0=0 length=1 units=none
New Line.l_r_p1udt1815-p1udt1817_ Phases=1 Bus1=p1udt1815.1 Bus2=p1udt1817.1 r1=0.0189048 x1=0.0289137 c1=0 c0=0 length=1 units=none
New Line.l_r_p1udt1820-p1udt1822_ Phases=1 Bus1=p1udt1820-p1udt1822x.1 Bus2=p1udt1820-p1udt1822xx.1 r1=0.0133069 x1=0.0119846 c1=0 c0=0 length=1 units=none
New Line.l_r_p1udt1824-p1uhs3_1247_ Phases=1 Bus1=p1udt1824.1 Bus2=p1udt1824-p1uhs3_1247x.1 r1=0.0607424 x1=0.0547064 c1=0 c0=0 length=1 units=none
New Line.l_r_p1udt1851-p1udt1852_ Phases=1 Bus1=p1udt1851-p1udt1852x.1 Bus2=p1udt1851-p1udt1852xx.1 r1=0.0128606 x1=0.0115827 c1=0 c0=0 length=1 units=none
New Line.l_r_p1umv18-p1umv19_ Phases=1 Bus1=p1umv18-p1umv19x.1 Bus2=p1umv18-p1umv19xx.1 r1=0.00396303 x1=0.00356922 c1=0 c0=0 length=1 units=none
New Line.sb8_p1uhs3_1247_95 Phases=1 Bus1=p1udt1824-p1uhs3_1247x.1 Bus2=sb8_p1uhs3_1247_bus_8_2.1 r1=0.000362685 x1=0.000920791 c1=0 c0=0 length=1 units=none
New Line.sb8_p1uhs3_1247_96 Phases=1 Bus1=p1udt1696-p1uhs3_1247x.1 Bus2=sb8_p1uhs3_1247_bus_8_3.1 r1=0.000395656 x1=0.0010045 c1=0 c0=0 length=1 units=none
! Closed switches in the original. A switch is not in the model: a short line of 1e-3 + j1e-3 ohm.
New Line.goab_disswitch_r_p1udt1271-p1udt1665_p1u_12259 Phases=1 Bus1=p1udt1271-p1udt1665x.1 Bus2=p1udt1665.1 r1=0.001 x1=0.001 c1=0 c0=0 length=1 units=none
New Line.goab_disswitch_r_p1udt1653-p1udt1658_p1u_12333 Phases=1 Bus1=p1udt1653-p1udt1658x.1 Bus2=p1udt1658.1 r1=0.001 x1=0.001 c1=0 c0=0 length=1 units=none
New Line.goab_disswitch_r_p1udt1654-p1umv17_p1u_12275 Phases=1 Bus1=p1udt1654-p1umv17x.1 Bus2=p1umv17.1 r1=0.001 x1=0.001 c1=0 c0=0 length=1 units=none
New Line.goab_disswitch_r_p1udt1658-p1umv17_p1u_12245 Phases=1 Bus1=p1udt1658-p1umv17x.1 Bus2=p1umv17.1 r1=0.001 x1=0.001 c1=0 c0=0 length=1 units=none
New Line.goab_disswitch_r_p1udt1659-p1udt1664_p1u_12292 Phases=1 Bus1=p1udt1659-p1udt1664x.1 Bus2=p1udt1664.1 r1=0.001 x1=0.001 c1=0 c0=0 length=1 units=none
New Line.goab_disswitch_r_p1udt1661-p1udt1662_p1u_12314 Phases=1 Bus1=p1udt1661-p1udt1662x.1 Bus2=p1udt1662.1 r1=0.001 x1=0.001 c1=0 c0=0 length=1 units=none
New Line.goab_disswitch_r_p1udt1679-p1udt1680_p1u_12241 Phases=1 Bus1=p1udt1679-p1udt1680x.1 Bus2=p1udt1680.1 r1=0.001 x1=0.001 c1=0 c0=0 length=1 units=none
New Line.goab_disswitch_r_p1udt1679-p1udt1688_p1u_12256 Phases=1 Bus1=p1udt1679.1 Bus2=p1udt1679-p1udt1688x.1 r1=0.001 x1=0.001 c1=0 c0=0 length=1 units=none
New Line.goab_disswitch_r_p1udt1687-p1udt1688_p1u_12300 Phases=1 Bus1=p1udt1687-p1udt1688x.1 Bus2=p1udt1688.1 r1=0.001 x1=0.001 c1=0 c0=0 length=1 units=none
New Line.goab_disswitch_r_p1udt1800-p1udt1817_p1u_12296 Phases=1 Bus1=p1udt1800.1 Bus2=p1udt1800-p1udt1817x.1 r1=0.001 x1=0.001 c1=0 c0=0 length=1 units=none
New Line.padswitch_r_p1udt1266-p1udt1673_p1u_11805 Phases=1 Bus1=p1udt1266.1 Bus2=p1udt1266-p1udt1673x.1 r1=0.001 x1=0.001 c1=0 c0=0 length=1 units=none
New Line.padswitch_r_p1udt1266-p1udt1673_p1u_11806 Phases=1 Bus1=p1udt1266-p1udt1673xx.1 Bus2=p1udt1673.1 r1=0.001 x1=0.001 c1=0 c0=0 length=1 units=none
New Line.padswitch_r_p1udt1267-p1udt1818_p1u_11826 Phases=1 Bus1=p1udt1267-p1udt1818xx.1 Bus2=p1udt1818.1 r1=0.001 x1=0.001 c1=0 c0=0 length=1 units=none
New Line.padswitch_r_p1udt1267-p1udt1818_p1u_11827 Phases=1 Bus1=p1udt1267.1 Bus2=p1udt1267-p1udt1818x.1 r1=0.001 x1=0.001 c1=0 c0=0 length=1 units=none
New Line.padswitch_r_p1udt1267-p1udt1823_p1u_11824 Phases=1 Bus1=p1udt1267.1 Bus2=p1udt1267-p1udt1823x.1 r1=0.001 x1=0.001 c1=0 c0=0 length=1 units=none
New Line.padswitch_r_p1udt1267-p1udt1823_p1u_11825 Phases=1 Bus1=p1udt1267-p1udt1823xx.1 Bus2=p1udt1823.1 r1=0.001 x1=0.001 c1=0 c0=0 length=1 units=none
New Line.padswitch_r_p1udt1268-p1udt1798_p1u_11840 Phases=1 Bus1=p1udt1268-p1udt1798xx.1 Bus2=p1udt1798.1 r1=0.001 x1=0.001 c1=0 c0=0 length=1 units=none
New Line.padswitch_r_p1udt1268-p1udt1798_p1u_11841 Phases=1 Bus1=p1udt1268.1 Bus2=p1udt1268-p1udt1798x.1 r1=0.001 x1=0.001 c1=0 c0=0 length=1 units=none
New Line.padswitch_r_p1udt1268-p1udt1799_p1u_11820 Phases=1 Bus1=p1udt1268.1 Bus2=p1udt1268-p1udt1799x.1 r1=0.001 x1=0.001 c1=0 c0=0 length=1 units=none
New Line.padswitch_r_p1udt1268-p1udt1799_p1u_11821 Phases=1 Bus1=p1udt1268-p1udt1799xx.1 Bus2=p1udt1799.1 r1=0.001 x1=0.001 c1=0 c0=0 length=1 units=none
New Line.padswitch_r_p1udt1268-p1udt1814_p1u_11838 Phases=1 Bus1=p1udt1268.1 Bus2=p1udt1268-p1udt1814x.1 r1=0.001 x1=0.001 c1=0 c0=0 length=1 units=none
New Line.padswitch_r_p1udt1268-p1udt1814_p1u_11839 Phases=1 Bus1=p1udt1268-p1udt1814xx.1 Bus2=p1udt1814.1 r1=0.001 x1=0.001 c1=0 c0=0 length=1 units=none
New Line.padswitch_r_p1udt1269-p1udt1813_p1u_11832 Phases=1 Bus1=p1udt1269.1 Bus2=p1udt1269-p1udt1813x.1 r1=0.001 x1=0.001 c1=0 c0=0 length=1 units=none
New Line.padswitch_r_p1udt1269-p1udt1813_p1u_11833 Phases=1 Bus1=p1udt1269-p1udt1813xx.1 Bus2=p1udt1813.1 r1=0.001 x1=0.001 c1=0 c0=0 length=1 units=none
New Line.padswitch_r_p1udt1269-p1udt1818_p1u_11834 Phases=1 Bus1=p1udt1269-p1udt1818xx.1 Bus2=p1udt1818.1 r1=0.001 x1=0.001 c1=0 c0=0 length=1 units=none
New Line.padswitch_r_p1udt1269-p1udt1818_p1u_11835 Phases=1 Bus1=p1udt1269.1 Bus2=p1udt1269-p1udt1818x.1 r1=0.001 x1=0.001 c1=0 c0=0 length=1 units=none
New Line.padswitch_r_p1udt1270-p1udt1310_p1u_11693 Phases=1 Bus1=p1udt1270-p1udt1310xx.1 Bus2=p1udt1310.1 r1=0.001 x1=0.001 c1=0 c0=0 length=1 units=none
New Line.padswitch_r_p1udt1270-p1udt1310_p1u_11694 Phases=1 Bus1=p1udt1270.1 Bus2=p1udt1270-p1udt1310x.1 r1=0.001 x1=0.001 c1=0 c0=0 length=1 units=none
New Line.padswitch_r_p1udt1272-p1udt1273_p1u_11763 Phases=1 Bus1=p1udt1272.1 Bus2=p1udt1272-p1udt1273x.1 r1=0.001 x1=0.001 c1=0 c0=0 length=1 units=none
New Line.padswitch_r_p1udt1272-p1udt1273_p1u_11764 Phases=1 Bus1=p1udt1272-p1udt1273xx.1 Bus2=p1udt1273.1 r1=0.001 x1=0.001 c1=0 c0=0 length=1 units=none
New Line.padswitch_r_p1udt1272-p1udt1669_p1u_11777 Phases=1 Bus1=p1udt1272.1 Bus2=p1udt1272-p1udt1669x.1 r1=0.001 x1=0.001 c1=0 c0=0 length=1 units=none
New Line.padswitch_r_p1udt1272-p1udt1669_p1u_11778 Phases=1 Bus1=p1udt1272-p1udt1669xx.1 Bus2=p1udt1669.1 r1=0.001 x1=0.001 c1=0 c0=0 length=1 units=none
New Line.padswitch_r_p1udt1272-p1udt1682_p1u_11779 Phases=1 Bus1=p1udt1272-p1udt1682xx.1 Bus2=p1udt1682.1 r1=0.001 x1=0.001 c1=0 c0=0 length=1 units=none
New Line.padswitch_r_p1udt1272-p1udt1682_p1u_11780 Phases=1 Bus1=p1udt1272.1 Bus2=p1udt1272-p1udt1682x.1 r1=0.001 x1=0.001 c1=0 c0=0 length=1 units=none
New Line.padswitch_r_p1udt1273-p1udt1677_p1u_11761 Phases=1 Bus1=p1udt1273.1 Bus2=p1udt1273-p1udt1677x.1 r1=0.001 x1=0.001 c1=0 c0=0 length=1 units=none
New Line.padswitch_r_p1udt1273-p1udt1677_p1u_11762 Phases=1 Bus1=p1udt1273-p1udt1677xx.1 Bus2=p1udt1677.1 r1=0.001 x1=0.001 c1=0 c0=0 length=1 units=none
New Line.padswitch_r_p1udt1298-p1udt1617_p1u_11679 Phases=1 Bus1=p1udt1298.1 Bus2=p1udt1298-p1udt1617x.1 r1=0.001 x1=0.001 c1=0 c0=0 length=1 units=none
New Line.padswitch_r_p1udt1298-p1udt1617_p1u_11680 Phases=1 Bus1=p1udt1298-p1udt1617xx.1 Bus2=p1udt1617.1 r1=0.001 x1=0.001 c1=0 c0=0 length=1 units=none
New Line.padswitch_r_p1udt1298-p1udt1650_p1u_11681 Phases=1 Bus1=p1udt1298-p1udt1650xx.1 Bus2=p1udt1650.1 r1=0.001 x1=0.001 c1=0 c0=0 length=1 units=none
New Line.padswitch_r_p1udt1298-p1udt1650_p1u_11682 Phases=1 Bus1=p1udt1298.1 Bus2=p1udt1298-p1udt1650x.1 r1=0.001 x1=0.001 c1=0 c0=0 length=1 units=none
New Line.padswitch_r_p1udt1299-p1udt1642_p1u_11739 Phases=1 Bus1=p1udt1299-p1udt1642xx.1 Bus2=p1udt1642.1 r1=0.001 x1=0.001 c1=0 c0=0 length=1 units=none
New Line.padswitch_r_p1udt1299-p1udt1642_p1u_11740 Phases=1 Bus1=p1udt1299.1 Bus2=p1udt1299-p1udt1642x.1 r1=0.001 x1=0.001 c1=0 c0=0 length=1 units=none
New Line.padswitch_r_p1udt1300-p1udt1313_p1u_11733 Phases=1 Bus1=p1udt1300-p1udt1313xx.1 Bus2=p1udt1313.1 r1=0.001 x1=0.001 c1=0 c0=0 length=1 units=none
New Line.padswitch_r_p1udt1300-p1udt1313_p1u_11734 Phases=1 Bus1=p1udt1300.1 Bus2=p1udt1300-p1udt1313x.1 r1=0.001 x1=0.001 c1=0 c0=0 length=1 units=none
New Line.padswitch_r_p1udt1300-p1udt1644_p1u_11731 Phases=1 Bus1=p1udt1300.1 Bus2=p1udt1300-p1udt1644x.1 r1=0.001 x1=0.001 c1=0 c0=0 length=1 units=none
New Line.padswitch_r_p1udt1300-p1udt1644_p1u_11732 Phases=1 Bus1=p1udt1300-p1udt1644xx.1 Bus2=p1udt1644.1 r1=0.001 x1=0.001 c1=0 c0=0 length=1 units=none
New Line.padswitch_r_p1udt1301-p1udt1303_p1u_11689 Phases=1 Bus1=p1udt1301-p1udt1303xx.1 Bus2=p1udt1303.1 r1=0.001 x1=0.001 c1=0 c0=0 length=1 units=none
New Line.padswitch_r_p1udt1301-p1udt1303_p1u_11690 Phases=1 Bus1=p1udt1301.1 Bus2=p1udt1301-p1udt1303x.1 r1=0.001 x1=0.001 c1=0 c0=0 length=1 units=none
New Line.padswitch_r_p1udt1301-p1udt1305_p1u_11687 Phases=1 Bus1=p1udt1301-p1udt1305x.1 Bus2=p1udt1301-p1udt1305xx.1 r1=0.001 x1=0.001 c1=0 c0=0 length=1 units=none
New Line.padswitch_r_p1udt1301-p1udt1305_p1u_11688 Phases=1 Bus1=p1udt1301-p1udt1305xxx.1 Bus2=p1udt1305.1 r1=0.001 x1=0.001 c1=0 c0=0 length=1 units=none
New Line.padswitch_r_p1udt1302-p1udt1309_p1u_11697 Phases=1 Bus1=p1udt1302.1 Bus2=p1udt1302-p1udt1309x.1 r1=0.001 x1=0.001 c1=0 c0=0 length=1 units=none
New Line.padswitch_r_p1udt1302-p1udt1309_p1u_11698 Phases=1 Bus1=p1udt1302-p1udt1309xx.1 Bus2=p1udt1309.1 r1=0.001 x1=0.001 c1=0 c0=0 length=1 units=none
New Line.padswitch_r_p1udt1303-p1udt1316_p1u_11691 Phases=1 Bus1=p1udt1303-p1udt1316xx.1 Bus2=p1udt1316.1 r1=0.001 x1=0.001 c1=0 c0=0 length=1 units=none
New Line.padswitch_r_p1udt1303-p1udt1316_p1u_11692 Phases=1 Bus1=p1udt1303.1 Bus2=p1udt1303-p1udt1316x.1 r1=0.001 x1=0.001 c1=0 c0=0 length=1 units=none
New Line.padswitch_r_p1udt1304-p1udt1306_p1u_11711 Phases=1 Bus1=p1udt1304-p1udt1306xx.1 Bus2=p1udt1306.1 r1=0.001 x1=0.001 c1=0 c0=0 length=1 units=none
New Line.padswitch_r_p1udt1304-p1udt1306_p1u_11712 Phases=1 Bus1=p1udt1304.1 Bus2=p1udt1304-p1udt1306x.1 r1=0.001 x1=0.001 c1=0 c0=0 length=1 units=none
New Line.padswitch_r_p1udt1306-p1udt1645_p1u_11713 Phases=1 Bus1=p1udt1306-p1udt1645xx.1 Bus2=p1udt1306-p1udt1645xxx.1 r1=0.001 x1=0.001 c1=0 c0=0 length=1 units=none
New Line.padswitch_r_p1udt1306-p1udt1645_p1u_11714 Phases=1 Bus1=p1udt1306.1 Bus2=p1udt1306-p1udt1645x.1 r1=0.001 x1=0.001 c1=0 c0=0 length=1 units=none
New Line.padswitch_r_p1udt1307-p1udt1645_p1u_11715 Phases=1 Bus1=p1udt1307-p1udt1645xx.1 Bus2=p1udt1307-p1udt1645xxx.1 r1=0.001 x1=0.001 c1=0 c0=0 length=1 units=none
New Line.padswitch_r_p1udt1307-p1udt1645_p1u_11716 Phases=1 Bus1=p1udt1307.1 Bus2=p1udt1307-p1udt1645x.1 r1=0.001 x1=0.001 c1=0 c0=0 length=1 units=none
New Line.padswitch_r_p1udt1308-p1udt1638_p1u_11709 Phases=1 Bus1=p1udt1308.1 Bus2=p1udt1308-p1udt1638x.1 r1=0.001 x1=0.001 c1=0 c0=0 length=1 units=none
New Line.padswitch_r_p1udt1308-p1udt1638_p1u_11710 Phases=1 Bus1=p1udt1308-p1udt1638xx.1 Bus2=p1udt1638.1 r1=0.001 x1=0.001 c1=0 c0=0 length=1 units=none
New Line.padswitch_r_p1udt1308-p1udt1641_p1u_11727 Phases=1 Bus1=p1udt1308.1 Bus2=p1udt1308-p1udt1641x.1 r1=0.001 x1=0.001 c1=0 c0=0 length=1 units=none
New Line.padswitch_r_p1udt1308-p1udt1641_p1u_11728 Phases=1 Bus1=p1udt1308-p1udt1641xx.1 Bus2=p1udt1641.1 r1=0.001 x1=0.001 c1=0 c0=0 length=1 units=none
New Line.padswitch_r_p1udt1308-p1udt1644_p1u_11729 Phases=1 Bus1=p1udt1308-p1udt1644xx.1 Bus2=p1udt1644.1 r1=0.001 x1=0.001 c1=0 c0=0 length=1 units=none
New Line.padswitch_r_p1udt1308-p1udt1644_p1u_11730 Phases=1 Bus1=p1udt1308.1 Bus2=p1udt1308-p1udt1644x.1 r1=0.001 x1=0.001 c1=0 c0=0 length=1 units=none
New Line.padswitch_r_p1udt1310-p1udt1316_p1u_11695 Phases=1 Bus1=p1udt1310-p1udt1316xx.1 Bus2=p1udt1316.1 r1=0.001 x1=0.001 c1=0 c0=0 length=1 units=none
New Line.padswitch_r_p1udt1310-p1udt1316_p1u_11696 Phases=1 Bus1=p1udt1310.1 Bus2=p1udt1310-p1udt1316x.1 r1=0.001 x1=0.001 c1=0 c0=0 length=1 units=none
New Line.padswitch_r_p1udt1312-p1udt1315_p1u_11701 Phases=1 Bus1=p1udt1312-p1udt1315xx.1 Bus2=p1udt1315.1 r1=0.001 x1=0.001 c1=0 c0=0 length=1 units=none
New Line.padswitch_r_p1udt1312-p1udt1315_p1u_11702 Phases=1 Bus1=p1udt1312.1 Bus2=p1udt1312-p1udt1315x.1 r1=0.001 x1=0.001 c1=0 c0=0 length=1 units=none
New Line.padswitch_r_p1udt1312-p1udt1316_p1u_11699 Phases=1 Bus1=p1udt1312.1 Bus2=p1udt1312-p1udt1316x.1 r1=0.001 x1=0.001 c1=0 c0=0 length=1 units=none
New Line.padswitch_r_p1udt1312-p1udt1316_p1u_11700 Phases=1 Bus1=p1udt1312-p1udt1316xx.1 Bus2=p1udt1316.1 r1=0.001 x1=0.001 c1=0 c0=0 length=1 units=none
New Line.padswitch_r_p1udt1313-p1udt1315_p1u_11735 Phases=1 Bus1=p1udt1313-p1udt1315xx.1 Bus2=p1udt1315.1 r1=0.001 x1=0.001 c1=0 c0=0 length=1 units=none
New Line.padswitch_r_p1udt1313-p1udt1315_p1u_11736 Phases=1 Bus1=p1udt1313.1 Bus2=p1udt1313-p1udt1315x.1 r1=0.001 x1=0.001 c1=0 c0=0 length=1 units=none
New Line.padswitch_r_p1udt1315-p1udt1648_p1u_11737 Phases=1 Bus1=p1udt1315-p1udt1648xx.1 Bus2=p1udt1648.1 r1=0.001 x1=0.001 c1=0 c0=0 length=1 units=none
New Line.padswitch_r_p1udt1315-p1udt1648_p1u_11738 Phases=1 Bus1=p1udt1315.1 Bus2=p1udt1315-p1udt1648x.1 r1=0.001 x1=0.001 c1=0 c0=0 length=1 units=none
New Line.padswitch_r_p1udt1317-p1udt1636_p1u_11717 Phases=1 Bus1=p1udt1317-p1udt1636xx.1 Bus2=p1udt1636.1 r1=0.001 x1=0.001 c1=0 c0=0 length=1 units=none
New Line.padswitch_r_p1udt1317-p1udt1636_p1u_11718 Phases=1 Bus1=p1udt1317.1 Bus2=p1udt1317-p1udt1636x.1 r1=0.001 x1=0.001 c1=0 c0=0 length=1 units=none
New Line.padswitch_r_p1udt1321-p1udt1635_p1u_11705 Phases=1 Bus1=p1udt1321-p1udt1635x.1 Bus2=p1udt1321-p1udt1635xx.1 r1=0.001 x1=0.001 c1=0 c0=0 length=1 units=none
New Line.padswitch_r_p1udt1321-p1udt1635_p1u_11706 Phases=1 Bus1=p1udt1321-p1udt1635xxx.1 Bus2=p1udt1635.1 r1=0.001 x1=0.001 c1=0 c0=0 length=1 units=none
New Line.padswitch_r_p1udt1321-p1udt1638_p1u_11707 Phases=1 Bus1=p1udt1321-p1udt1638xx.1 Bus2=p1udt1638.1 r1=0.001 x1=0.001 c1=0 c0=0 length=1 units=none
New Line.padswitch_r_p1udt1321-p1udt1638_p1u_11708 Phases=1 Bus1=p1udt1321.1 Bus2=p1udt1321-p1udt1638x.1 r1=0.001 x1=0.001 c1=0 c0=0 length=1 units=none
New Line.padswitch_r_p1udt1616-p1udt1617_p1u_11677 Phases=1 Bus1=p1udt1616-p1udt1617xx.1 Bus2=p1udt1617.1 r1=0.001 x1=0.001 c1=0 c0=0 length=1 units=none
New Line.padswitch_r_p1udt1616-p1udt1617_p1u_11678 Phases=1 Bus1=p1udt1616.1 Bus2=p1udt1616-p1udt1617x.1 r1=0.001 x1=0.001 c1=0 c0=0 length=1 units=none
New Line.padswitch_r_p1udt1628-p1udt1651_p1u_11765 Phases=1 Bus1=p1udt1628-p1udt1651xx.1 Bus2=p1udt1651.1 r1=0.001 x1=0.001 c1=0 c0=0 length=1 units=none
New Line.padswitch_r_p1udt1628-p1udt1651_p1u_11766 Phases=1 Bus1=p1udt1628.1 Bus2=p1udt1628-p1udt1651x.1 r1=0.001 x1=0.001 c1=0 c0=0 length=1 units=none
New Line.padswitch_r_p1udt1631-p1udt1635_p1u_11703 Phases=1 Bus1=p1udt1631-p1udt1635xx.1 Bus2=p1udt1635.1 r1=0.001 x1=0.001 c1=0 c0=0 length=1 units=none
New Line.padswitch_r_p1udt1631-p1udt1635_p1u_11704 Phases=1 Bus1=p1udt1631.1 Bus2=p1udt1631-p1udt1635x.1 r1=0.001 x1=0.001 c1=0 c0=0 length=1 units=none
New Line.padswitch_r_p1udt1634-p1udt1637_p1u_11683 Phases=1 Bus1=p1udt1634-p1udt1637xx.1 Bus2=p1udt1637.1 r1=0.001 x1=0.001 c1=0 c0=0 length=1 units=none
New Line.padswitch_r_p1udt1634-p1udt1637_p1u_11684 Phases=1 Bus1=p1udt1634.1 Bus2=p1udt1634-p1udt1637x.1 r1=0.001 x1=0.001 c1=0 c0=0 length=1 units=none
New Line.padswitch_r_p1udt1636-p1udt1640_p1u_11719 Phases=1 Bus1=p1udt1636-p1udt1640xx.1 Bus2=p1udt1640.1 r1=0.001 x1=0.001 c1=0 c0=0 length=1 units=none
New Line.padswitch_r_p1udt1636-p1udt1640_p1u_11720 Phases=1 Bus1=p1udt1636.1 Bus2=p1udt1636-p1udt1640x.1 r1=0.001 x1=0.001 c1=0 c0=0 length=1 units=none
New Line.padswitch_r_p1udt1637-p1udt1650_p1u_11685 Phases=1 Bus1=p1udt1637-p1udt1650xx.1 Bus2=p1udt1650.1 r1=0.001 x1=0.001 c1=0 c0=0 length=1 units=none
New Line.padswitch_r_p1udt1637-p1udt1650_p1u_11686 Phases=1 Bus1=p1udt1637.1 Bus2=p1udt1637-p1udt1650x.1 r1=0.001 x1=0.001 c1=0 c0=0 length=1 units=none
New Line.padswitch_r_p1udt1640-p1udt1646_p1u_11721 Phases=1 Bus1=p1udt1640-p1udt1646xx.1 Bus2=p1udt1646.1 r1=0.001 x1=0.001 c1=0 c0=0 length=1 units=none
New Line.padswitch_r_p1udt1640-p1udt1646_p1u_11722 Phases=1 Bus1=p1udt1640.1 Bus2=p1udt1640-p1udt1646x.1 r1=0.001 x1=0.001 c1=0 c0=0 length=1 units=none
New Line.padswitch_r_p1udt1641-p1udt1645_p1u_11725 Phases=1 Bus1=p1udt1641.1 Bus2=p1udt1641-p1udt1645x.1 r1=0.001 x1=0.001 c1=0 c0=0 length=1 units=none
New Line.padswitch_r_p1udt1641-p1udt1645_p1u_11726 Phases=1 Bus1=p1udt1641-p1udt1645xx.1 Bus2=p1udt1645.1 r1=0.001 x1=0.001 c1=0 c0=0 length=1 units=none
New Line.padswitch_r_p1udt1642-p1udt1647_p1u_11741 Phases=1 Bus1=p1udt1642-p1udt1647xx.1 Bus2=p1udt1647.1 r1=0.001 x1=0.001 c1=0 c0=0 length=1 units=none
New Line.padswitch_r_p1udt1642-p1udt1647_p1u_11742 Phases=1 Bus1=p1udt1642.1 Bus2=p1udt1642-p1udt1647x.1 r1=0.001 x1=0.001 c1=0 c0=0 length=1 units=none
New Line.padswitch_r_p1udt1645-p1udt1646_p1u_11723 Phases=1 Bus1=p1udt1645.1 Bus2=p1udt1645-p1udt1646x.1 r1=0.001 x1=0.001 c1=0 c0=0 length=1 units=none
New Line.padswitch_r_p1udt1645-p1udt1646_p1u_11724 Phases=1 Bus1=p1udt1645-p1udt1646xx.1 Bus2=p1udt1646.1 r1=0.001 x1=0.001 c1=0 c0=0 length=1 units=none
New Line.padswitch_r_p1udt1647-p1udt1649_p1u_11743 Phases=1 Bus1=p1udt1647-p1udt1649xx.1 Bus2=p1udt1649.1 r1=0.001 x1=0.001 c1=0 c0=0 length=1 units=none
New Line.padswitch_r_p1udt1647-p1udt1649_p1u_11744 Phases=1 Bus1=p1udt1647.1 Bus2=p1udt1647-p1udt1649x.1 r1=0.001 x1=0.001 c1=0 c0=0 length=1 units=none
New Line.padswitch_r_p1udt1648-p1udt1649_p1u_11745 Phases=1 Bus1=p1udt1648-p1udt1649x.1 Bus2=p1udt1648-p1udt1649xx.1 r1=0.001 x1=0.001 c1=0 c0=0 length=1 units=none
New Line.padswitch_r_p1udt1648-p1udt1649_p1u_11746 Phases=1 Bus1=p1udt1648-p1udt1649xxx.1 Bus2=p1udt1649.1 r1=0.001 x1=0.001 c1=0 c0=0 length=1 units=none
New Line.padswitch_r_p1udt1648-p1udt1650_p1u_11747 Phases=1 Bus1=p1udt1648-p1udt1650xx.1 Bus2=p1udt1650.1 r1=0.001 x1=0.001 c1=0 c0=0 length=1 units=none
New Line.padswitch_r_p1udt1648-p1udt1650_p1u_11748 Phases=1 Bus1=p1udt1648.1 Bus2=p1udt1648-p1udt1650x.1 r1=0.001 x1=0.001 c1=0 c0=0 length=1 units=none
New Line.padswitch_r_p1udt1650-p1udt1671_p1u_11749 Phases=1 Bus1=p1udt1650-p1udt1671xx.1 Bus2=p1udt1671.1 r1=0.001 x1=0.001 c1=0 c0=0 length=1 units=none
New Line.padswitch_r_p1udt1650-p1udt1671_p1u_11750 Phases=1 Bus1=p1udt1650.1 Bus2=p1udt1650-p1udt1671x.1 r1=0.001 x1=0.001 c1=0 c0=0 length=1 units=none
New Line.padswitch_r_p1udt1651-p1udt1655_p1u_11767 Phases=1 Bus1=p1udt1651-p1udt1655xx.1 Bus2=p1udt1655.1 r1=0.001 x1=0.001 c1=0 c0=0 length=1 units=none
New Line.padswitch_r_p1udt1651-p1udt1655_p1u_11768 Phases=1 Bus1=p1udt1651.1 Bus2=p1udt1651-p1udt1655x.1 r1=0.001 x1=0.001 c1=0 c0=0 length=1 units=none
New Line.padswitch_r_p1udt1652-p1udt1666_p1u_11751 Phases=1 Bus1=p1udt1652-p1udt1666xx.1 Bus2=p1udt1666.1 r1=0.001 x1=0.001 c1=0 c0=0 length=1 units=none
New Line.padswitch_r_p1udt1652-p1udt1666_p1u_11752 Phases=1 Bus1=p1udt1652.1 Bus2=p1udt1652-p1udt1666x.1 r1=0.001 x1=0.001 c1=0 c0=0 length=1 units=none
New Line.padswitch_r_p1udt1655-p1udt1669_p1u_11769 Phases=1 Bus1=p1udt1655-p1udt1669xx.1 Bus2=p1udt1669.1 r1=0.001 x1=0.001 c1=0 c0=0 length=1 units=none
New Line.padswitch_r_p1udt1655-p1udt1669_p1u_11770 Phases=1 Bus1=p1udt1655.1 Bus2=p1udt1655-p1udt1669x.1 r1=0.001 x1=0.001 c1=0 c0=0 length=1 units=none
New Line.padswitch_r_p1udt1656-p1udt1677_p1u_11759 Phases=1 Bus1=p1udt1656-p1udt1677xx.1 Bus2=p1udt1677.1 r1=0.001 x1=0.001 c1=0 c0=0 length=1 units=none
New Line.padswitch_r_p1udt1656-p1udt1677_p1u_11760 Phases=1 Bus1=p1udt1656.1 Bus2=p1udt1656-p1udt1677x.1 r1=0.001 x1=0.001 c1=0 c0=0 length=1 units=none
New Line.padswitch_r_p1udt1656-p1umv20_p1u_11757 Phases=1 Bus1=p1udt1656.1 Bus2=p1udt1656-p1umv20x.1 r1=0.001 x1=0.001 c1=0 c0=0 length=1 units=none
New Line.padswitch_r_p1udt1656-p1umv20_p1u_11758 Phases=1 Bus1=p1udt1656-p1umv20xx.1 Bus2=p1umv20.1 r1=0.001 x1=0.001 c1=0 c0=0 length=1 units=none
New Line.padswitch_r_p1udt1660-p1udt1664_p1u_11771 Phases=1 Bus1=p1udt1660-p1udt1664xx.1 Bus2=p1udt1664.1 r1=0.001 x1=0.001 c1=0 c0=0 length=1 units=none
New Line.padswitch_r_p1udt1660-p1udt1664_p1u_11772 Phases=1 Bus1=p1udt1660.1 Bus2=p1udt1660-p1udt1664x.1 r1=0.001 x1=0.001 c1=0 c0=0 length=1 units=none
New Line.padswitch_r_p1udt1664-p1udt1667_p1u_11773 Phases=1 Bus1=p1udt1664-p1udt1667x.1 Bus2=p1udt1664-p1udt1667xx.1 r1=0.001 x1=0.001 c1=0 c0=0 length=1 units=none
New Line.padswitch_r_p1udt1664-p1udt1667_p1u_11774 Phases=1 Bus1=p1udt1664-p1udt1667xxx.1 Bus2=p1udt1667.1 r1=0.001 x1=0.001 c1=0 c0=0 length=1 units=none
New Line.padswitch_r_p1udt1664-p1udt1669_p1u_11775 Phases=1 Bus1=p1udt1664-p1udt1669xx.1 Bus2=p1udt1669.1 r1=0.001 x1=0.001 c1=0 c0=0 length=1 units=none
New Line.padswitch_r_p1udt1664-p1udt1669_p1u_11776 Phases=1 Bus1=p1udt1664.1 Bus2=p1udt1664-p1udt1669x.1 r1=0.001 x1=0.001 c1=0 c0=0 length=1 units=none
New Line.padswitch_r_p1udt1666-p1udt1671_p1u_11753 Phases=1 Bus1=p1udt1666-p1udt1671xx.1 Bus2=p1udt1666-p1udt1671xxx.1 r1=0.001 x1=0.001 c1=0 c0=0 length=1 units=none
New Line.padswitch_r_p1udt1666-p1udt1671_p1u_11754 Phases=1 Bus1=p1udt1666.1 Bus2=p1udt1666-p1udt1671x.1 r1=0.001 x1=0.001 c1=0 c0=0 length=1 units=none
New Line.padswitch_r_p1udt1671-p1udt1819_p1u_11755 Phases=1 Bus1=p1udt1671-p1udt1819xx.1 Bus2=p1udt1819.1 r1=0.001 x1=0.001 c1=0 c0=0 length=1 units=none
New Line.padswitch_r_p1udt1671-p1udt1819_p1u_11756 Phases=1 Bus1=p1udt1671.1 Bus2=p1udt1671-p1udt1819x.1 r1=0.001 x1=0.001 c1=0 c0=0 length=1 units=none
New Line.padswitch_r_p1udt1672-p1udt1673_p1u_11803 Phases=1 Bus1=p1udt1672-p1udt1673xx.1 Bus2=p1udt1673.1 r1=0.001 x1=0.001 c1=0 c0=0 length=1 units=none
New Line.padswitch_r_p1udt1672-p1udt1673_p1u_11804 Phases=1 Bus1=p1udt1672.1 Bus2=p1udt1672-p1udt1673x.1 r1=0.001 x1=0.001 c1=0 c0=0 length=1 units=none
New Line.padswitch_r_p1udt1674-p1udt1675_p1u_11860 Phases=1 Bus1=p1udt1674.1 Bus2=p1udt1674-p1udt1675x.1 r1=0.001 x1=0.001 c1=0 c0=0 length=1 units=none
New Line.padswitch_r_p1udt1674-p1udt1675_p1u_11861 Phases=1 Bus1=p1udt1674-p1udt1675xx.1 Bus2=p1udt1675.1 r1=0.001 x1=0.001 c1=0 c0=0 length=1 units=none
New Line.padswitch_r_p1udt1674-p1umv22_p1u_11862 Phases=1 Bus1=p1udt1674-p1umv22xx.1 Bus2=p1umv22.1 r1=0.001 x1=0.001 c1=0 c0=0 length=1 units=none
New Line.padswitch_r_p1udt1674-p1umv22_p1u_11863 Phases=1 Bus1=p1udt1674.1 Bus2=p1udt1674-p1umv22x.1 r1=0.001 x1=0.001 c1=0 c0=0 length=1 units=none
New Line.padswitch_r_p1udt1675-p1udt1806_p1u_11858 Phases=1 Bus1=p1udt1675.1 Bus2=p1udt1675-p1udt1806x.1 r1=0.001 x1=0.001 c1=0 c0=0 length=1 units=none
New Line.padswitch_r_p1udt1675-p1udt1806_p1u_11859 Phases=1 Bus1=p1udt1675-p1udt1806xx.1 Bus2=p1udt1806.1 r1=0.001 x1=0.001 c1=0 c0=0 length=1 units=none
New Line.padswitch_r_p1udt1676-p1udt1801_p1u_11848 Phases=1 Bus1=p1udt1676.1 Bus2=p1udt1676-p1udt1801x.1 r1=0.001 x1=0.001 c1=0 c0=0 length=1 units=none
New Line.padswitch_r_p1udt1676-p1udt1801_p1u_11849 Phases=1 Bus1=p1udt1676-p1udt1801xx.1 Bus2=p1udt1801.1 r1=0.001 x1=0.001 c1=0 c0=0 length=1 units=none
New Line.padswitch_r_p1udt1676-p1udt1824_p1u_11850 Phases=1 Bus1=p1udt1676-p1udt1824xx.1 Bus2=p1udt1824.1 r1=0.001 x1=0.001 c1=0 c0=0 length=1 units=none
New Line.padswitch_r_p1udt1676-p1udt1824_p1u_11851 Phases=1 Bus1=p1udt1676.1 Bus2=p1udt1676-p1udt1824x.1 r1=0.001 x1=0.001 c1=0 c0=0 length=1 units=none
New Line.padswitch_r_p1udt1678-p1udt1694_p1u_11797 Phases=1 Bus1=p1udt1678-p1udt1694xx.1 Bus2=p1udt1694.1 r1=0.001 x1=0.001 c1=0 c0=0 length=1 units=none
New Line.padswitch_r_p1udt1678-p1udt1694_p1u_11798 Phases=1 Bus1=p1udt1678.1 Bus2=p1udt1678-p1udt1694x.1 r1=0.001 x1=0.001 c1=0 c0=0 length=1 units=none
New Line.padswitch_r_p1udt1678-p1udt1819_p1u_11795 Phases=1 Bus1=p1udt1678.1 Bus2=p1udt1678-p1udt1819x.1 r1=0.001 x1=0.001 c1=0 c0=0 length=1 units=none
New Line.padswitch_r_p1udt1678-p1udt1819_p1u_11796 Phases=1 Bus1=p1udt1678-p1udt1819xx.1 Bus2=p1udt1819.1 r1=0.001 x1=0.001 c1=0 c0=0 length=1 units=none
New Line.padswitch_r_p1udt1681-p1udt1686_p1u_11785 Phases=1 Bus1=p1udt1681-p1udt1686xx.1 Bus2=p1udt1686.1 r1=0.001 x1=0.001 c1=0 c0=0 length=1 units=none
New Line.padswitch_r_p1udt1681-p1udt1686_p1u_11786 Phases=1 Bus1=p1udt1681.1 Bus2=p1udt1681-p1udt1686x.1 r1=0.001 x1=0.001 c1=0 c0=0 length=1 units=none
New Line.padswitch_r_p1udt1682-p1udt1686_p1u_11791 Phases=1 Bus1=p1udt1682.1 Bus2=p1udt1682-p1udt1686x.1 r1=0.001 x1=0.001 c1=0 c0=0 length=1 units=none
New Line.padswitch_r_p1udt1682-p1udt1686_p1u_11792 Phases=1 Bus1=p1udt1682-p1udt1686xx.1 Bus2=p1udt1686.1 r1=0.001 x1=0.001 c1=0 c0=0 length=1 units=none
New Line.padswitch_r_p1udt1682-p1udt1819_p1u_11793 Phases=1 Bus1=p1udt1682-p1udt1819xx.1 Bus2=p1udt1819.1 r1=0.001 x1=0.001 c1=0 c0=0 length=1 units=none
New Line.padswitch_r_p1udt1682-p1udt1819_p1u_11794 Phases=1 Bus1=p1udt1682.1 Bus2=p1udt1682-p1udt1819x.1 r1=0.001 x1=0.001 c1=0 c0=0 length=1 units=none
New Line.padswitch_r_p1udt1683-p1udt1684_p1u_11787 Phases=1 Bus1=p1udt1683.1 Bus2=p1udt1683-p1udt1684x.1 r1=0.001 x1=0.001 c1=0 c0=0 length=1 units=none
New Line.padswitch_r_p1udt1683-p1udt1684_p1u_11788 Phases=1 Bus1=p1udt1683-p1udt1684xx.1 Bus2=p1udt1684.1 r1=0.001 x1=0.001 c1=0 c0=0 length=1 units=none
New Line.padswitch_r_p1udt1683-p1udt1686_p1u_11789 Phases=1 Bus1=p1udt1683-p1udt1686xx.1 Bus2=p1udt1686.1 r1=0.001 x1=0.001 c1=0 c0=0 length=1 units=none
New Line.padswitch_r_p1udt1683-p1udt1686_p1u_11790 Phases=1 Bus1=p1udt1683.1 Bus2=p1udt1683-p1udt1686x.1 r1=0.001 x1=0.001 c1=0 c0=0 length=1 units=none
New Line.padswitch_r_p1udt1685-p1umv19_p1u_11783 Phases=1 Bus1=p1udt1685.1 Bus2=p1udt1685-p1umv19x.1 r1=0.001 x1=0.001 c1=0 c0=0 length=1 units=none
New Line.padswitch_r_p1udt1685-p1umv19_p1u_11784 Phases=1 Bus1=p1udt1685-p1umv19xx.1 Bus2=p1umv19.1 r1=0.001 x1=0.001 c1=0 c0=0 length=1 units=none
New Line.padswitch_r_p1udt1690-p1udt1691_p1u_11669 Phases=1 Bus1=p1udt1690-p1udt1691xx.1 Bus2=p1udt1691.1 r1=0.001 x1=0.001 c1=0 c0=0 length=1 units=none
New Line.padswitch_r_p1udt1690-p1udt1691_p1u_11670 Phases=1 Bus1=p1udt1690.1 Bus2=p1udt1690-p1udt1691x.1 r1=0.001 x1=0.001 c1=0 c0=0 length=1 units=none
New Line.padswitch_r_p1udt1691-p1udt1692_p1u_11671 Phases=1 Bus1=p1udt1691-p1udt1692xx.1 Bus2=p1udt1692.1 r1=0.001 x1=0.001 c1=0 c0=0 length=1 units=none
New Line.padswitch_r_p1udt1691-p1udt1692_p1u_11672 Phases=1 Bus1=p1udt1691.1 Bus2=p1udt1691-p1udt1692x.1 r1=0.001 x1=0.001 c1=0 c0=0 length=1 units=none
New Line.padswitch_r_p1udt1692-p1udt1693_p1u_11673 Phases=1 Bus1=p1udt1692-p1udt1693xx.1 Bus2=p1udt1693.1 r1=0.001 x1=0.001 c1=0 c0=0 length=1 units=none
New Line.padswitch_r_p1udt1692-p1udt1693_p1u_11674 Phases=1 Bus1=p1udt1692.1 Bus2=p1udt1692-p1udt1693x.1 r1=0.001 x1=0.001 c1=0 c0=0 length=1 units=none
New Line.padswitch_r_p1udt1693-p1udt1695_p1u_11675 Phases=1 Bus1=p1udt1693-p1udt1695xx.1 Bus2=p1udt1695.1 r1=0.001 x1=0.001 c1=0 c0=0 length=1 units=none
New Line.padswitch_r_p1udt1693-p1udt1695_p1u_11676 Phases=1 Bus1=p1udt1693.1 Bus2=p1udt1693-p1udt1695x.1 r1=0.001 x1=0.001 c1=0 c0=0 length=1 units=none
New Line.padswitch_r_p1udt1694-p1udt1695_p1u_11799 Phases=1 Bus1=p1udt1694-p1udt1695xx.1 Bus2=p1udt1695.1 r1=0.001 x1=0.001 c1=0 c0=0 length=1 units=none
New Line.padswitch_r_p1udt1694-p1udt1695_p1u_11800 Phases=1 Bus1=p1udt1694.1 Bus2=p1udt1694-p1udt1695x.1 r1=0.001 x1=0.001 c1=0 c0=0 length=1 units=none
New Line.padswitch_r_p1udt1695-p1udt1696_p1u_11801 Phases=1 Bus1=p1udt1695-p1udt1696xx.1 Bus2=p1udt1696.1 r1=0.001 x1=0.001 c1=0 c0=0 length=1 units=none
New Line.padswitch_r_p1udt1695-p1udt1696_p1u_11802 Phases=1 Bus1=p1udt1695.1 Bus2=p1udt1695-p1udt1696x.1 r1=0.001 x1=0.001 c1=0 c0=0 length=1 units=none
New Line.padswitch_r_p1udt1696-p1udt1697_p1u_11815 Phases=1 Bus1=p1udt1696.1 Bus2=p1udt1696-p1udt1697x.1 r1=0.001 x1=0.001 c1=0 c0=0 length=1 units=none
New Line.padswitch_r_p1udt1696-p1udt1697_p1u_11816 Phases=1 Bus1=p1udt1696-p1udt1697xx.1 Bus2=p1udt1697.1 r1=0.001 x1=0.001 c1=0 c0=0 length=1 units=none
New Line.padswitch_r_p1udt1697-p1udt1699_p1u_11813 Phases=1 Bus1=p1udt1697.1 Bus2=p1udt1697-p1udt1699x.1 r1=0.001 x1=0.001 c1=0 c0=0 length=1 units=none
New Line.padswitch_r_p1udt1697-p1udt1699_p1u_11814 Phases=1 Bus1=p1udt1697-p1udt1699xx.1 Bus2=p1udt1699.1 r1=0.001 x1=0.001 c1=0 c0=0 length=1 units=none
New Line.padswitch_r_p1udt1698-p1udt1699_p1u_11811 Phases=1 Bus1=p1udt1698-p1udt1699xx.1 Bus2=p1udt1699.1 r1=0.001 x1=0.001 c1=0 c0=0 length=1 units=none
New Line.padswitch_r_p1udt1698-p1udt1699_p1u_11812 Phases=1 Bus1=p1udt1698.1 Bus2=p1udt1698-p1udt1699x.1 r1=0.001 x1=0.001 c1=0 c0=0 length=1 units=none
New Line.padswitch_r_p1udt1698-p1udt1851_p1u_11809 Phases=1 Bus1=p1udt1698.1 Bus2=p1udt1698-p1udt1851x.1 r1=0.001 x1=0.001 c1=0 c0=0 length=1 units=none
New Line.padswitch_r_p1udt1698-p1udt1851_p1u_11810 Phases=1 Bus1=p1udt1698-p1udt1851xx.1 Bus2=p1udt1851.1 r1=0.001 x1=0.001 c1=0 c0=0 length=1 units=none
New Line.padswitch_r_p1udt1797-p1udt1816_p1u_11828 Phases=1 Bus1=p1udt1797-p1udt1816xx.1 Bus2=p1udt1816.1 r1=0.001 x1=0.001 c1=0 c0=0 length=1 units=none
New Line.padswitch_r_p1udt1797-p1udt1816_p1u_11829 Phases=1 Bus1=p1udt1797.1 Bus2=p1udt1797-p1udt1816x.1 r1=0.001 x1=0.001 c1=0 c0=0 length=1 units=none
New Line.padswitch_r_p1udt1798-p1udt1820_p1u_11842 Phases=1 Bus1=p1udt1798-p1udt1820xx.1 Bus2=p1udt1820.1 r1=0.001 x1=0.001 c1=0 c0=0 length=1 units=none
New Line.padswitch_r_p1udt1798-p1udt1820_p1u_11843 Phases=1 Bus1=p1udt1798.1 Bus2=p1udt1798-p1udt1820x.1 r1=0.001 x1=0.001 c1=0 c0=0 length=1 units=none
New Line.padswitch_r_p1udt1799-p1udt1821_p1u_11818 Phases=1 Bus1=p1udt1799.1 Bus2=p1udt1799-p1udt1821x.1 r1=0.001 x1=0.001 c1=0 c0=0 length=1 units=none
New Line.padswitch_r_p1udt1799-p1udt1821_p1u_11819 Phases=1 Bus1=p1udt1799-p1udt1821xx.1 Bus2=p1udt1821.1 r1=0.001 x1=0.001 c1=0 c0=0 length=1 units=none
New Line.padswitch_r_p1udt1801-p1udt1822_p1u_11846 Phases=1 Bus1=p1udt1801.1 Bus2=p1udt1801-p1udt1822x.1 r1=0.001 x1=0.001 c1=0 c0=0 length=1 units=none
New Line.padswitch_r_p1udt1801-p1udt1822_p1u_11847 Phases=1 Bus1=p1udt1801-p1udt1822xx.1 Bus2=p1udt1822.1 r1=0.001 x1=0.001 c1=0 c0=0 length=1 units=none
New Line.padswitch_r_p1udt1802-p1udt1804_p1u_11854 Phases=1 Bus1=p1udt1802-p1udt1804xx.1 Bus2=p1udt1804.1 r1=0.001 x1=0.001 c1=0 c0=0 length=1 units=none
New Line.padswitch_r_p1udt1802-p1udt1804_p1u_11855 Phases=1 Bus1=p1udt1802.1 Bus2=p1udt1802-p1udt1804x.1 r1=0.001 x1=0.001 c1=0 c0=0 length=1 units=none
New Line.padswitch_r_p1udt1803-p1udt1823_p1u_11822 Phases=1 Bus1=p1udt1803-p1udt1823xx.1 Bus2=p1udt1823.1 r1=0.001 x1=0.001 c1=0 c0=0 length=1 units=none
New Line.padswitch_r_p1udt1803-p1udt1823_p1u_11823 Phases=1 Bus1=p1udt1803.1 Bus2=p1udt1803-p1udt1823x.1 r1=0.001 x1=0.001 c1=0 c0=0 length=1 units=none
New Line.padswitch_r_p1udt1804-p1udt1806_p1u_11856 Phases=1 Bus1=p1udt1804-p1udt1806xx.1 Bus2=p1udt1806.1 r1=0.001 x1=0.001 c1=0 c0=0 length=1 units=none
New Line.padswitch_r_p1udt1804-p1udt1806_p1u_11857 Phases=1 Bus1=p1udt1804.1 Bus2=p1udt1804-p1udt1806x.1 r1=0.001 x1=0.001 c1=0 c0=0 length=1 units=none
New Line.padswitch_r_p1udt1805-p1umv22_p1u_11864 Phases=1 Bus1=p1udt1805-p1umv22xx.1 Bus2=p1umv22.1 r1=0.001 x1=0.001 c1=0 c0=0 length=1 units=none
New Line.padswitch_r_p1udt1805-p1umv22_p1u_11865 Phases=1 Bus1=p1udt1805.1 Bus2=p1udt1805-p1umv22x.1 r1=0.001 x1=0.001 c1=0 c0=0 length=1 units=none
New Line.padswitch_r_p1udt1807-p1udt1824_p1u_11870 Phases=1 Bus1=p1udt1807-p1udt1824xx.1 Bus2=p1udt1824.1 r1=0.001 x1=0.001 c1=0 c0=0 length=1 units=none
New Line.padswitch_r_p1udt1807-p1udt1824_p1u_11871 Phases=1 Bus1=p1udt1807.1 Bus2=p1udt1807-p1udt1824x.1 r1=0.001 x1=0.001 c1=0 c0=0 length=1 units=none
New Line.padswitch_r_p1udt1807-p1umv21_p1u_11852 Phases=1 Bus1=p1udt1807.1 Bus2=p1udt1807-p1umv21x.1 r1=0.001 x1=0.001 c1=0 c0=0 length=1 units=none
New Line.padswitch_r_p1udt1807-p1umv21_p1u_11853 Phases=1 Bus1=p1udt1807-p1umv21xx.1 Bus2=p1umv21.1 r1=0.001 x1=0.001 c1=0 c0=0 length=1 units=none
New Line.padswitch_r_p1udt1807-p1umv22_p1u_11868 Phases=1 Bus1=p1udt1807.1 Bus2=p1udt1807-p1umv22x.1 r1=0.001 x1=0.001 c1=0 c0=0 length=1 units=none
New Line.padswitch_r_p1udt1807-p1umv22_p1u_11869 Phases=1 Bus1=p1udt1807-p1umv22xx.1 Bus2=p1umv22.1 r1=0.001 x1=0.001 c1=0 c0=0 length=1 units=none
New Line.padswitch_r_p1udt1808-p1umv22_p1u_11866 Phases=1 Bus1=p1udt1808-p1umv22xx.1 Bus2=p1umv22.1 r1=0.001 x1=0.001 c1=0 c0=0 length=1 units=none
New Line.padswitch_r_p1udt1808-p1umv22_p1u_11867 Phases=1 Bus1=p1udt1808.1 Bus2=p1udt1808-p1umv22x.1 r1=0.001 x1=0.001 c1=0 c0=0 length=1 units=none
New Line.padswitch_r_p1udt1813-p1udt1816_p1u_11830 Phases=1 Bus1=p1udt1813.1 Bus2=p1udt1813-p1udt1816x.1 r1=0.001 x1=0.001 c1=0 c0=0 length=1 units=none
New Line.padswitch_r_p1udt1813-p1udt1816_p1u_11831 Phases=1 Bus1=p1udt1813-p1udt1816xx.1 Bus2=p1udt1816.1 r1=0.001 x1=0.001 c1=0 c0=0 length=1 units=none
New Line.padswitch_r_p1udt1814-p1udt1818_p1u_11836 Phases=1 Bus1=p1udt1814.1 Bus2=p1udt1814-p1udt1818x.1 r1=0.001 x1=0.001 c1=0 c0=0 length=1 units=none
New Line.padswitch_r_p1udt1814-p1udt1818_p1u_11837 Phases=1 Bus1=p1udt1814-p1udt1818xx.1 Bus2=p1udt1818.1 r1=0.001 x1=0.001 c1=0 c0=0 length=1 units=none
New Line.padswitch_r_p1udt1820-p1udt1822_p1u_11844 Phases=1 Bus1=p1udt1820-p1udt1822xx.1 Bus2=p1udt1822.1 r1=0.001 x1=0.001 c1=0 c0=0 length=1 units=none
New Line.padswitch_r_p1udt1820-p1udt1822_p1u_11845 Phases=1 Bus1=p1udt1820.1 Bus2=p1udt1820-p1udt1822x.1 r1=0.001 x1=0.001 c1=0 c0=0 length=1 units=none
New Line.padswitch_r_p1udt1851-p1udt1852_p1u_11807 Phases=1 Bus1=p1udt1851.1 Bus2=p1udt1851-p1udt1852x.1 r1=0.001 x1=0.001 c1=0 c0=0 length=1 units=none
New Line.padswitch_r_p1udt1851-p1udt1852_p1u_11808 Phases=1 Bus1=p1udt1851-p1udt1852xx.1 Bus2=p1udt1852.1 r1=0.001 x1=0.001 c1=0 c0=0 length=1 units=none
New Line.padswitch_r_p1umv18-p1umv19_p1u_11781 Phases=1 Bus1=p1umv18-p1umv19xx.1 Bus2=p1umv19.1 r1=0.001 x1=0.001 c1=0 c0=0 length=1 units=none
New Line.padswitch_r_p1umv18-p1umv19_p1u_11782 Phases=1 Bus1=p1umv18.1 Bus2=p1umv18-p1umv19x.1 r1=0.001 x1=0.001 c1=0 c0=0 length=1 units=none
New Line.sb8_p1uhs3_1247_402 Phases=1 Bus1=sb8_p1uhs3_1247_bus_8_1.1 Bus2=sb8_p1uhs3_1247_node_8_4.1 r1=0.001 x1=0.001 c1=0 c0=0 length=1 units=none
New Line.sb8_p1uhs3_1247_404 Phases=1 Bus1=sb8_p1uhs3_1247_bus_8_2.1 Bus2=sb8_p1uhs3_1247_node_8_6.1 r1=0.001 x1=0.001 c1=0 c0=0 length=1 units=none
New Line.sb8_p1uhs3_1247_405 Phases=1 Bus1=sb8_p1uhs3_1247_bus_8_1.1 Bus2=sb8_p1uhs3_1247_node_8_5.1 r1=0.001 x1=0.001 c1=0 c0=0 length=1 units=none
New Line.sb8_p1uhs3_1247_406 Phases=1 Bus1=sb8_p1uhs3_1247_bus_8_1.1 Bus2=sb8_p1uhs3_1247_node_8_7.1 r1=0.001 x1=0.001 c1=0 c0=0 length=1 units=none
New Line.sb8_p1uhs3_1247_72 Phases=1 Bus1=sb8_p1uhs3_1247_bus_8_3.1 Bus2=sb8_p1uhs3_1247_node_8_8.1 r1=0.001 x1=0.001 c1=0 c0=0 length=1 units=none
! Lines of the original below 1e-4 ohm (bus bars, jumpers): 1e-3 + j1e-3 ohm, to keep the admittance matrix well scaled.
New Line.fuse_r_p1udt1301-p1udt1305_p1u_12141 Phases=1 Bus1=p1udt1301.1 Bus2=p1udt1301-p1udt1305x.1 r1=0.001 x1=0.001 c1=0 c0=0 length=1 units=none
New Line.fuse_r_p1udt1306-p1udt1645_p1u_12191 Phases=1 Bus1=p1udt1306-p1udt1645xxx.1 Bus2=p1udt1645.1 r1=0.001 x1=0.001 c1=0 c0=0 length=1 units=none
New Line.fuse_r_p1udt1307-p1udt1645_p1u_12192 Phases=1 Bus1=p1udt1307-p1udt1645xxx.1 Bus2=p1udt1645.1 r1=0.001 x1=0.001 c1=0 c0=0 length=1 units=none
New Line.fuse_r_p1udt1311-p1udt1316_p1u_12143 Phases=1 Bus1=p1udt1311-p1udt1316x.1 Bus2=p1udt1316.1 r1=0.001 x1=0.001 c1=0 c0=0 length=1 units=none
New Line.fuse_r_p1udt1312-p1udt1314_p1u_12142 Phases=1 Bus1=p1udt1312.1 Bus2=p1udt1312-p1udt1314x.1 r1=0.001 x1=0.001 c1=0 c0=0 length=1 units=none
New Line.fuse_r_p1udt1321-p1udt1635_p1u_12144 Phases=1 Bus1=p1udt1321.1 Bus2=p1udt1321-p1udt1635x.1 r1=0.001 x1=0.001 c1=0 c0=0 length=1 units=none
New Line.fuse_r_p1udt1648-p1udt1649_p1u_12193 Phases=1 Bus1=p1udt1648.1 Bus2=p1udt1648-p1udt1649x.1 r1=0.001 x1=0.001 c1=0 c0=0 length=1 units=none
New Line.fuse_r_p1udt1653-p1udt1657_p1u_12194 Phases=1 Bus1=p1udt1653.1 Bus2=p1udt1653-p1udt1657x.1 r1=0.001 x1=0.001 c1=0 c0=0 length=1 units=none
New Line.fuse_r_p1udt1664-p1udt1667_p1u_12195 Phases=1 Bus1=p1udt1664.1 Bus2=p1udt1664-p1udt1667x.1 r1=0.001 x1=0.001 c1=0 c0=0 length=1 units=none
New Line.fuse_r_p1udt1666-p1udt1671_p1u_12196 Phases=1 Bus1=p1udt1666-p1udt1671xxx.1 Bus2=p1udt1671.1 r1=0.001 x1=0.001 c1=0 c0=0 length=1 units=none
New Line.fuse_r_p1udt1681-p1udt1689_p1u_12197 Phases=1 Bus1=p1udt1681.1 Bus2=p1udt1681-p1udt1689x.1 r1=0.001 x1=0.001 c1=0 c0=0 length=1 units=none
New Line.recloser_disswitch_r_p1udt1266-p1udt793_p1u_12270 Phases=1 Bus1=p1udt1266-p1udt793x.1 Bus2=p1udt793.1 r1=0.001 x1=0.001 c1=0 c0=0 length=1 units=none
New Line.recloser_disswitch_r_p1udt1665-p1udt1677_p1u_12232 Phases=1 Bus1=p1udt1665-p1udt1677x.1 Bus2=p1udt1677.1 r1=0.001 x1=0.001 c1=0 c0=0 length=1 units=none
New Line.recloser_disswitch_r_p1udt1680-p1udt1681_p1u_12319 Phases=1 Bus1=p1udt1680-p1udt1681x.1 Bus2=p1udt1681.1 r1=0.001 x1=0.001 c1=0 c0=0 length=1 units=none
New Line.sb8_p1uhs3_1247_40 Phases=1 Bus1=sb8_p1uhs3_1247_node_8_5.1 Bus2=sb8_p1uhs3_1247_node_8_6.1 r1=0.001 x1=0.001 c1=0 c0=0 length=1 units=none
New Line.sb8_p1uhs3_1247_71 Phases=1 Bus1=sb8_p1uhs3_1247_node_8_7.1 Bus2=sb8_p1uhs3_1247_node_8_8.1 r1=0.001 x1=0.001 c1=0 c0=0 length=1 units=none
