! smartds_p1u_hs3_1ph: single-phase per-phase equivalent of test_networks\sources\smartds_sfo_p1u\p1uhs3_1247\Master.dss (unmodified original).
! Written by problems/msopf/root_level/convert_to_1ph.jl -- do not edit by hand.
! The original's capacitor banks (kvar / 3), not redirected by Master.dss.
New generator.p1umv17C Phases=1 Bus1=p1umv17.1 kV=7.1996 Model=1 kW=1e-06 kVAr=150
New generator.p1umv18C Phases=1 Bus1=p1umv18.1 kV=7.1996 Model=1 kW=1e-06 kVAr=150
New generator.p1umv20C Phases=1 Bus1=p1umv20.1 kV=7.1996 Model=1 kW=1e-06 kVAr=100
