! smartds_p1u_hs3_1ph: single-phase per-phase equivalent of test_networks\sources\smartds_sfo_p1u\p1uhs3_1247\Master.dss (unmodified original).
! Written by problems/msopf/root_level/convert_to_1ph.jl -- do not edit by hand.
! 37 PV units on load buses, sized in proportion to the bus load; fleet Pmpp = 50 % of total load.
New PVsystem.PV_p1udt1268 irrad=1.0 Phases=1 Bus1=p1udt1268.1 kV=7.1996 kVA=165.684 Pmpp=138.07 %cutin=0.001 %cutout=0.001
New PVsystem.PV_p1udt1273 irrad=1.0 Phases=1 Bus1=p1udt1273.1 kV=7.1996 kVA=344.014 Pmpp=286.678 %cutin=0.001 %cutout=0.001
New PVsystem.PV_p1udt1307 irrad=1.0 Phases=1 Bus1=p1udt1307.1 kV=7.1996 kVA=37.9875 Pmpp=31.6562 %cutin=0.001 %cutout=0.001
New PVsystem.PV_p1udt1311 irrad=1.0 Phases=1 Bus1=p1udt1311.1 kV=7.1996 kVA=51.3843 Pmpp=42.8202 %cutin=0.001 %cutout=0.001
New PVsystem.PV_p1udt1312 irrad=1.0 Phases=1 Bus1=p1udt1312.1 kV=7.1996 kVA=77.745 Pmpp=64.7875 %cutin=0.001 %cutout=0.001
New PVsystem.PV_p1udt1313 irrad=1.0 Phases=1 Bus1=p1udt1313.1 kV=7.1996 kVA=56.0906 Pmpp=46.7422 %cutin=0.001 %cutout=0.001
New PVsystem.PV_p1udt1315 irrad=1.0 Phases=1 Bus1=p1udt1315.1 kV=7.1996 kVA=44.5969 Pmpp=37.1641 %cutin=0.001 %cutout=0.001
New PVsystem.PV_p1udt1617 irrad=1.0 Phases=1 Bus1=p1udt1617.1 kV=7.1996 kVA=255.206 Pmpp=212.671 %cutin=0.001 %cutout=0.001
New PVsystem.PV_p1udt1628 irrad=1.0 Phases=1 Bus1=p1udt1628.1 kV=7.1996 kVA=238.6 Pmpp=198.834 %cutin=0.001 %cutout=0.001
New PVsystem.PV_p1udt1631 irrad=1.0 Phases=1 Bus1=p1udt1631.1 kV=7.1996 kVA=10.5308 Pmpp=8.77565 %cutin=0.001 %cutout=0.001
New PVsystem.PV_p1udt1638 irrad=1.0 Phases=1 Bus1=p1udt1638.1 kV=7.1996 kVA=34.5758 Pmpp=28.8131 %cutin=0.001 %cutout=0.001
New PVsystem.PV_p1udt1640 irrad=1.0 Phases=1 Bus1=p1udt1640.1 kV=7.1996 kVA=66.5344 Pmpp=55.4453 %cutin=0.001 %cutout=0.001
New PVsystem.PV_p1udt1644 irrad=1.0 Phases=1 Bus1=p1udt1644.1 kV=7.1996 kVA=17.3281 Pmpp=14.4401 %cutin=0.001 %cutout=0.001
New PVsystem.PV_p1udt1647 irrad=1.0 Phases=1 Bus1=p1udt1647.1 kV=7.1996 kVA=17.3281 Pmpp=14.4401 %cutin=0.001 %cutout=0.001
New PVsystem.PV_p1udt1649 irrad=1.0 Phases=1 Bus1=p1udt1649.1 kV=7.1996 kVA=20.3608 Pmpp=16.9673 %cutin=0.001 %cutout=0.001
New PVsystem.PV_p1udt1658 irrad=1.0 Phases=1 Bus1=p1udt1658.1 kV=7.1996 kVA=86.1221 Pmpp=71.7684 %cutin=0.001 %cutout=0.001
New PVsystem.PV_p1udt1660 irrad=1.0 Phases=1 Bus1=p1udt1660.1 kV=7.1996 kVA=40.0716 Pmpp=33.393 %cutin=0.001 %cutout=0.001
New PVsystem.PV_p1udt1663 irrad=1.0 Phases=1 Bus1=p1udt1663.1 kV=7.1996 kVA=26.7343 Pmpp=22.2786 %cutin=0.001 %cutout=0.001
New PVsystem.PV_p1udt1668 irrad=1.0 Phases=1 Bus1=p1udt1668.1 kV=7.1996 kVA=3.61768 Pmpp=3.01473 %cutin=0.001 %cutout=0.001
New PVsystem.PV_p1udt1672 irrad=1.0 Phases=1 Bus1=p1udt1672.1 kV=7.1996 kVA=52.6724 Pmpp=43.8937 %cutin=0.001 %cutout=0.001
New PVsystem.PV_p1udt1674 irrad=1.0 Phases=1 Bus1=p1udt1674.1 kV=7.1996 kVA=298.98 Pmpp=249.15 %cutin=0.001 %cutout=0.001
New PVsystem.PV_p1udt1676 irrad=1.0 Phases=1 Bus1=p1udt1676.1 kV=7.1996 kVA=480.582 Pmpp=400.485 %cutin=0.001 %cutout=0.001
New PVsystem.PV_p1udt1678 irrad=1.0 Phases=1 Bus1=p1udt1678.1 kV=7.1996 kVA=91.3857 Pmpp=76.1548 %cutin=0.001 %cutout=0.001
New PVsystem.PV_p1udt1684 irrad=1.0 Phases=1 Bus1=p1udt1684.1 kV=7.1996 kVA=66.2204 Pmpp=55.1837 %cutin=0.001 %cutout=0.001
New PVsystem.PV_p1udt1686 irrad=1.0 Phases=1 Bus1=p1udt1686.1 kV=7.1996 kVA=66.413 Pmpp=55.3442 %cutin=0.001 %cutout=0.001
New PVsystem.PV_p1udt1687 irrad=1.0 Phases=1 Bus1=p1udt1687.1 kV=7.1996 kVA=15.2779 Pmpp=12.7316 %cutin=0.001 %cutout=0.001
New PVsystem.PV_p1udt1688 irrad=1.0 Phases=1 Bus1=p1udt1688.1 kV=7.1996 kVA=15.8045 Pmpp=13.1704 %cutin=0.001 %cutout=0.001
New PVsystem.PV_p1udt1690 irrad=1.0 Phases=1 Bus1=p1udt1690.1 kV=7.1996 kVA=37.6474 Pmpp=31.3729 %cutin=0.001 %cutout=0.001
New PVsystem.PV_p1udt1693 irrad=1.0 Phases=1 Bus1=p1udt1693.1 kV=7.1996 kVA=101.033 Pmpp=84.194 %cutin=0.001 %cutout=0.001
New PVsystem.PV_p1udt1695 irrad=1.0 Phases=1 Bus1=p1udt1695.1 kV=7.1996 kVA=34.4584 Pmpp=28.7153 %cutin=0.001 %cutout=0.001
New PVsystem.PV_p1udt1697 irrad=1.0 Phases=1 Bus1=p1udt1697.1 kV=7.1996 kVA=37.1332 Pmpp=30.9443 %cutin=0.001 %cutout=0.001
New PVsystem.PV_p1udt1798 irrad=1.0 Phases=1 Bus1=p1udt1798.1 kV=7.1996 kVA=216.839 Pmpp=180.699 %cutin=0.001 %cutout=0.001
New PVsystem.PV_p1udt1800 irrad=1.0 Phases=1 Bus1=p1udt1800.1 kV=7.1996 kVA=77.5573 Pmpp=64.6311 %cutin=0.001 %cutout=0.001
New PVsystem.PV_p1udt1815 irrad=1.0 Phases=1 Bus1=p1udt1815.1 kV=7.1996 kVA=4.58163 Pmpp=3.81803 %cutin=0.001 %cutout=0.001
New PVsystem.PV_p1udt1816 irrad=1.0 Phases=1 Bus1=p1udt1816.1 kV=7.1996 kVA=108.654 Pmpp=90.545 %cutin=0.001 %cutout=0.001
New PVsystem.PV_p1udt1817 irrad=1.0 Phases=1 Bus1=p1udt1817.1 kV=7.1996 kVA=5.83019 Pmpp=4.85849 %cutin=0.001 %cutout=0.001
New PVsystem.PV_p1udt1851 irrad=1.0 Phases=1 Bus1=p1udt1851.1 kV=7.1996 kVA=26.152 Pmpp=21.7933 %cutin=0.001 %cutout=0.001
