! smartds_p1u_hs3_1ph: single-phase per-phase equivalent of test_networks\sources\smartds_sfo_p1u\p1uhs3_1247\Master.dss (unmodified original).
! Written by problems/msopf/root_level/convert_to_1ph.jl -- do not edit by hand.
! 37 batteries on load buses, sized in proportion to the bus load; fleet rating = 40 % of total load, 4 h.
New Storage.BESS_p1udt1267 Phases=1 Bus1=p1udt1267.1 kV=7.1996 kVA=61.8715 kWrated=51.5596 kWhrated=206.238 %stored=62.5 %reserve=30 %EffCharge=95 %EffDischarge=95 %idlingkW=0 Vminpu=0.95 Vmaxpu=1.05 DispMode=External
New Storage.BESS_p1udt1269 Phases=1 Bus1=p1udt1269.1 kV=7.1996 kVA=44.8702 kWrated=37.3918 kWhrated=149.567 %stored=62.5 %reserve=30 %EffCharge=95 %EffDischarge=95 %idlingkW=0 Vminpu=0.95 Vmaxpu=1.05 DispMode=External
New Storage.BESS_p1udt1270 Phases=1 Bus1=p1udt1270.1 kV=7.1996 kVA=27.4541 kWrated=22.8784 kWhrated=91.5137 %stored=62.5 %reserve=30 %EffCharge=95 %EffDischarge=95 %idlingkW=0 Vminpu=0.95 Vmaxpu=1.05 DispMode=External
New Storage.BESS_p1udt1273 Phases=1 Bus1=p1udt1273.1 kV=7.1996 kVA=133.111 kWrated=110.926 kWhrated=443.703 %stored=62.5 %reserve=30 %EffCharge=95 %EffDischarge=95 %idlingkW=0 Vminpu=0.95 Vmaxpu=1.05 DispMode=External
New Storage.BESS_p1udt1301 Phases=1 Bus1=p1udt1301.1 kV=7.1996 kVA=17.0579 kWrated=14.2149 kWhrated=56.8597 %stored=62.5 %reserve=30 %EffCharge=95 %EffDischarge=95 %idlingkW=0 Vminpu=0.95 Vmaxpu=1.05 DispMode=External
New Storage.BESS_p1udt1307 Phases=1 Bus1=p1udt1307.1 kV=7.1996 kVA=14.6987 kWrated=12.2489 kWhrated=48.9957 %stored=62.5 %reserve=30 %EffCharge=95 %EffDischarge=95 %idlingkW=0 Vminpu=0.95 Vmaxpu=1.05 DispMode=External
New Storage.BESS_p1udt1311 Phases=1 Bus1=p1udt1311.1 kV=7.1996 kVA=19.8824 kWrated=16.5687 kWhrated=66.2746 %stored=62.5 %reserve=30 %EffCharge=95 %EffDischarge=95 %idlingkW=0 Vminpu=0.95 Vmaxpu=1.05 DispMode=External
New Storage.BESS_p1udt1312 Phases=1 Bus1=p1udt1312.1 kV=7.1996 kVA=30.0823 kWrated=25.0686 kWhrated=100.274 %stored=62.5 %reserve=30 %EffCharge=95 %EffDischarge=95 %idlingkW=0 Vminpu=0.95 Vmaxpu=1.05 DispMode=External
New Storage.BESS_p1udt1321 Phases=1 Bus1=p1udt1321.1 kV=7.1996 kVA=11.2564 kWrated=9.38032 kWhrated=37.5213 %stored=62.5 %reserve=30 %EffCharge=95 %EffDischarge=95 %idlingkW=0 Vminpu=0.95 Vmaxpu=1.05 DispMode=External
New Storage.BESS_p1udt1628 Phases=1 Bus1=p1udt1628.1 kV=7.1996 kVA=92.323 kWrated=76.9358 kWhrated=307.743 %stored=62.5 %reserve=30 %EffCharge=95 %EffDischarge=95 %idlingkW=0 Vminpu=0.95 Vmaxpu=1.05 DispMode=External
New Storage.BESS_p1udt1635 Phases=1 Bus1=p1udt1635.1 kV=7.1996 kVA=4.34988 kWrated=3.6249 kWhrated=14.4996 %stored=62.5 %reserve=30 %EffCharge=95 %EffDischarge=95 %idlingkW=0 Vminpu=0.95 Vmaxpu=1.05 DispMode=External
New Storage.BESS_p1udt1637 Phases=1 Bus1=p1udt1637.1 kV=7.1996 kVA=4.74774 kWrated=3.95645 kWhrated=15.8258 %stored=62.5 %reserve=30 %EffCharge=95 %EffDischarge=95 %idlingkW=0 Vminpu=0.95 Vmaxpu=1.05 DispMode=External
New Storage.BESS_p1udt1638 Phases=1 Bus1=p1udt1638.1 kV=7.1996 kVA=13.3786 kWrated=11.1488 kWhrated=44.5953 %stored=62.5 %reserve=30 %EffCharge=95 %EffDischarge=95 %idlingkW=0 Vminpu=0.95 Vmaxpu=1.05 DispMode=External
New Storage.BESS_p1udt1642 Phases=1 Bus1=p1udt1642.1 kV=7.1996 kVA=19.1294 kWrated=15.9412 kWhrated=63.7647 %stored=62.5 %reserve=30 %EffCharge=95 %EffDischarge=95 %idlingkW=0 Vminpu=0.95 Vmaxpu=1.05 DispMode=External
New Storage.BESS_p1udt1645 Phases=1 Bus1=p1udt1645.1 kV=7.1996 kVA=10.0918 kWrated=8.40982 kWhrated=33.6393 %stored=62.5 %reserve=30 %EffCharge=95 %EffDischarge=95 %idlingkW=0 Vminpu=0.95 Vmaxpu=1.05 DispMode=External
New Storage.BESS_p1udt1661 Phases=1 Bus1=p1udt1661.1 kV=7.1996 kVA=2.49002 kWrated=2.07502 kWhrated=8.30007 %stored=62.5 %reserve=30 %EffCharge=95 %EffDischarge=95 %idlingkW=0 Vminpu=0.95 Vmaxpu=1.05 DispMode=External
New Storage.BESS_p1udt1671 Phases=1 Bus1=p1udt1671.1 kV=7.1996 kVA=62.8358 kWrated=52.3632 kWhrated=209.453 %stored=62.5 %reserve=30 %EffCharge=95 %EffDischarge=95 %idlingkW=0 Vminpu=0.95 Vmaxpu=1.05 DispMode=External
New Storage.BESS_p1udt1673 Phases=1 Bus1=p1udt1673.1 kV=7.1996 kVA=7.63406 kWrated=6.36172 kWhrated=25.4469 %stored=62.5 %reserve=30 %EffCharge=95 %EffDischarge=95 %idlingkW=0 Vminpu=0.95 Vmaxpu=1.05 DispMode=External
New Storage.BESS_p1udt1678 Phases=1 Bus1=p1udt1678.1 kV=7.1996 kVA=35.3604 kWrated=29.467 kWhrated=117.868 %stored=62.5 %reserve=30 %EffCharge=95 %EffDischarge=95 %idlingkW=0 Vminpu=0.95 Vmaxpu=1.05 DispMode=External
New Storage.BESS_p1udt1682 Phases=1 Bus1=p1udt1682.1 kV=7.1996 kVA=5.28556 kWrated=4.40464 kWhrated=17.6185 %stored=62.5 %reserve=30 %EffCharge=95 %EffDischarge=95 %idlingkW=0 Vminpu=0.95 Vmaxpu=1.05 DispMode=External
New Storage.BESS_p1udt1688 Phases=1 Bus1=p1udt1688.1 kV=7.1996 kVA=6.11532 kWrated=5.0961 kWhrated=20.3844 %stored=62.5 %reserve=30 %EffCharge=95 %EffDischarge=95 %idlingkW=0 Vminpu=0.95 Vmaxpu=1.05 DispMode=External
New Storage.BESS_p1udt1690 Phases=1 Bus1=p1udt1690.1 kV=7.1996 kVA=14.5671 kWrated=12.1393 kWhrated=48.5571 %stored=62.5 %reserve=30 %EffCharge=95 %EffDischarge=95 %idlingkW=0 Vminpu=0.95 Vmaxpu=1.05 DispMode=External
New Storage.BESS_p1udt1693 Phases=1 Bus1=p1udt1693.1 kV=7.1996 kVA=39.0932 kWrated=32.5776 kWhrated=130.311 %stored=62.5 %reserve=30 %EffCharge=95 %EffDischarge=95 %idlingkW=0 Vminpu=0.95 Vmaxpu=1.05 DispMode=External
New Storage.BESS_p1udt1694 Phases=1 Bus1=p1udt1694.1 kV=7.1996 kVA=16.9253 kWrated=14.1044 kWhrated=56.4176 %stored=62.5 %reserve=30 %EffCharge=95 %EffDischarge=95 %idlingkW=0 Vminpu=0.95 Vmaxpu=1.05 DispMode=External
New Storage.BESS_p1udt1696 Phases=1 Bus1=p1udt1696.1 kV=7.1996 kVA=37.4833 kWrated=31.2361 kWhrated=124.944 %stored=62.5 %reserve=30 %EffCharge=95 %EffDischarge=95 %idlingkW=0 Vminpu=0.95 Vmaxpu=1.05 DispMode=External
New Storage.BESS_p1udt1797 Phases=1 Bus1=p1udt1797.1 kV=7.1996 kVA=82.925 kWrated=69.1041 kWhrated=276.417 %stored=62.5 %reserve=30 %EffCharge=95 %EffDischarge=95 %idlingkW=0 Vminpu=0.95 Vmaxpu=1.05 DispMode=External
New Storage.BESS_p1udt1799 Phases=1 Bus1=p1udt1799.1 kV=7.1996 kVA=56.6202 kWrated=47.1835 kWhrated=188.734 %stored=62.5 %reserve=30 %EffCharge=95 %EffDischarge=95 %idlingkW=0 Vminpu=0.95 Vmaxpu=1.05 DispMode=External
New Storage.BESS_p1udt1803 Phases=1 Bus1=p1udt1803.1 kV=7.1996 kVA=84.8083 kWrated=70.6736 kWhrated=282.694 %stored=62.5 %reserve=30 %EffCharge=95 %EffDischarge=95 %idlingkW=0 Vminpu=0.95 Vmaxpu=1.05 DispMode=External
New Storage.BESS_p1udt1812 Phases=1 Bus1=p1udt1812.1 kV=7.1996 kVA=11.2339 kWrated=9.36158 kWhrated=37.4463 %stored=62.5 %reserve=30 %EffCharge=95 %EffDischarge=95 %idlingkW=0 Vminpu=0.95 Vmaxpu=1.05 DispMode=External
New Storage.BESS_p1udt1815 Phases=1 Bus1=p1udt1815.1 kV=7.1996 kVA=1.77279 kWrated=1.47733 kWhrated=5.90932 %stored=62.5 %reserve=30 %EffCharge=95 %EffDischarge=95 %idlingkW=0 Vminpu=0.95 Vmaxpu=1.05 DispMode=External
New Storage.BESS_p1udt1819 Phases=1 Bus1=p1udt1819.1 kV=7.1996 kVA=10.3571 kWrated=8.63088 kWhrated=34.5235 %stored=62.5 %reserve=30 %EffCharge=95 %EffDischarge=95 %idlingkW=0 Vminpu=0.95 Vmaxpu=1.05 DispMode=External
New Storage.BESS_p1udt1821 Phases=1 Bus1=p1udt1821.1 kV=7.1996 kVA=15.0109 kWrated=12.5091 kWhrated=50.0364 %stored=62.5 %reserve=30 %EffCharge=95 %EffDischarge=95 %idlingkW=0 Vminpu=0.95 Vmaxpu=1.05 DispMode=External
New Storage.BESS_p1udt1824 Phases=1 Bus1=p1udt1824.1 kV=7.1996 kVA=36.5527 kWrated=30.4606 kWhrated=121.842 %stored=62.5 %reserve=30 %EffCharge=95 %EffDischarge=95 %idlingkW=0 Vminpu=0.95 Vmaxpu=1.05 DispMode=External
New Storage.BESS_p1udt1851 Phases=1 Bus1=p1udt1851.1 kV=7.1996 kVA=10.1191 kWrated=8.43261 kWhrated=33.7305 %stored=62.5 %reserve=30 %EffCharge=95 %EffDischarge=95 %idlingkW=0 Vminpu=0.95 Vmaxpu=1.05 DispMode=External
New Storage.BESS_p1umv20 Phases=1 Bus1=p1umv20.1 kV=7.1996 kVA=480.379 kWrated=400.316 kWhrated=1601.26 %stored=62.5 %reserve=30 %EffCharge=95 %EffDischarge=95 %idlingkW=0 Vminpu=0.95 Vmaxpu=1.05 DispMode=External
New Storage.BESS_p1umv21 Phases=1 Bus1=p1umv21.1 kV=7.1996 kVA=732.376 kWrated=610.313 kWhrated=2441.25 %stored=62.5 %reserve=30 %EffCharge=95 %EffDischarge=95 %idlingkW=0 Vminpu=0.95 Vmaxpu=1.05 DispMode=External
New Storage.BESS_p1umv22 Phases=1 Bus1=p1umv22.1 kV=7.1996 kVA=411.136 kWrated=342.613 kWhrated=1370.45 %stored=62.5 %reserve=30 %EffCharge=95 %EffDischarge=95 %idlingkW=0 Vminpu=0.95 Vmaxpu=1.05 DispMode=External
