! smartds_p1u_hs3_1ph: single-phase per-phase equivalent of test_networks\sources\smartds_sfo_p1u\p1uhs3_1247\Master.dss (unmodified original).
! Written by problems/msopf/root_level/convert_to_1ph.jl -- do not edit by hand.
! The original's normally-open switches, disabled. Close one with Line.<name>.enabled=true. A switch is
! 1e-3 + j1e-3 ohm, as the other decks' shortest lines; a tie cable with an open switch at each end
! (tie_<switch>) is one line with both switches and the cable in series, its middle buses left out.
New Line.sb8_p1uhs3_1247_36 Phases=1 Bus1=sb8_p1uhs3_1247_bus_8_1.1 Bus2=sb8_p1uhs3_1247_bus_8_2.1 r1=0.001 x1=0.001 c1=0 c0=0 length=1 units=none enabled=false
New Line.sb8_p1uhs3_1247_45 Phases=1 Bus1=sb8_p1uhs3_1247_bus_8_1.1 Bus2=sb8_p1uhs3_1247_bus_8_3.1 r1=0.001 x1=0.001 c1=0 c0=0 length=1 units=none enabled=false
New Line.tie_padswitch_r_p1udt1672-p1udt1802_p1u_11937 Phases=1 Bus1=p1udt1672.1 Bus2=p1udt1802.1 r1=0.0289197 x1=0.167872 c1=0 c0=0 length=1 units=none enabled=false
