! smartds_p1u_xf_1ph: single-phase per-phase equivalent of test_networks\sources\smartds_sfo_p1u\Master.dss (unmodified original).
! Written by problems/msopf/root_level/convert_to_1ph.jl -- do not edit by hand.
! The original's capacitor banks (kvar / 3), not redirected by Master.dss.
New generator.p1udt1179C Phases=1 Bus1=p1udt1179.1 kV=7.1996 Model=1 kW=1e-06 kVAr=100
New generator.p1udt12C Phases=1 Bus1=p1udt12.1 kV=7.1996 Model=1 kW=1e-06 kVAr=200
New generator.p1udt1444C Phases=1 Bus1=p1udt1444.1 kV=7.1996 Model=1 kW=1e-06 kVAr=150
New generator.p1udt18C Phases=1 Bus1=p1udt18.1 kV=7.1996 Model=1 kW=1e-06 kVAr=150
New generator.p1udt281C Phases=1 Bus1=p1udt281.1 kV=7.1996 Model=1 kW=1e-06 kVAr=100
New generator.p1udt558C Phases=1 Bus1=p1udt558.1 kV=7.1996 Model=1 kW=1e-06 kVAr=100
New generator.p1udt998C Phases=1 Bus1=p1udt998.1 kV=7.1996 Model=1 kW=1e-06 kVAr=150
New generator.p1umv11C Phases=1 Bus1=p1umv11.1 kV=7.1996 Model=1 kW=1e-06 kVAr=100
New generator.p1umv12C Phases=1 Bus1=p1umv12.1 kV=7.1996 Model=1 kW=1e-06 kVAr=200
New generator.p1umv13C Phases=1 Bus1=p1umv13.1 kV=7.1996 Model=1 kW=1e-06 kVAr=100
New generator.p1umv14C Phases=1 Bus1=p1umv14.1 kV=7.1996 Model=1 kW=1e-06 kVAr=100
New generator.p1umv17C Phases=1 Bus1=p1umv17.1 kV=7.1996 Model=1 kW=1e-06 kVAr=150
New generator.p1umv18C Phases=1 Bus1=p1umv18.1 kV=7.1996 Model=1 kW=1e-06 kVAr=150
New generator.p1umv2C Phases=1 Bus1=p1umv2.1 kV=7.1996 Model=1 kW=1e-06 kVAr=200
New generator.p1umv20C Phases=1 Bus1=p1umv20.1 kV=7.1996 Model=1 kW=1e-06 kVAr=100
New generator.p1umv8C Phases=1 Bus1=p1umv8.1 kV=7.1996 Model=1 kW=1e-06 kVAr=100
