! smartds_p1u_xf_1ph: single-phase per-phase equivalent of test_networks\sources\smartds_sfo_p1u\Master.dss (unmodified original).
! Written by problems/msopf/root_level/convert_to_1ph.jl -- do not edit by hand.
! Four substations, one transformer each, tied by the original's normally-open ties between substations
! (Type III, Chen et al. 2004): hs0's second transformer (subs5) out, its section fed through the substation bus tie.
Redirect Master.dss
Vsource.subs5.enabled=false
Line.sb9_p1uhs0_1247_267.enabled=true
Line.elbswitch_r_p1udt1165-p1udt1475_p1u_11936.enabled=true
Line.elbswitch_r_p1udt1810-p1udt1812_p1u_11900.enabled=true
Line.tie_padswitch_r_p1udt1185-p1udt1711_p1u_11896.enabled=true
Line.tie_padswitch_r_p1udt1317-p1udt1618_p1u_11891.enabled=true
Line.tie_padswitch_r_p1udt1721-p1udt1730_p1u_11928.enabled=true
Line.tie_padswitch_r_p1udt918-p1udt919_p1u_11898.enabled=true
CalcVoltageBases
