! smartds_p1u_xf_1ph: single-phase per-phase equivalent of test_networks\sources\smartds_sfo_p1u\Master.dss (unmodified original).
! Written by problems/msopf/root_level/convert_to_1ph.jl -- do not edit by hand.
! The original's normally-open switches, disabled. Close one with Line.<name>.enabled=true. A switch is
! 1e-3 + j1e-3 ohm, as the other decks' shortest lines; a tie cable with an open switch at each end
! (tie_<switch>) is one line with both switches and the cable in series, its middle buses left out.
New Line.elbswitch_r_p1udt104-p1udt212_p1u_11897 Phases=1 Bus1=p1udt212.1 Bus2=p1udt104-p1udt212x.1 r1=0.001 x1=0.001 c1=0 c0=0 length=1 units=none enabled=false
New Line.elbswitch_r_p1udt424-p1udt51_p1u_11907 Phases=1 Bus1=p1udt424.1 Bus2=p1udt424-p1udt51x.1 r1=0.001 x1=0.001 c1=0 c0=0 length=1 units=none enabled=false
New Line.sb9_p1uhs0_1247_267 Phases=1 Bus1=sb9_p1uhs0_1247_bus_9_3.1 Bus2=sb9_p1uhs0_1247_bus_9_4.1 r1=0.001 x1=0.001 c1=0 c0=0 length=1 units=none enabled=false
New Line.elbswitch_r_p1udt873-p1udt874_p1u_11909 Phases=1 Bus1=p1udt873.1 Bus2=p1udt873-p1udt874x.1 r1=0.001 x1=0.001 c1=0 c0=0 length=1 units=none enabled=false
New Line.elbswitch_r_p1udt1418-p1udt1440_p1u_11926 Phases=1 Bus1=p1udt1418.1 Bus2=p1udt1418-p1udt1440x.1 r1=0.001 x1=0.001 c1=0 c0=0 length=1 units=none enabled=false
New Line.elbswitch_r_p1udt624-p1udt663_p1u_11931 Phases=1 Bus1=p1udt624.1 Bus2=p1udt624-p1udt663x.1 r1=0.001 x1=0.001 c1=0 c0=0 length=1 units=none enabled=false
New Line.elbswitch_r_p1udt1559-p1udt628_p1u_11932 Phases=1 Bus1=p1udt1559.1 Bus2=p1udt1559-p1udt628x.1 r1=0.001 x1=0.001 c1=0 c0=0 length=1 units=none enabled=false
New Line.elbswitch_r_p1udt1358-p1udt630_p1u_11933 Phases=1 Bus1=p1udt630.1 Bus2=p1udt1358-p1udt630x.1 r1=0.001 x1=0.001 c1=0 c0=0 length=1 units=none enabled=false
New Line.elbswitch_r_p1udt1829-p1udt558_p1u_11908 Phases=1 Bus1=p1udt1829.1 Bus2=p1udt1829-p1udt558x.1 r1=0.001 x1=0.001 c1=0 c0=0 length=1 units=none enabled=false
New Line.elbswitch_r_p1udt622-p1udt662_p1u_11916 Phases=1 Bus1=p1udt662.1 Bus2=p1udt622-p1udt662x.1 r1=0.001 x1=0.001 c1=0 c0=0 length=1 units=none enabled=false
New Line.sb8_p1uhs1_1247_36 Phases=1 Bus1=sb8_p1uhs1_1247_bus_8_1.1 Bus2=sb8_p1uhs1_1247_bus_8_2.1 r1=0.001 x1=0.001 c1=0 c0=0 length=1 units=none enabled=false
New Line.sb8_p1uhs1_1247_45 Phases=1 Bus1=sb8_p1uhs1_1247_bus_8_1.1 Bus2=sb8_p1uhs1_1247_bus_8_3.1 r1=0.001 x1=0.001 c1=0 c0=0 length=1 units=none enabled=false
New Line.sb1_p1uhs2_1247_31 Phases=1 Bus1=sb1_p1uhs2_1247_bus_1_1.1 Bus2=sb1_p1uhs2_1247_bus_1_2.1 r1=0.001 x1=0.001 c1=0 c0=0 length=1 units=none enabled=false
New Line.elbswitch_r_p1udt578-p1udt583_p1u_11925 Phases=1 Bus1=p1udt578.1 Bus2=p1udt578-p1udt583x.1 r1=0.001 x1=0.001 c1=0 c0=0 length=1 units=none enabled=false
New Line.elbswitch_r_p1udt1165-p1udt1475_p1u_11936 Phases=1 Bus1=p1udt1165.1 Bus2=p1udt1165-p1udt1475x.1 r1=0.001 x1=0.001 c1=0 c0=0 length=1 units=none enabled=false
New Line.sb8_p1uhs3_1247_36 Phases=1 Bus1=sb8_p1uhs3_1247_bus_8_1.1 Bus2=sb8_p1uhs3_1247_bus_8_2.1 r1=0.001 x1=0.001 c1=0 c0=0 length=1 units=none enabled=false
New Line.sb8_p1uhs3_1247_45 Phases=1 Bus1=sb8_p1uhs3_1247_bus_8_1.1 Bus2=sb8_p1uhs3_1247_bus_8_3.1 r1=0.001 x1=0.001 c1=0 c0=0 length=1 units=none enabled=false
New Line.elbswitch_r_p1udt1810-p1udt1812_p1u_11900 Phases=1 Bus1=p1udt1812.1 Bus2=p1udt1810-p1udt1812x.1 r1=0.001 x1=0.001 c1=0 c0=0 length=1 units=none enabled=false
New Line.tie_padswitch_r_p1udt158-p1udt450_p1u_11894 Phases=1 Bus1=p1udt450.1 Bus2=p1udt158.1 r1=0.00799759 x1=0.0389556 c1=0 c0=0 length=1 units=none enabled=false
New Line.tie_padswitch_r_p1udt111-p1udt219_p1u_11904 Phases=1 Bus1=p1udt111.1 Bus2=p1udt219.1 r1=0.00570597 x1=0.0248352 c1=0 c0=0 length=1 units=none enabled=false
New Line.tie_padswitch_r_p1udt458-p1udt78_p1u_11905 Phases=1 Bus1=p1udt458.1 Bus2=p1udt78.1 r1=0.00635625 x1=0.0288421 c1=0 c0=0 length=1 units=none enabled=false
New Line.tie_padswitch_r_p1udt201-p1umv7_p1u_11913 Phases=1 Bus1=p1umv7.1 Bus2=p1udt201.1 r1=0.0125841 x1=0.0672167 c1=0 c0=0 length=1 units=none enabled=false
New Line.tie_padswitch_r_p1udt101-p1udt94_p1u_11914 Phases=1 Bus1=p1udt101.1 Bus2=p1udt94.1 r1=0.0113456 x1=0.0595851 c1=0 c0=0 length=1 units=none enabled=false
New Line.tie_padswitch_r_p1udt290-p1udt371_p1u_11943 Phases=1 Bus1=p1udt371.1 Bus2=p1udt290.1 r1=0.0106198 x1=0.0551128 c1=0 c0=0 length=1 units=none enabled=false
New Line.tie_padswitch_r_p1udt918-p1udt919_p1u_11898 Phases=1 Bus1=p1udt918.1 Bus2=p1udt919.1 r1=0.0135051 x1=0.0728915 c1=0 c0=0 length=1 units=none enabled=false
New Line.tie_padswitch_r_p1udt258-p1udt447_p1u_11934 Phases=1 Bus1=p1udt447.1 Bus2=p1udt258.1 r1=0.0183628 x1=0.102823 c1=0 c0=0 length=1 units=none enabled=false
New Line.tie_padswitch_r_p1udt175-p1udt258_p1u_11919 Phases=1 Bus1=p1udt258.1 Bus2=p1udt175.1 r1=0.00742236 x1=0.0354112 c1=0 c0=0 length=1 units=none enabled=false
New Line.tie_padswitch_r_p1udt1317-p1udt1618_p1u_11891 Phases=1 Bus1=p1udt1618.1 Bus2=p1udt1317.1 r1=0.00740716 x1=0.0353175 c1=0 c0=0 length=1 units=none enabled=false
New Line.tie_padswitch_r_p1udt1185-p1udt1711_p1u_11896 Phases=1 Bus1=p1udt1185.1 Bus2=p1udt1711.1 r1=0.00849244 x1=0.0420047 c1=0 c0=0 length=1 units=none enabled=false
New Line.tie_padswitch_r_p1udt1784-p1udt1786_p1u_11910 Phases=1 Bus1=p1udt1786.1 Bus2=p1udt1784.1 r1=0.00575105 x1=0.025113 c1=0 c0=0 length=1 units=none enabled=false
New Line.tie_padswitch_r_p1udt676-p1udt730_p1u_11921 Phases=1 Bus1=p1udt730.1 Bus2=p1udt676.1 r1=0.00636368 x1=0.0288879 c1=0 c0=0 length=1 units=none enabled=false
New Line.tie_padswitch_r_p1udt1721-p1udt1730_p1u_11928 Phases=1 Bus1=p1udt1721.1 Bus2=p1udt1730.1 r1=0.0183715 x1=0.102877 c1=0 c0=0 length=1 units=none enabled=false
New Line.tie_padswitch_r_p1udt1113-p1udt1775_p1u_11939 Phases=1 Bus1=p1udt1775.1 Bus2=p1udt1113.1 r1=0.00466559 x1=0.0184247 c1=0 c0=0 length=1 units=none enabled=false
New Line.tie_padswitch_r_p1udt1254-p1udt1779_p1u_11941 Phases=1 Bus1=p1udt1779.1 Bus2=p1udt1254.1 r1=0.0086819 x1=0.0431721 c1=0 c0=0 length=1 units=none enabled=false
New Line.tie_padswitch_r_p1udt716-p1udt718_p1u_11901 Phases=1 Bus1=p1udt716.1 Bus2=p1udt718.1 r1=0.00522242 x1=0.0218557 c1=0 c0=0 length=1 units=none enabled=false
New Line.tie_padswitch_r_p1udt688-p1udt690_p1u_11923 Phases=1 Bus1=p1udt690.1 Bus2=p1udt688.1 r1=0.00814341 x1=0.0398541 c1=0 c0=0 length=1 units=none enabled=false
New Line.tie_padswitch_r_p1udt1046-p1udt1130_p1u_11917 Phases=1 Bus1=p1udt1046.1 Bus2=p1udt1130.1 r1=0.00604189 x1=0.0269051 c1=0 c0=0 length=1 units=none enabled=false
New Line.tie_padswitch_r_p1udt1124-p1udt1125_p1u_11929 Phases=1 Bus1=p1udt1124.1 Bus2=p1udt1125.1 r1=0.00725957 x1=0.0344081 c1=0 c0=0 length=1 units=none enabled=false
New Line.tie_padswitch_r_p1udt1672-p1udt1802_p1u_11937 Phases=1 Bus1=p1udt1672.1 Bus2=p1udt1802.1 r1=0.0289197 x1=0.167872 c1=0 c0=0 length=1 units=none enabled=false
